AnyFolder ContactPoints ={

  AnyFolder &refLumbar=.SegmentsLumbar;
  AnyFolder &refThorax=.SegmentsThorax;

  refLumbar.PelvisSeg={

    AnyRefNode PosteriorRContactNode = {sRel = .Scale(.Data.PosteriorRContactNode_pos);};
    AnyRefNode PosteriorLContactNode = {sRel = .Scale(.Data.PosteriorLContactNode_pos);};

    AnyRefNode Tuber_ischiadicum1RContactNode={sRel = .Scale(.Data.Tuber_ischiadicum1RContactNode_pos);};
    AnyRefNode Tuber_ischiadicum1LContactNode={sRel = .Scale(.Data.Tuber_ischiadicum1LContactNode_pos);};

    AnyRefNode Tuber_ischiadicum2RContactNode={sRel = .Scale(.Data.Tuber_ischiadicum2RContactNode_pos);};
    AnyRefNode Tuber_ischiadicum2LContactNode={sRel = .Scale(.Data.Tuber_ischiadicum2LContactNode_pos);};

    AnyRefNode Tuber_ischiadicum2MidContactNode={sRel=0.5*(.Tuber_ischiadicum2RContactNode.sRel+.Tuber_ischiadicum2LContactNode.sRel);};

    AnyRefNode Tuber_ischiadicum3RContactNode={sRel = .Scale(.Data.Tuber_ischiadicum3RContactNode_pos);};
    AnyRefNode Tuber_ischiadicum3LContactNode={sRel = .Scale(.Data.Tuber_ischiadicum3LContactNode_pos);};

    AnyRefNode Tuber_ischiadicum4RContactNode={sRel = .Scale(.Data.Tuber_ischiadicum4RContactNode_pos);};
    AnyRefNode Tuber_ischiadicum4LContactNode={sRel = .Scale(.Data.Tuber_ischiadicum4LContactNode_pos);};

  };


  refLumbar.SacrumSeg={
    AnyRefNode SacrumContactNode = {sRel= .Scale(.Data.SacrumContactNode_pos);};
    AnyRefNode SacrumRContactNode = {sRel= .Scale(.Data.SacrumRContactNode_pos);};
    AnyRefNode SacrumLContactNode = {sRel= .Scale(.Data.SacrumLContactNode_pos);};

  };

  refLumbar.L5Seg={
    AnyRefNode L5RContactNode = {sRel= .Scale(.Data.L5RContactNode_pos);};
    AnyRefNode L5LContactNode = {sRel= .Scale(.Data.L5RContactNode_pos);};
  };

  refLumbar.L4Seg={
    AnyRefNode L4RContactNode = {sRel= .Scale(.Data.L4RContactNode_pos);};
    AnyRefNode L4LContactNode = {sRel= .Scale(.Data.L4RContactNode_pos);};
  };


  refLumbar.L3Seg={
    AnyRefNode L3RContactNode = {sRel= .Scale(.Data.L3RContactNode_pos);};
    AnyRefNode L3LContactNode = {sRel= .Scale(.Data.L3RContactNode_pos);};
  };

  refLumbar.L2Seg={
    AnyRefNode L2RContactNode = {sRel= .Scale(.Data.L2RContactNode_pos);};
    AnyRefNode L2LContactNode = {sRel= .Scale(.Data.L2RContactNode_pos);};
  };

  refLumbar.L1Seg={
    AnyRefNode L1RContactNode = {sRel= .Scale(.Data.L1RContactNode_pos);};
    AnyRefNode L1LContactNode = {sRel= .Scale(.Data.L1RContactNode_pos);};
  };

  refThorax.SkullSeg={
    AnyRefNode SkullContactNode = {sRel= .Scale(.Data.SkullContactNode_pos);};
  };

};
