///The muscles of the cervical spine on the Left side.
AnyFolder MusclesCervicalSpineLeft = {

  AnyMuscleViaPoint LumpedHyoidT1C0 = {
    AnyMuscleModel &MusMdl = ..MuscleParametersCervicalSpineLeft.LumpedHyoidT1C0Par;
    AnyRefNode &Org = ..SegmentsThorax.SkullSeg.LumpedHyoidT1C0NodeL;
    AnyRefNode &Ins = ..SegmentsThorax.ThoraxSeg.LumpedHyoidT1C0NodeL;
    AnyDrawMuscle DrwMus = {#include "../drawSettings/MusDrawSettings.any"};
  };

  AnyMuscleViaPoint LongusColliT1C6 = {
    AnyMuscleModel &MusMdl = ..MuscleParametersCervicalSpineLeft.LongusColliT1C6Par;
    AnyRefNode &Org = ..SegmentsThorax.ThoraxSeg.LongusColliT1NodeL;
    AnyRefNode &Ins = ..SegmentsCervicalSpine.C6Seg.LongusColliT1C6NodeL;
    AnyDrawMuscle DrwMus = {#include "../drawSettings/MusDrawSettings.any"};
  };

  AnyMuscleViaPoint LongusColliT1C5 = {
    AnyMuscleModel &MusMdl = ..MuscleParametersCervicalSpineLeft.LongusColliT1C5Par;
    AnyRefNode &Org = ..SegmentsThorax.ThoraxSeg.LongusColliT1NodeL;
    AnyRefNode &Via1 = ..SegmentsCervicalSpine.C6Seg.LongusColliT1C6NodeL;
    AnyRefNode &Ins = ..SegmentsCervicalSpine.C5Seg.LongusColliT1C5NodeL;
    AnyDrawMuscle DrwMus = {#include "../drawSettings/MusDrawSettings.any"};
  };

  AnyMuscleViaPoint LongusColliT1C4 = {
    AnyMuscleModel &MusMdl = ..MuscleParametersCervicalSpineLeft.LongusColliT1C4Par;
    AnyRefNode &Org = ..SegmentsThorax.ThoraxSeg.LongusColliT1NodeL;
    AnyRefNode &Via1 = ..SegmentsCervicalSpine.C6Seg.LongusColliT1C6NodeL;
    AnyRefNode &Via2 = ..SegmentsCervicalSpine.C5Seg.LongusColliT1C5NodeL;
    AnyRefNode &Ins = ..SegmentsCervicalSpine.C4Seg.LongusColliT1C4NodeL;
    AnyDrawMuscle DrwMus = {#include "../drawSettings/MusDrawSettings.any"};
  };

  AnyMuscleViaPoint LongusColliT1C3 = {
    AnyMuscleModel &MusMdl = ..MuscleParametersCervicalSpineLeft.LongusColliT1C3Par;
    AnyRefNode &Org = ..SegmentsThorax.ThoraxSeg.LongusColliT1NodeL;
    AnyRefNode &Via1 = ..SegmentsCervicalSpine.C6Seg.LongusColliT1C6NodeL;
    AnyRefNode &Via2 = ..SegmentsCervicalSpine.C5Seg.LongusColliT1C5NodeL;
    AnyRefNode &Via3 = ..SegmentsCervicalSpine.C4Seg.LongusColliT1C4NodeL;
    AnyRefNode &Ins = ..SegmentsCervicalSpine.C3Seg.LongusColliT1C3NodeL;
    AnyDrawMuscle DrwMus = {#include "../drawSettings/MusDrawSettings.any"};
  };

  AnyMuscleViaPoint LongusColliT1C2 = {
    AnyMuscleModel &MusMdl = ..MuscleParametersCervicalSpineLeft.LongusColliT1C2Par;
    AnyRefNode &Org = ..SegmentsThorax.ThoraxSeg.LongusColliT1NodeL;
    AnyRefNode &Via1 = ..SegmentsCervicalSpine.C6Seg.LongusColliT1C6NodeL;
    AnyRefNode &Via2 = ..SegmentsCervicalSpine.C5Seg.LongusColliT1C5NodeL;
    AnyRefNode &Via3 = ..SegmentsCervicalSpine.C4Seg.LongusColliT1C4NodeL;
    AnyRefNode &Via4 = ..SegmentsCervicalSpine.C3Seg.LongusColliT1C3NodeL;
    AnyRefNode &Ins = ..SegmentsCervicalSpine.C2Seg.LongusColliT1C2NodeL;
    AnyDrawMuscle DrwMus = {#include "../drawSettings/MusDrawSettings.any"};
  };

  AnyMuscleViaPoint LongusColliT1C1 = {
    AnyMuscleModel &MusMdl = ..MuscleParametersCervicalSpineLeft.LongusColliT1C1Par;
    AnyRefNode &Org = ..SegmentsThorax.ThoraxSeg.LongusColliT1NodeL;
    AnyRefNode &Via1 = ..SegmentsCervicalSpine.C6Seg.LongusColliT1C6NodeL;
    AnyRefNode &Via2 = ..SegmentsCervicalSpine.C5Seg.LongusColliT1C5NodeL;
    AnyRefNode &Via3 = ..SegmentsCervicalSpine.C4Seg.LongusColliT1C4NodeL;
    AnyRefNode &Via4 = ..SegmentsCervicalSpine.C3Seg.LongusColliT1C3NodeL;
    AnyRefNode &Via5 = ..SegmentsCervicalSpine.C2Seg.LongusColliT1C2NodeL;
    AnyRefNode &Ins = ..SegmentsCervicalSpine.C1Seg.LongusColliT1C1NodeL;
    AnyDrawMuscle DrwMus = {#include "../drawSettings/MusDrawSettings.any"};
  };

  AnyMuscleViaPoint LongusColliT1C0 = {
    AnyMuscleModel &MusMdl = ..MuscleParametersCervicalSpineLeft.LongusColliT1C0Par;
    AnyRefNode &Org = ..SegmentsThorax.ThoraxSeg.LongusColliT1NodeL;
    AnyRefNode &Via1 = ..SegmentsCervicalSpine.C6Seg.LongusColliT1C6NodeL;
    AnyRefNode &Via2 = ..SegmentsCervicalSpine.C5Seg.LongusColliT1C5NodeL;
    AnyRefNode &Via3 = ..SegmentsCervicalSpine.C4Seg.LongusColliT1C4NodeL;
    AnyRefNode &Via4 = ..SegmentsCervicalSpine.C3Seg.LongusColliT1C3NodeL;
    AnyRefNode &Via5 = ..SegmentsCervicalSpine.C2Seg.LongusColliT1C2NodeL;
    AnyRefNode &Via6 = ..SegmentsCervicalSpine.C1Seg.LongusColliT1C1NodeL;
    AnyRefNode &Ins = ..SegmentsThorax.SkullSeg.LongusColliT1C0NodeL;
    AnyDrawMuscle DrwMus = {#include "../drawSettings/MusDrawSettings.any"};
  };

  AnyMuscleViaPoint LongusCapitisC6C0 = {
    AnyMuscleModel &MusMdl = ..MuscleParametersCervicalSpineLeft.LongusCapitisC6C0Par;
    AnyRefNode &Org = ..SegmentsCervicalSpine.C6Seg.LongusCapitisC6C0NodeL;
    AnyRefNode &Ins = ..SegmentsThorax.SkullSeg.LongusCapitisC0NodeL;
    AnyDrawMuscle DrwMus = {#include "../drawSettings/MusDrawSettings.any"};
  };

  AnyMuscleViaPoint LongusCapitisC5C0 = {
    AnyMuscleModel &MusMdl = ..MuscleParametersCervicalSpineLeft.LongusCapitisC5C0Par;
    AnyRefNode &Org = ..SegmentsCervicalSpine.C5Seg.LongusCapitisC5C0NodeL;
    AnyRefNode &Ins = ..SegmentsThorax.SkullSeg.LongusCapitisC0NodeL;
    AnyDrawMuscle DrwMus = {#include "../drawSettings/MusDrawSettings.any"};
  };

  AnyMuscleViaPoint LongusCapitisC4C0 = {
    AnyMuscleModel &MusMdl = ..MuscleParametersCervicalSpineLeft.LongusCapitisC4C0Par;
    AnyRefNode &Org = ..SegmentsCervicalSpine.C4Seg.LongusCapitisC4C0NodeL;
    AnyRefNode &Ins = ..SegmentsThorax.SkullSeg.LongusCapitisC0NodeL;
    AnyDrawMuscle DrwMus = {#include "../drawSettings/MusDrawSettings.any"};
  };

  AnyMuscleViaPoint LongusCapitisC3C0 = {
    AnyMuscleModel &MusMdl = ..MuscleParametersCervicalSpineLeft.LongusCapitisC3C0Par;
    AnyRefNode &Org = ..SegmentsCervicalSpine.C3Seg.LongusCapitisC3C0NodeL;
    AnyRefNode &Ins = ..SegmentsThorax.SkullSeg.LongusCapitisC0NodeL;
    AnyDrawMuscle DrwMus = {#include "../drawSettings/MusDrawSettings.any"};
  };

  AnyMuscleViaPoint ScalenusAnteriorT1C4 = {
    AnyMuscleModel &MusMdl = ..MuscleParametersCervicalSpineLeft.ScalenusAnteriorT1C4Par;
    AnyRefNode &Org = ..SegmentsCervicalSpine.C4Seg.ScalenusAnteriorT1C4NodeL;
    AnyRefNode &Ins = ..SegmentsThorax.ThoraxSeg.ScalenusAnteriorT1C4NodeL;
    AnyDrawMuscle DrwMus = {#include "../drawSettings/MusDrawSettings.any"};
  };

  AnyMuscleViaPoint ScalenusMediusT1C3 = {
    AnyMuscleModel &MusMdl = ..MuscleParametersCervicalSpineLeft.ScalenusMediusT1C3Par;
    AnyRefNode &Org = ..SegmentsCervicalSpine.C3Seg.ScalenusMediusT1C3NodeL;
    AnyRefNode &Ins = ..SegmentsThorax.ThoraxSeg.ScalenusMediusT1C3NodeL;
    AnyDrawMuscle DrwMus = {#include "../drawSettings/MusDrawSettings.any"};
  };

  AnyMuscleViaPoint ScalenusPosteriorT1C5 = {
    AnyMuscleModel &MusMdl = ..MuscleParametersCervicalSpineLeft.ScalenusPosteriorT1C5Par;
    AnyRefNode &Org = ..SegmentsCervicalSpine.C5Seg.ScalenusPosteriorT1C5NodeL;
    AnyRefNode &Ins = ..SegmentsThorax.ThoraxSeg.ScalenusPosteriorT1C5NodeL;
    AnyDrawMuscle DrwMus = {#include "../drawSettings/MusDrawSettings.any"};
  };

/*
  AnyMuscleViaPoint SternocleidomastoidSternumCO = {
    AnyMuscleModel &MusMdl = ..MuscleParametersCervicalSpineLeft.SternocleidomastoidSternumC0Par;
    AnyRefNode &Org = ..SegmentsThorax.SkullSeg.SternocleidomastoidSternumC0NodeL;
    AnyRefNode &Ins = ..SegmentsThorax.ThoraxSeg.SternocleidomastoidSternumC0NodeL;
    AnyDrawMuscle DrwMus = {#include "../drawSettings/MusDrawSettings.any"};
  };

  AnyMuscleViaPoint SternocleidomastoidClavicleCO = {
    AnyMuscleModel &MusMdl = ..MuscleParametersCervicalSpineLeft.SternocleidomastoidClavicleC0Par;
    AnyRefNode &Org = ..SegmentsThorax.SkullSeg.SternocleidomastoidClavicleC0NodeL;
    AnyRefNode &Ins = ..SegmentsThorax.ThoraxSeg.SternocleidomastoidClavicleC0NodeL;
    AnyDrawMuscle DrwMus = {#include "../drawSettings/MusDrawSettings.any"};
  };
*/

//Moved to shoulder model
//  AnyMuscleViaPoint Sternocleidomastoid = {
//    AnyMuscleModel &MusMdl = ..MuscleParametersCervicalSpineLeft.SternocleidomastoidSternumC0Par;
//    AnyRefNode &Ins = ..SegmentsThorax.ThoraxSeg.SternocleidomastoidSternumC0NodeL;
//    AnyRefNode &Via = ..SegmentsThorax.SkullSeg.SternocleidomastoidSternumC0NodeL;
//    AnyRefNode &Ins2 = ..SegmentsThorax.ThoraxSeg.SternocleidomastoidClavicleC0NodeL;
//    AnyDrawMuscle DrwMus = {#include "../drawSettings/MusDrawSettings.any"};
//  };

  AnyMuscleViaPoint SpleniusCapitisC7C0 = {
    AnyMuscleModel &MusMdl = ..MuscleParametersCervicalSpineLeft.SpleniusCapitisC7C0Par;
    AnyRefNode &Org = ..SegmentsThorax.SkullSeg.SpleniusCapitisNodeL;
    AnyRefNode &Ins = ..SegmentsCervicalSpine.C7Seg.SpleniusCapitisC7C0NodeL;
    AnyDrawMuscle DrwMus = {#include "../drawSettings/MusDrawSettings.any"};
  };

  AnyMuscleViaPoint SpleniusCapitisT2C0 = {
    AnyMuscleModel &MusMdl = ..MuscleParametersCervicalSpineLeft.SpleniusCapitisT2C0Par;
    AnyRefNode &Org = ..SegmentsThorax.SkullSeg.SpleniusCapitisNodeL;
    AnyRefNode &Ins = ..SegmentsThorax.ThoraxSeg.SpleniusCapitisT2C0NodeL;
    AnyDrawMuscle DrwMus = {#include "../drawSettings/MusDrawSettings.any"};
  };

  AnyMuscleViaPoint SpleniusCervicisT3C1 = {
    AnyMuscleModel &MusMdl = ..MuscleParametersCervicalSpineLeft.SpleniusCervicisT3C1Par;
    AnyRefNode &Org = ..SegmentsThorax.ThoraxSeg.SpleniusCervicisNodeL;
    AnyRefNode &Ins = ..SegmentsCervicalSpine.C1Seg.SpleniusCervicisT3C1NodeL;
    AnyDrawMuscle DrwMus = {#include "../drawSettings/MusDrawSettings.any"};
  };

  AnyMuscleViaPoint SpleniusCervicisT3C2 = {
    AnyMuscleModel &MusMdl = ..MuscleParametersCervicalSpineLeft.SpleniusCervicisT3C2Par;
    AnyRefNode &Org = ..SegmentsThorax.ThoraxSeg.SpleniusCervicisNodeL;
    AnyRefNode &Ins = ..SegmentsCervicalSpine.C2Seg.SpleniusCervicisT3C2NodeL;
    AnyDrawMuscle DrwMus = {#include "../drawSettings/MusDrawSettings.any"};
  };

  AnyMuscleViaPoint SpleniusCervicisT3C3 = {
    AnyMuscleModel &MusMdl = ..MuscleParametersCervicalSpineLeft.SpleniusCervicisT3C3Par;
    AnyRefNode &Org = ..SegmentsThorax.ThoraxSeg.SpleniusCervicisNodeL;
    AnyRefNode &Ins = ..SegmentsCervicalSpine.C3Seg.SpleniusCervicisT3C3NodeL;
    AnyDrawMuscle DrwMus = {#include "../drawSettings/MusDrawSettings.any"};
  };

  AnyMuscleViaPoint SemispinalisCapitisC4C0 = {
    AnyMuscleModel &MusMdl = ..MuscleParametersCervicalSpineLeft.SemispinalisCapitisC4C0Par;
    AnyRefNode &Org = ..SegmentsCervicalSpine.C4Seg.SemispinalisCapitisC4C0NodeL;
    AnyRefNode &Ins = ..SegmentsThorax.SkullSeg.SemispinalisCapitisNodeL;
    AnyDrawMuscle DrwMus = {#include "../drawSettings/MusDrawSettings.any"};
  };

  AnyMuscleViaPoint SemispinalisCapitisC5C0 = {
    AnyMuscleModel &MusMdl = ..MuscleParametersCervicalSpineLeft.SemispinalisCapitisC5C0Par;
    AnyRefNode &Org = ..SegmentsCervicalSpine.C5Seg.SemispinalisCapitisC5C0NodeL;
    AnyRefNode &Ins = ..SegmentsThorax.SkullSeg.SemispinalisCapitisNodeL;
    AnyDrawMuscle DrwMus = {#include "../drawSettings/MusDrawSettings.any"};
  };

  AnyMuscleViaPoint SemispinalisCapitisC6C0 = {
    AnyMuscleModel &MusMdl = ..MuscleParametersCervicalSpineLeft.SemispinalisCapitisC6C0Par;
    AnyRefNode &Org = ..SegmentsCervicalSpine.C6Seg.SemispinalisCapitisC6C0NodeL;
    AnyRefNode &Ins = ..SegmentsThorax.SkullSeg.SemispinalisCapitisNodeL;
    AnyDrawMuscle DrwMus = {#include "../drawSettings/MusDrawSettings.any"};
  };

  AnyMuscleViaPoint SemispinalisCapitisC7C0 = {
    AnyMuscleModel &MusMdl = ..MuscleParametersCervicalSpineLeft.SemispinalisCapitisC7C0Par;
    AnyRefNode &Org = ..SegmentsCervicalSpine.C7Seg.SemispinalisCapitisC7C0NodeL;
    AnyRefNode &Ins = ..SegmentsThorax.SkullSeg.SemispinalisCapitisNodeL;
    AnyDrawMuscle DrwMus = {#include "../drawSettings/MusDrawSettings.any"};
  };

  AnyMuscleViaPoint SemispinalisCapitisT3C0 = {
    AnyMuscleModel &MusMdl = ..MuscleParametersCervicalSpineLeft.SemispinalisCapitisT3C0Par;
    AnyRefNode &Org = ..SegmentsThorax.ThoraxSeg.SemispinalisCapitisT3C0NodeL;
    AnyRefNode &Ins = ..SegmentsThorax.SkullSeg.SemispinalisCapitisNodeL;
    AnyDrawMuscle DrwMus = {#include "../drawSettings/MusDrawSettings.any"};
  };

  AnyMuscleViaPoint SemispinalisCervicisT1C2 = {
    AnyMuscleModel &MusMdl = ..MuscleParametersCervicalSpineLeft.SemispinalisCervicisT1C2Par;
    AnyRefNode &Org = ..SegmentsThorax.ThoraxSeg.SemispinalisCervicisT1C2NodeL;
    AnyRefNode &Ins = ..SegmentsCervicalSpine.C2Seg.SemispinalisCervicisT1C2NodeL;
    AnyDrawMuscle DrwMus = {#include "../drawSettings/MusDrawSettings.any"};
  };

  AnyMuscleViaPoint SemispinalisCervicisT2C3 = {
    AnyMuscleModel &MusMdl = ..MuscleParametersCervicalSpineLeft.SemispinalisCervicisT2C3Par;
    AnyRefNode &Org = ..SegmentsThorax.ThoraxSeg.SemispinalisCervicisT2C3NodeL;
    AnyRefNode &Ins = ..SegmentsCervicalSpine.C3Seg.SemispinalisCervicisT2C3NodeL;
    AnyDrawMuscle DrwMus = {#include "../drawSettings/MusDrawSettings.any"};
  };

  AnyMuscleViaPoint SemispinalisCervicisT3C4 = {
    AnyMuscleModel &MusMdl = ..MuscleParametersCervicalSpineLeft.SemispinalisCervicisT3C4Par;
    AnyRefNode &Org = ..SegmentsThorax.ThoraxSeg.SemispinalisCervicisT3C4NodeL;
    AnyRefNode &Ins = ..SegmentsCervicalSpine.C4Seg.SemispinalisCervicisT3C4NodeL;
    AnyDrawMuscle DrwMus = {#include "../drawSettings/MusDrawSettings.any"};
  };

  AnyMuscleViaPoint SemispinalisCervicisT4C5 = {
    AnyMuscleModel &MusMdl = ..MuscleParametersCervicalSpineLeft.SemispinalisCervicisT4C5Par;
    AnyRefNode &Org = ..SegmentsThorax.ThoraxSeg.SemispinalisCervicisT4C5NodeL;
    AnyRefNode &Ins = ..SegmentsCervicalSpine.C5Seg.SemispinalisCervicisT4C5NodeL;
    AnyDrawMuscle DrwMus = {#include "../drawSettings/MusDrawSettings.any"};
  };

  AnyMuscleViaPoint SemispinalisCervicisT5C6 = {
    AnyMuscleModel &MusMdl = ..MuscleParametersCervicalSpineLeft.SemispinalisCervicisT5C6Par;
    AnyRefNode &Org = ..SegmentsThorax.ThoraxSeg.SemispinalisCervicisT5C6NodeL;
    AnyRefNode &Ins = ..SegmentsCervicalSpine.C6Seg.SemispinalisCervicisT5C6NodeL;
    AnyDrawMuscle DrwMus = {#include "../drawSettings/MusDrawSettings.any"};
  };

  AnyMuscleViaPoint SemispinalisCervicisT6C7 = {
    AnyMuscleModel &MusMdl = ..MuscleParametersCervicalSpineLeft.SemispinalisCervicisT6C7Par;
    AnyRefNode &Org = ..SegmentsThorax.ThoraxSeg.SemispinalisCervicisT6C7NodeL;
    AnyRefNode &Ins = ..SegmentsCervicalSpine.C7Seg.SemispinalisCervicisT6C7NodeL;
    AnyDrawMuscle DrwMus = {#include "../drawSettings/MusDrawSettings.any"};
  };

  AnyMuscleViaPoint LongissimusCapitisC3C0 = {
    AnyMuscleModel &MusMdl = ..MuscleParametersCervicalSpineLeft.LongissimusCapitisC3C0Par;
    AnyRefNode &Org = ..SegmentsCervicalSpine.C3Seg.LongissimusCapitisC3C0NodeL;
    AnyRefNode &Ins = ..SegmentsThorax.SkullSeg.LongissimusCapitisNodeL;
    AnyDrawMuscle DrwMus = {#include "../drawSettings/MusDrawSettings.any"};
  };

  AnyMuscleViaPoint LongissimusCapitisC4C0 = {
    AnyMuscleModel &MusMdl = ..MuscleParametersCervicalSpineLeft.LongissimusCapitisC4C0Par;
    AnyRefNode &Org = ..SegmentsCervicalSpine.C4Seg.LongissimusCapitisC4C0NodeL;
    AnyRefNode &Ins = ..SegmentsThorax.SkullSeg.LongissimusCapitisNodeL;
    AnyDrawMuscle DrwMus = {#include "../drawSettings/MusDrawSettings.any"};
  };

  AnyMuscleViaPoint LongissimusCapitisC5C0 = {
    AnyMuscleModel &MusMdl = ..MuscleParametersCervicalSpineLeft.LongissimusCapitisC5C0Par;
    AnyRefNode &Org = ..SegmentsCervicalSpine.C5Seg.LongissimusCapitisC5C0NodeL;
    AnyRefNode &Ins = ..SegmentsThorax.SkullSeg.LongissimusCapitisNodeL;
    AnyDrawMuscle DrwMus = {#include "../drawSettings/MusDrawSettings.any"};
  };

  AnyMuscleViaPoint LongissimusCapitisC6C0 = {
    AnyMuscleModel &MusMdl = ..MuscleParametersCervicalSpineLeft.LongissimusCapitisC6C0Par;
    AnyRefNode &Org = ..SegmentsCervicalSpine.C6Seg.LongissimusCapitisC6C0NodeL;
    AnyRefNode &Ins = ..SegmentsThorax.SkullSeg.LongissimusCapitisNodeL;
    AnyDrawMuscle DrwMus = {#include "../drawSettings/MusDrawSettings.any"};
  };

  AnyMuscleViaPoint LongissimusCapitisC7C0 = {
    AnyMuscleModel &MusMdl = ..MuscleParametersCervicalSpineLeft.LongissimusCapitisC7C0Par;
    AnyRefNode &Org = ..SegmentsCervicalSpine.C7Seg.LongissimusCapitisC7C0NodeL;
    AnyRefNode &Ins = ..SegmentsThorax.SkullSeg.LongissimusCapitisNodeL;
    AnyDrawMuscle DrwMus = {#include "../drawSettings/MusDrawSettings.any"};
  };

  AnyMuscleViaPoint LongissimusCapitisT2C0 = {
    AnyMuscleModel &MusMdl = ..MuscleParametersCervicalSpineLeft.LongissimusCapitisT2C0Par;
    AnyRefNode &Org = ..SegmentsThorax.ThoraxSeg.LongissimusCapitisT2C0NodeL;
    AnyRefNode &Ins = ..SegmentsThorax.SkullSeg.LongissimusCapitisNodeL;
    AnyDrawMuscle DrwMus = {#include "../drawSettings/MusDrawSettings.any"};
  };

  AnyMuscleViaPoint LongissimusCervicisT2C2 = {
    AnyMuscleModel &MusMdl = ..MuscleParametersCervicalSpineLeft.LongissimusCervicisT2C2Par;
    AnyRefNode &Org = ..SegmentsThorax.ThoraxSeg.LongissimusCervicisT2NodeL;
    AnyRefNode &Ins = ..SegmentsCervicalSpine.C2Seg.LongissimusCervicisT2C2NodeL;
    AnyDrawMuscle DrwMus = {#include "../drawSettings/MusDrawSettings.any"};
  };

  AnyMuscleViaPoint LongissimusCervicisT2C3 = {
    AnyMuscleModel &MusMdl = ..MuscleParametersCervicalSpineLeft.LongissimusCervicisT2C3Par;
    AnyRefNode &Org = ..SegmentsThorax.ThoraxSeg.LongissimusCervicisT2NodeL;
    AnyRefNode &Ins = ..SegmentsCervicalSpine.C3Seg.LongissimusCervicisT2C3NodeL;
    AnyDrawMuscle DrwMus = {#include "../drawSettings/MusDrawSettings.any"};
  };

  AnyMuscleViaPoint LongissimusCervicisT2C4 = {
    AnyMuscleModel &MusMdl = ..MuscleParametersCervicalSpineLeft.LongissimusCervicisT2C4Par;
    AnyRefNode &Org = ..SegmentsThorax.ThoraxSeg.LongissimusCervicisT2NodeL;
    AnyRefNode &Ins = ..SegmentsCervicalSpine.C4Seg.LongissimusCervicisT2C4NodeL;
    AnyDrawMuscle DrwMus = {#include "../drawSettings/MusDrawSettings.any"};
  };

  AnyMuscleViaPoint LongissimusCervicisT2C5 = {
    AnyMuscleModel &MusMdl = ..MuscleParametersCervicalSpineLeft.LongissimusCervicisT2C5Par;
    AnyRefNode &Org = ..SegmentsThorax.ThoraxSeg.LongissimusCervicisT2NodeL;
    AnyRefNode &Ins = ..SegmentsCervicalSpine.C5Seg.LongissimusCervicisT2C5NodeL;
    AnyDrawMuscle DrwMus = {#include "../drawSettings/MusDrawSettings.any"};
  };

  AnyMuscleViaPoint LongissimusCervicisT2C6 = {
    AnyMuscleModel &MusMdl = ..MuscleParametersCervicalSpineLeft.LongissimusCervicisT2C6Par;
    AnyRefNode &Org = ..SegmentsThorax.ThoraxSeg.LongissimusCervicisT2NodeL;
    AnyRefNode &Ins = ..SegmentsCervicalSpine.C6Seg.LongissimusCervicisT2C6NodeL;
    AnyDrawMuscle DrwMus = {#include "../drawSettings/MusDrawSettings.any"};
  };

  AnyMuscleViaPoint LongissimusCervicisT2C7 = {
    AnyMuscleModel &MusMdl = ..MuscleParametersCervicalSpineLeft.LongissimusCervicisT2C7Par;
    AnyRefNode &Org = ..SegmentsThorax.ThoraxSeg.LongissimusCervicisT2NodeL;
    AnyRefNode &Ins = ..SegmentsCervicalSpine.C7Seg.LongissimusCervicisT2C7NodeL;
    AnyDrawMuscle DrwMus = {#include "../drawSettings/MusDrawSettings.any"};
  };

  AnyMuscleViaPoint MultifidusCervicisC5C2 = {
    AnyMuscleModel &MusMdl = ..MuscleParametersCervicalSpineLeft.MultifidusCervicisC5C2Par;
    AnyRefNode &Org = ..SegmentsCervicalSpine.C5Seg.MultifidusCervicisC5C2NodeL;
    AnyRefNode &Ins = ..SegmentsCervicalSpine.C2Seg.MultifidusCervicisC2NodeL;
    AnyDrawMuscle DrwMus = {#include "../drawSettings/MusDrawSettings.any"};
  };

  AnyMuscleViaPoint MultifidusCervicisC6C2 = {
    AnyMuscleModel &MusMdl = ..MuscleParametersCervicalSpineLeft.MultifidusCervicisC6C2Par;
    AnyRefNode &Org = ..SegmentsCervicalSpine.C6Seg.MultifidusCervicisC6C2NodeL;
    AnyRefNode &Ins = ..SegmentsCervicalSpine.C2Seg.MultifidusCervicisC2NodeL;
    AnyDrawMuscle DrwMus = {#include "../drawSettings/MusDrawSettings.any"};
  };

  AnyMuscleViaPoint MultifidusCervicisC6C3 = {
    AnyMuscleModel &MusMdl = ..MuscleParametersCervicalSpineLeft.MultifidusCervicisC6C3Par;
    AnyRefNode &Org = ..SegmentsCervicalSpine.C6Seg.MultifidusCervicisC6C2NodeL;
    AnyRefNode &Ins = ..SegmentsCervicalSpine.C3Seg.MultifidusCervicisC3NodeL;
    AnyDrawMuscle DrwMus = {#include "../drawSettings/MusDrawSettings.any"};
  };

  AnyMuscleViaPoint MultifidusCervicisC7C3 = {
    AnyMuscleModel &MusMdl = ..MuscleParametersCervicalSpineLeft.MultifidusCervicisC7C3Par;
    AnyRefNode &Org = ..SegmentsCervicalSpine.C7Seg.MultifidusCervicisC7C3NodeL;
    AnyRefNode &Ins = ..SegmentsCervicalSpine.C3Seg.MultifidusCervicisC3NodeL;
    AnyDrawMuscle DrwMus = {#include "../drawSettings/MusDrawSettings.any"};
  };

  AnyMuscleViaPoint MultifidusCervicisC7C4 = {
    AnyMuscleModel &MusMdl = ..MuscleParametersCervicalSpineLeft.MultifidusCervicisC7C4Par;
    AnyRefNode &Org = ..SegmentsCervicalSpine.C7Seg.MultifidusCervicisC7C4NodeL;
    AnyRefNode &Ins = ..SegmentsCervicalSpine.C4Seg.MultifidusCervicisC4NodeL;
    AnyDrawMuscle DrwMus = {#include "../drawSettings/MusDrawSettings.any"};
  };

  AnyMuscleViaPoint MultifidusCervicisT1C4 = {
    AnyMuscleModel &MusMdl = ..MuscleParametersCervicalSpineLeft.MultifidusCervicisT1C4Par;
    AnyRefNode &Org = ..SegmentsThorax.ThoraxSeg.MultifidusCervicisT1C4NodeL;
    AnyRefNode &Ins = ..SegmentsCervicalSpine.C4Seg.MultifidusCervicisC4NodeL;
    AnyDrawMuscle DrwMus = {#include "../drawSettings/MusDrawSettings.any"};
  };

  AnyMuscleViaPoint MultifidusCervicisT1C5 = {
    AnyMuscleModel &MusMdl = ..MuscleParametersCervicalSpineLeft.MultifidusCervicisT1C5Par;
    AnyRefNode &Org = ..SegmentsThorax.ThoraxSeg.MultifidusCervicisT1C5NodeL;
    AnyRefNode &Ins = ..SegmentsCervicalSpine.C5Seg.MultifidusCervicisC5NodeL;
    AnyDrawMuscle DrwMus = {#include "../drawSettings/MusDrawSettings.any"};
  };

  AnyMuscleViaPoint MultifidusCervicisT2C5 = {
    AnyMuscleModel &MusMdl = ..MuscleParametersCervicalSpineLeft.MultifidusCervicisT2C5Par;
    AnyRefNode &Org = ..SegmentsThorax.ThoraxSeg.MultifidusCervicisT2C5NodeL;
    AnyRefNode &Ins = ..SegmentsCervicalSpine.C5Seg.MultifidusCervicisC5NodeL;
    AnyDrawMuscle DrwMus = {#include "../drawSettings/MusDrawSettings.any"};
  };

  AnyMuscleViaPoint MultifidusCervicisT2C6 = {
    AnyMuscleModel &MusMdl = ..MuscleParametersCervicalSpineLeft.MultifidusCervicisT2C6Par;
    AnyRefNode &Org = ..SegmentsThorax.ThoraxSeg.MultifidusCervicisT2C6NodeL;
    AnyRefNode &Ins = ..SegmentsCervicalSpine.C6Seg.MultifidusCervicisC6NodeL;
    AnyDrawMuscle DrwMus = {#include "../drawSettings/MusDrawSettings.any"};
  };

  AnyMuscleViaPoint MultifidusCervicisT3C6 = {
    AnyMuscleModel &MusMdl = ..MuscleParametersCervicalSpineLeft.MultifidusCervicisT3C6Par;
    AnyRefNode &Org = ..SegmentsThorax.ThoraxSeg.MultifidusCervicisT3C6NodeL;
    AnyRefNode &Ins = ..SegmentsCervicalSpine.C6Seg.MultifidusCervicisC6NodeL;
    AnyDrawMuscle DrwMus = {#include "../drawSettings/MusDrawSettings.any"};
  };

  AnyMuscleViaPoint MultifidusCervicisT3C7 = {
    AnyMuscleModel &MusMdl = ..MuscleParametersCervicalSpineLeft.MultifidusCervicisT3C7Par;
    AnyRefNode &Org = ..SegmentsThorax.ThoraxSeg.MultifidusCervicisT3C7NodeL;
    AnyRefNode &Ins = ..SegmentsCervicalSpine.C7Seg.MultifidusCervicisC7NodeL;
    AnyDrawMuscle DrwMus = {#include "../drawSettings/MusDrawSettings.any"};
  };

  AnyMuscleViaPoint MultifidusCervicisT4C7 = {
    AnyMuscleModel &MusMdl = ..MuscleParametersCervicalSpineLeft.MultifidusCervicisT4C7Par;
    AnyRefNode &Org = ..SegmentsThorax.ThoraxSeg.MultifidusCervicisT4C7NodeL;
    AnyRefNode &Ins = ..SegmentsCervicalSpine.C7Seg.MultifidusCervicisC7NodeL;
    AnyDrawMuscle DrwMus = {#include "../drawSettings/MusDrawSettings.any"};
  };

}; //End of MusclesCervicalSpineLeft
