 SegmentsLumbar.L1Seg = {
  AnyRefNode MFL1T8NodeR  = {sRel = .Scale(.Data.MFL1T8NodeR_pos); };
  AnyRefNode MFL1T8NodeL  = {sRel = .Scale(.Data.MFL1T8NodeL_pos); };
  AnyRefNode MFL1T9NodeR  = {sRel = .Scale(.Data.MFL1T9NodeR_pos); };
  AnyRefNode MFL1T9NodeL  = {sRel = .Scale(.Data.MFL1T9NodeL_pos); };
  AnyRefNode MFL1T10NodeR = {sRel = .Scale(.Data.MFL1T10NodeR_pos); };
  AnyRefNode MFL1T10NodeL = {sRel = .Scale(.Data.MFL1T10NodeL_pos); };

  AnyRefNode SPL1T3Node = {sRel = .Scale(.Data.SPL1T3Node_pos);};
  AnyRefNode SPL1T4Node = {sRel = .Scale(.Data.SPL1T4Node_pos);};
  AnyRefNode SPL1T5Node = {sRel = .Scale(.Data.SPL1T5Node_pos);};

  AnyRefNode SEL1T8NodeR  = {sRel = .Scale(.Data.SEL1T8NodeR_pos);};
  AnyRefNode SEL1T8NodeL  = {sRel = .Scale(.Data.SEL1T8NodeL_pos);};
  AnyRefNode SEL1T10NodeR = {sRel = .Scale(.Data.SEL1T10NodeR_pos);};
  AnyRefNode SEL1T10NodeL = {sRel = .Scale(.Data.SEL1T10NodeL_pos);};
  AnyRefNode SEL1T11NodeR = {sRel = .Scale(.Data.SEL1T11NodeR_pos);};
  AnyRefNode SEL1T11NodeL = {sRel = .Scale(.Data.SEL1T11NodeL_pos);};

};

SegmentsLumbar.L2Seg = {
  AnyRefNode MFL2T9NodeR  = {sRel = .Scale(.Data.MFL2T9NodeR_pos);};
  AnyRefNode MFL2T9NodeL  = {sRel = .Scale(.Data.MFL2T9NodeL_pos);};
  AnyRefNode MFL2T10NodeR = {sRel = .Scale(.Data.MFL2T10NodeR_pos);};
  AnyRefNode MFL2T10NodeL = {sRel = .Scale(.Data.MFL2T10NodeL_pos);};
  AnyRefNode MFL2T11NodeR = {sRel = .Scale(.Data.MFL2T11NodeR_pos);};
  AnyRefNode MFL2T11NodeL = {sRel = .Scale(.Data.MFL2T11NodeL_pos);};

  AnyRefNode SEL2T9NodeR  = {sRel = .Scale(.Data.SEL2T9NodeR_pos);};
  AnyRefNode SEL2T9NodeL  = {sRel = .Scale(.Data.SEL2T9NodeL_pos);};
  AnyRefNode SEL2T10NodeR = {sRel = .Scale(.Data.SEL2T10NodeR_pos);};
  AnyRefNode SEL2T10NodeL = {sRel = .Scale(.Data.SEL2T10NodeL_pos);};
  AnyRefNode SEL2T11NodeR = {sRel = .Scale(.Data.SEL2T11NodeR_pos);};
  AnyRefNode SEL2T11NodeL = {sRel = .Scale(.Data.SEL2T11NodeL_pos);};
  AnyRefNode SEL2T12NodeR = {sRel = .Scale(.Data.SEL2T12NodeR_pos);};
  AnyRefNode SEL2T12NodeL = {sRel = .Scale(.Data.SEL2T12NodeL_pos);};

};

SegmentsLumbar.L3Seg = {
  AnyRefNode MFL3T10NodeR = {sRel = .Scale(.Data.MFL3T10NodeR_pos);};
  AnyRefNode MFL3T10NodeL = {sRel = .Scale(.Data.MFL3T10NodeL_pos);};
  AnyRefNode MFL3T11NodeR = {sRel = .Scale(.Data.MFL3T11NodeR_pos);};
  AnyRefNode MFL3T11NodeL = {sRel = .Scale(.Data.MFL3T11NodeL_pos);};
  AnyRefNode MFL3T12NodeR = {sRel = .Scale(.Data.MFL3T12NodeR_pos);};
  AnyRefNode MFL3T12NodeL = {sRel = .Scale(.Data.MFL3T12NodeL_pos);};

  AnyRefNode SEL3T11NodeR = {sRel = .Scale(.Data.SEL3T11NodeR_pos);};
  AnyRefNode SEL3T11NodeL = {sRel = .Scale(.Data.SEL3T11NodeL_pos);};
  AnyRefNode SEL3T12NodeR = {sRel = .Scale(.Data.SEL3T12NodeR_pos);};
  AnyRefNode SEL3T12NodeL = {sRel = .Scale(.Data.SEL3T12NodeL_pos);};

};

SegmentsLumbar.L4Seg = {
  AnyRefNode MFL4T11NodeR = {sRel = .Scale(.Data.MFL4T11NodeR_pos);};
  AnyRefNode MFL4T11NodeL = {sRel = .Scale(.Data.MFL4T11NodeL_pos);};
  AnyRefNode MFL4T12NodeR = {sRel = .Scale(.Data.MFL4T12NodeR_pos);};
  AnyRefNode MFL4T12NodeL = {sRel = .Scale(.Data.MFL4T12NodeL_pos);};

};

SegmentsLumbar.L5Seg = {
  AnyRefNode MFL5T12NodeR = {sRel = .Scale(.Data.MFL5T12NodeR_pos);};
  AnyRefNode MFL5T12NodeL = {sRel = .Scale(.Data.MFL5T12NodeL_pos);};

};


SegmentsThorax.ThoraxSeg = {
  AnyRefNode MFL1T8NodeR  = {sRel = .Scale(.Data.MFL1T8NodeR_pos);};
  AnyRefNode MFL1T8NodeL  = {sRel = .Scale(.Data.MFL1T8NodeL_pos);};
  AnyRefNode MFL1T9NodeR  = {sRel = .Scale(.Data.MFL1T9NodeR_pos);};
  AnyRefNode MFL1T9NodeL  = {sRel = .Scale(.Data.MFL1T9NodeL_pos);};
  AnyRefNode MFL1T10NodeR = {sRel = .Scale(.Data.MFL1T10NodeR_pos);};
  AnyRefNode MFL1T10NodeL = {sRel = .Scale(.Data.MFL1T10NodeL_pos);};
  AnyRefNode MFL2T9NodeR  = {sRel = .Scale(.Data.MFL2T9NodeR_pos);};
  AnyRefNode MFL2T9NodeL  = {sRel = .Scale(.Data.MFL2T9NodeL_pos);};
  AnyRefNode MFL2T10NodeR = {sRel = .Scale(.Data.MFL2T10NodeR_pos);};
  AnyRefNode MFL2T10NodeL = {sRel = .Scale(.Data.MFL2T10NodeL_pos);};
  AnyRefNode MFL2T11NodeR = {sRel = .Scale(.Data.MFL2T11NodeR_pos);};
  AnyRefNode MFL2T11NodeL = {sRel = .Scale(.Data.MFL2T11NodeL_pos);};
  AnyRefNode MFL3T10NodeR = {sRel = .Scale(.Data.MFL3T10NodeR_pos);};
  AnyRefNode MFL3T10NodeL = {sRel = .Scale(.Data.MFL3T10NodeL_pos);};
  AnyRefNode MFL3T11NodeR = {sRel = .Scale(.Data.MFL3T11NodeR_pos);};
  AnyRefNode MFL3T11NodeL = {sRel = .Scale(.Data.MFL3T11NodeL_pos);};
  AnyRefNode MFL3T12NodeR = {sRel = .Scale(.Data.MFL3T12NodeR_pos);};
  AnyRefNode MFL3T12NodeL = {sRel = .Scale(.Data.MFL3T12NodeL_pos);};
  AnyRefNode MFL4T11NodeR = {sRel = .Scale(.Data.MFL4T11NodeR_pos);};
  AnyRefNode MFL4T11NodeL = {sRel = .Scale(.Data.MFL4T11NodeL_pos);};
  AnyRefNode MFL4T12NodeR = {sRel = .Scale(.Data.MFL4T12NodeR_pos);};
  AnyRefNode MFL4T12NodeL = {sRel = .Scale(.Data.MFL4T12NodeL_pos);};
  AnyRefNode MFL5T12NodeR = {sRel = .Scale(.Data.MFL5T12NodeR_pos);};
  AnyRefNode MFL5T12NodeL = {sRel = .Scale(.Data.MFL5T12NodeL_pos);};
  AnyRefNode SPL1T5Node   = {sRel = .Scale(.Data.SPL1T5Node_pos);};
  AnyRefNode SPL1T4Node   = {sRel = .Scale(.Data.SPL1T4Node_pos);};
  AnyRefNode SPL1T3Node   = {sRel = .Scale(.Data.SPL1T3Node_pos);};
  AnyRefNode SEL1T8NodeR  = {sRel = .Scale(.Data.SEL1T8NodeR_pos);};
  AnyRefNode SEL1T8NodeL  = {sRel = .Scale(.Data.SEL1T8NodeL_pos);};
  AnyRefNode SEL1T10NodeR = {sRel = .Scale(.Data.SEL1T10NodeR_pos);};
  AnyRefNode SEL1T10NodeL = {sRel = .Scale(.Data.SEL1T10NodeL_pos);};
  AnyRefNode SEL1T11NodeR = {sRel = .Scale(.Data.SEL1T11NodeR_pos);};
  AnyRefNode SEL1T11NodeL = {sRel = .Scale(.Data.SEL1T11NodeL_pos);};
  AnyRefNode SEL2T9NodeR  = {sRel = .Scale(.Data.SEL2T9NodeR_pos);};
  AnyRefNode SEL2T9NodeL  = {sRel = .Scale(.Data.SEL2T9NodeL_pos);};
  AnyRefNode SEL2T10NodeR = {sRel = .Scale(.Data.SEL2T10NodeR_pos);};
  AnyRefNode SEL2T10NodeL = {sRel = .Scale(.Data.SEL2T10NodeL_pos);};
  AnyRefNode SEL2T11NodeR = {sRel = .Scale(.Data.SEL2T11NodeR_pos);};
  AnyRefNode SEL2T11NodeL = {sRel = .Scale(.Data.SEL2T11NodeL_pos);};
  AnyRefNode SEL2T12NodeR = {sRel = .Scale(.Data.SEL2T12NodeR_pos);};
  AnyRefNode SEL2T12NodeL = {sRel = .Scale(.Data.SEL2T12NodeL_pos);};
  AnyRefNode SEL3T11NodeR = {sRel = .Scale(.Data.SEL3T11NodeR_pos);};
  AnyRefNode SEL3T11NodeL = {sRel = .Scale(.Data.SEL3T11NodeL_pos);};
  AnyRefNode SEL3T12NodeR = {sRel = .Scale(.Data.SEL3T12NodeR_pos);};
  AnyRefNode SEL3T12NodeL = {sRel = .Scale(.Data.SEL3T12NodeL_pos);};

};
