/*
Include file with Quadratus Lumborum definitions.

Mark de Zee (23-04-2003)
*/

AnyFolder QuadratusLumborum = {

  AnyMuscleViaPoint QLC12_CI = {
    AnyMuscleModel &MusMdl = ...MuscleParametersSpineRight.QuadratusLumborumParameter.QLC12_CIPar;
    AnyRefNode &Org = ...SegmentsThorax.ThoraxSeg.QLC12_CINodeR;
    AnyRefNode &Ins = ...SegmentsLumbar.PelvisSeg.QLNodeR;
     AnyDrawMuscle DrwMus = {#include "../drawSettings/MusDrawSettings.any"};
  };

  AnyMuscleViaPoint QLL1_CI = {
    AnyMuscleModel &MusMdl = ...MuscleParametersSpineRight.QuadratusLumborumParameter.QLL1_CIPar;
    AnyRefNode &Org = ...SegmentsLumbar.L1Seg.QLL1_CINodeR;
    AnyRefNode &Ins = ...SegmentsLumbar.PelvisSeg.QLNodeR;
     AnyDrawMuscle DrwMus = {#include "../drawSettings/MusDrawSettings.any"};
  };

  AnyMuscleViaPoint QLL2_CI = {
    AnyMuscleModel &MusMdl = ...MuscleParametersSpineRight.QuadratusLumborumParameter.QLL2_CIPar;
    AnyRefNode &Org = ...SegmentsLumbar.L2Seg.QLL2_CINodeR;
    AnyRefNode &Ins = ...SegmentsLumbar.PelvisSeg.QLNodeR;
     AnyDrawMuscle DrwMus = {#include "../drawSettings/MusDrawSettings.any"};
  };

  AnyMuscleViaPoint QLL3_CI = {
    AnyMuscleModel &MusMdl = ...MuscleParametersSpineRight.QuadratusLumborumParameter.QLL3_CIPar;
    AnyRefNode &Org = ...SegmentsLumbar.L3Seg.QLL3_CINodeR;
    AnyRefNode &Ins = ...SegmentsLumbar.PelvisSeg.QLNodeR;
     AnyDrawMuscle DrwMus = {#include "../drawSettings/MusDrawSettings.any"};
  };

  AnyMuscleViaPoint QLL4_CI = {
    AnyMuscleModel &MusMdl = ...MuscleParametersSpineRight.QuadratusLumborumParameter.QLL4_CIPar;
    AnyRefNode &Org = ...SegmentsLumbar.L4Seg.QLL4_CINodeR;
    AnyRefNode &Ins = ...SegmentsLumbar.PelvisSeg.QLNodeR;
     AnyDrawMuscle DrwMus = {#include "../drawSettings/MusDrawSettings.any"};
  };

};
