AnyFolder ThoracicMultifidiLeft = {

AnyMuscleViaPoint MFL1T8 =
{
  AnyMuscleModel &MusMdl = ...MuscleParametersSpineLeft.ThoracicMultifidiParameter.MFL1T8Par;
  AnyRefFrame &Org = ...SegmentsLumbar.L1Seg.MFL1T8NodeL;
  AnyRefFrame &Ins = ...SegmentsThorax.ThoraxSeg.MFL1T8NodeL;
  AnyDrawMuscle DrwMus = {#include "../drawSettings/MusDrawSettings.any"};

};


AnyMuscleViaPoint MFL1T9 =
{
  AnyMuscleModel &MusMdl = ...MuscleParametersSpineLeft.ThoracicMultifidiParameter.MFL1T9Par;
  AnyRefFrame &Org = ...SegmentsLumbar.L1Seg.MFL1T9NodeL;
  AnyRefFrame &Ins = ...SegmentsThorax.ThoraxSeg.MFL1T9NodeL;
         AnyDrawMuscle DrwMus = {#include "../drawSettings/MusDrawSettings.any"};

};


AnyMuscleViaPoint MFL1T10 =
{
  AnyMuscleModel &MusMdl = ...MuscleParametersSpineLeft.ThoracicMultifidiParameter.MFL1T10Par;
  AnyRefFrame &Org = ...SegmentsLumbar.L1Seg.MFL1T10NodeL;
  AnyRefFrame &Ins = ...SegmentsThorax.ThoraxSeg.MFL1T10NodeL;
         AnyDrawMuscle DrwMus = {#include "../drawSettings/MusDrawSettings.any"};

};


AnyMuscleViaPoint MFL2T9 =
{
  AnyMuscleModel &MusMdl = ...MuscleParametersSpineLeft.ThoracicMultifidiParameter.MFL2T9Par;
  AnyRefFrame &Org = ...SegmentsLumbar.L2Seg.MFL2T9NodeL;
  AnyRefFrame &Ins = ...SegmentsThorax.ThoraxSeg.MFL2T9NodeL;
         AnyDrawMuscle DrwMus = {#include "../drawSettings/MusDrawSettings.any"};

};


AnyMuscleViaPoint MFL2T10 =
{
  AnyMuscleModel &MusMdl = ...MuscleParametersSpineLeft.ThoracicMultifidiParameter.MFL2T10Par;
  AnyRefFrame &Org = ...SegmentsLumbar.L2Seg.MFL2T10NodeL;
  AnyRefFrame &Ins = ...SegmentsThorax.ThoraxSeg.MFL2T10NodeL;
         AnyDrawMuscle DrwMus = {#include "../drawSettings/MusDrawSettings.any"};

};


AnyMuscleViaPoint MFL2T11 =
{
  AnyMuscleModel &MusMdl = ...MuscleParametersSpineLeft.ThoracicMultifidiParameter.MFL2T11Par;
  AnyRefFrame &Org = ...SegmentsLumbar.L2Seg.MFL2T11NodeL;
  AnyRefFrame &Ins = ...SegmentsThorax.ThoraxSeg.MFL2T11NodeL;
         AnyDrawMuscle DrwMus = {#include "../drawSettings/MusDrawSettings.any"};

};


AnyMuscleViaPoint MFL3T10 =
{
  AnyMuscleModel &MusMdl = ...MuscleParametersSpineLeft.ThoracicMultifidiParameter.MFL3T10Par;
  AnyRefFrame &Org = ...SegmentsLumbar.L3Seg.MFL3T10NodeL;
  AnyRefFrame &Ins = ...SegmentsThorax.ThoraxSeg.MFL3T10NodeL;
         AnyDrawMuscle DrwMus = {#include "../drawSettings/MusDrawSettings.any"};

};


AnyMuscleViaPoint MFL3T11 =
{
  AnyMuscleModel &MusMdl = ...MuscleParametersSpineLeft.ThoracicMultifidiParameter.MFL3T11Par;
  AnyRefFrame &Org = ...SegmentsLumbar.L3Seg.MFL3T11NodeL;
  AnyRefFrame &Ins = ...SegmentsThorax.ThoraxSeg.MFL3T11NodeL;
         AnyDrawMuscle DrwMus = {#include "../drawSettings/MusDrawSettings.any"};

};


AnyMuscleViaPoint MFL3T12 =
{
  AnyMuscleModel &MusMdl = ...MuscleParametersSpineLeft.ThoracicMultifidiParameter.MFL3T12Par;
  AnyRefFrame &Org = ...SegmentsLumbar.L3Seg.MFL3T12NodeL;
  AnyRefFrame &Ins = ...SegmentsThorax.ThoraxSeg.MFL3T12NodeL;
         AnyDrawMuscle DrwMus = {#include "../drawSettings/MusDrawSettings.any"};

};


AnyMuscleViaPoint MFL4T11 =
{
  AnyMuscleModel &MusMdl = ...MuscleParametersSpineLeft.ThoracicMultifidiParameter.MFL4T11Par;
  AnyRefFrame &Org = ...SegmentsLumbar.L4Seg.MFL4T11NodeL;
  AnyRefFrame &Ins = ...SegmentsThorax.ThoraxSeg.MFL4T11NodeL;
         AnyDrawMuscle DrwMus = {#include "../drawSettings/MusDrawSettings.any"};

};


AnyMuscleViaPoint MFL4T12 =
{
  AnyMuscleModel &MusMdl = ...MuscleParametersSpineLeft.ThoracicMultifidiParameter.MFL4T12Par;
  AnyRefFrame &Org = ...SegmentsLumbar.L4Seg.MFL4T12NodeL;
  AnyRefFrame &Ins = ...SegmentsThorax.ThoraxSeg.MFL4T12NodeL;
         AnyDrawMuscle DrwMus = {#include "../drawSettings/MusDrawSettings.any"};

};


AnyMuscleViaPoint MFL5T12 =
{
  AnyMuscleModel &MusMdl = ...MuscleParametersSpineLeft.ThoracicMultifidiParameter.MFL5T12Par;
  AnyRefFrame &Org = ...SegmentsLumbar.L5Seg.MFL5T12NodeL;
  AnyRefFrame &Ins = ...SegmentsThorax.ThoraxSeg.MFL5T12NodeL;
         AnyDrawMuscle DrwMus = {#include "../drawSettings/MusDrawSettings.any"};

};
};
