AnyFolder PelvisSeg = {
AnyFloat AnatomicalFrame_pos = Main.HumanModel.BodyModel.Trunk.SegmentsLumbar.PelvisSeg.AnatomicalFrame.sRel;
AnyFloat HipJointsCenterTD_pos = Main.HumanModel.BodyModel.Trunk.SegmentsLumbar.PelvisSeg.HipJointsCenterTD.sRel;
AnyFloat PelvisAnatomicalFrame_pos = Main.HumanModel.BodyModel.Trunk.SegmentsLumbar.PelvisSeg.PelvisAnatomicalFrame.sRel;
AnyFloat GroundPelvisJntNode_pos = Main.HumanModel.BodyModel.Trunk.SegmentsLumbar.PelvisSeg.GroundPelvisJntNode.sRel;
AnyFloat L5PelvisJntNode_pos = Main.HumanModel.BodyModel.Trunk.SegmentsLumbar.PelvisSeg.L5PelvisJntNode.sRel;
AnyFloat PelvisSacrumJntNode_pos = Main.HumanModel.BodyModel.Trunk.SegmentsLumbar.PelvisSeg.PelvisSacrumJntNode.sRel;
AnyFloat Right_pos = Main.HumanModel.BodyModel.Trunk.SegmentsLumbar.PelvisSeg.Right.sRel;
AnyFloat Left_pos = Main.HumanModel.BodyModel.Trunk.SegmentsLumbar.PelvisSeg.Left.sRel;
AnyFloat ALLNodeSuperior_pos = Main.HumanModel.BodyModel.Trunk.SegmentsLumbar.PelvisSeg.ALLNodeSuperior.sRel;
AnyFloat PLLNodeSuperior_pos = Main.HumanModel.BodyModel.Trunk.SegmentsLumbar.PelvisSeg.PLLNodeSuperior.sRel;
AnyFloat MFdL4S1NodeR_pos = Main.HumanModel.BodyModel.Trunk.SegmentsLumbar.PelvisSeg.MFdL4S1NodeR.sRel;
AnyFloat MFdL4S1NodeL_pos = Main.HumanModel.BodyModel.Trunk.SegmentsLumbar.PelvisSeg.MFdL4S1NodeL.sRel;
AnyFloat MFdL5S1NodeR_pos = Main.HumanModel.BodyModel.Trunk.SegmentsLumbar.PelvisSeg.MFdL5S1NodeR.sRel;
AnyFloat MFdL5S1NodeL_pos = Main.HumanModel.BodyModel.Trunk.SegmentsLumbar.PelvisSeg.MFdL5S1NodeL.sRel;
AnyFloat MFmL3S1NodeR_pos = Main.HumanModel.BodyModel.Trunk.SegmentsLumbar.PelvisSeg.MFmL3S1NodeR.sRel;
AnyFloat MFmL3S1NodeL_pos = Main.HumanModel.BodyModel.Trunk.SegmentsLumbar.PelvisSeg.MFmL3S1NodeL.sRel;
AnyFloat MFmL4SacrumNodeR_pos = Main.HumanModel.BodyModel.Trunk.SegmentsLumbar.PelvisSeg.MFmL4SacrumNodeR.sRel;
AnyFloat MFmL4SacrumNodeL_pos = Main.HumanModel.BodyModel.Trunk.SegmentsLumbar.PelvisSeg.MFmL4SacrumNodeL.sRel;
AnyFloat MFmL5SacrumNodeR_pos = Main.HumanModel.BodyModel.Trunk.SegmentsLumbar.PelvisSeg.MFmL5SacrumNodeR.sRel;
AnyFloat MFmL5SacrumNodeL_pos = Main.HumanModel.BodyModel.Trunk.SegmentsLumbar.PelvisSeg.MFmL5SacrumNodeL.sRel;
AnyFloat MFtsL1S1NodeR_pos = Main.HumanModel.BodyModel.Trunk.SegmentsLumbar.PelvisSeg.MFtsL1S1NodeR.sRel;
AnyFloat MFtsL1S1NodeL_pos = Main.HumanModel.BodyModel.Trunk.SegmentsLumbar.PelvisSeg.MFtsL1S1NodeL.sRel;
AnyFloat MFtsL2S1NodeR_pos = Main.HumanModel.BodyModel.Trunk.SegmentsLumbar.PelvisSeg.MFtsL2S1NodeR.sRel;
AnyFloat MFtsL2S1NodeL_pos = Main.HumanModel.BodyModel.Trunk.SegmentsLumbar.PelvisSeg.MFtsL2S1NodeL.sRel;
AnyFloat MFtsL3LigamentNodeR_pos = Main.HumanModel.BodyModel.Trunk.SegmentsLumbar.PelvisSeg.MFtsL3LigamentNodeR.sRel;
AnyFloat MFtsL3LigamentNodeL_pos = Main.HumanModel.BodyModel.Trunk.SegmentsLumbar.PelvisSeg.MFtsL3LigamentNodeL.sRel;
AnyFloat MFtsL4SacrumNodeR_pos = Main.HumanModel.BodyModel.Trunk.SegmentsLumbar.PelvisSeg.MFtsL4SacrumNodeR.sRel;
AnyFloat MFtsL4SacrumNodeL_pos = Main.HumanModel.BodyModel.Trunk.SegmentsLumbar.PelvisSeg.MFtsL4SacrumNodeL.sRel;
AnyFloat MFtsL5SacrumNodeR_pos = Main.HumanModel.BodyModel.Trunk.SegmentsLumbar.PelvisSeg.MFtsL5SacrumNodeR.sRel;
AnyFloat MFtsL5SacrumNodeL_pos = Main.HumanModel.BodyModel.Trunk.SegmentsLumbar.PelvisSeg.MFtsL5SacrumNodeL.sRel;
AnyFloat MFtstL1SIPSNodeR_pos = Main.HumanModel.BodyModel.Trunk.SegmentsLumbar.PelvisSeg.MFtstL1SIPSNodeR.sRel;
AnyFloat MFtstL1SIPSNodeL_pos = Main.HumanModel.BodyModel.Trunk.SegmentsLumbar.PelvisSeg.MFtstL1SIPSNodeL.sRel;
AnyFloat MFtstL2SIPSNodeR_pos = Main.HumanModel.BodyModel.Trunk.SegmentsLumbar.PelvisSeg.MFtstL2SIPSNodeR.sRel;
AnyFloat MFtstL2SIPSNodeL_pos = Main.HumanModel.BodyModel.Trunk.SegmentsLumbar.PelvisSeg.MFtstL2SIPSNodeL.sRel;
AnyFloat ILplL1CINodeR_pos = Main.HumanModel.BodyModel.Trunk.SegmentsLumbar.PelvisSeg.ILplL1CINodeR.sRel;
AnyFloat ILplL1CINodeL_pos = Main.HumanModel.BodyModel.Trunk.SegmentsLumbar.PelvisSeg.ILplL1CINodeL.sRel;
AnyFloat ILplL2CINodeR_pos = Main.HumanModel.BodyModel.Trunk.SegmentsLumbar.PelvisSeg.ILplL2CINodeR.sRel;
AnyFloat ILplL2CINodeL_pos = Main.HumanModel.BodyModel.Trunk.SegmentsLumbar.PelvisSeg.ILplL2CINodeL.sRel;
AnyFloat ILplL3CINodeR_pos = Main.HumanModel.BodyModel.Trunk.SegmentsLumbar.PelvisSeg.ILplL3CINodeR.sRel;
AnyFloat ILplL3CINodeL_pos = Main.HumanModel.BodyModel.Trunk.SegmentsLumbar.PelvisSeg.ILplL3CINodeL.sRel;
AnyFloat ILplL4CINodeR_pos = Main.HumanModel.BodyModel.Trunk.SegmentsLumbar.PelvisSeg.ILplL4CINodeR.sRel;
AnyFloat ILplL4CINodeL_pos = Main.HumanModel.BodyModel.Trunk.SegmentsLumbar.PelvisSeg.ILplL4CINodeL.sRel;
AnyFloat LTplL1SIPSNodeR_pos = Main.HumanModel.BodyModel.Trunk.SegmentsLumbar.PelvisSeg.LTplL1SIPSNodeR.sRel;
AnyFloat LTplL1SIPSNodeL_pos = Main.HumanModel.BodyModel.Trunk.SegmentsLumbar.PelvisSeg.LTplL1SIPSNodeL.sRel;
AnyFloat LTplL2SIPSNodeR_pos = Main.HumanModel.BodyModel.Trunk.SegmentsLumbar.PelvisSeg.LTplL2SIPSNodeR.sRel;
AnyFloat LTplL2SIPSNodeL_pos = Main.HumanModel.BodyModel.Trunk.SegmentsLumbar.PelvisSeg.LTplL2SIPSNodeL.sRel;
AnyFloat LTplL3SIPSNodeR_pos = Main.HumanModel.BodyModel.Trunk.SegmentsLumbar.PelvisSeg.LTplL3SIPSNodeR.sRel;
AnyFloat LTplL3SIPSNodeL_pos = Main.HumanModel.BodyModel.Trunk.SegmentsLumbar.PelvisSeg.LTplL3SIPSNodeL.sRel;
AnyFloat LTplL4SIPSNodeR_pos = Main.HumanModel.BodyModel.Trunk.SegmentsLumbar.PelvisSeg.LTplL4SIPSNodeR.sRel;
AnyFloat LTplL4SIPSNodeL_pos = Main.HumanModel.BodyModel.Trunk.SegmentsLumbar.PelvisSeg.LTplL4SIPSNodeL.sRel;
AnyFloat LTplL5IliumNodeR_pos = Main.HumanModel.BodyModel.Trunk.SegmentsLumbar.PelvisSeg.LTplL5IliumNodeR.sRel;
AnyFloat LTplL5IliumNodeL_pos = Main.HumanModel.BodyModel.Trunk.SegmentsLumbar.PelvisSeg.LTplL5IliumNodeL.sRel;
AnyFloat ILptC5SIPSNodeR_pos = Main.HumanModel.BodyModel.Trunk.SegmentsLumbar.PelvisSeg.ILptC5SIPSNodeR.sRel;
AnyFloat ILptC5SIPSNodeL_pos = Main.HumanModel.BodyModel.Trunk.SegmentsLumbar.PelvisSeg.ILptC5SIPSNodeL.sRel;
AnyFloat ILptC6SIPSNodeR_pos = Main.HumanModel.BodyModel.Trunk.SegmentsLumbar.PelvisSeg.ILptC6SIPSNodeR.sRel;
AnyFloat ILptC6SIPSNodeL_pos = Main.HumanModel.BodyModel.Trunk.SegmentsLumbar.PelvisSeg.ILptC6SIPSNodeL.sRel;
AnyFloat ILptC7CINodeR_pos = Main.HumanModel.BodyModel.Trunk.SegmentsLumbar.PelvisSeg.ILptC7CINodeR.sRel;
AnyFloat ILptC7CINodeL_pos = Main.HumanModel.BodyModel.Trunk.SegmentsLumbar.PelvisSeg.ILptC7CINodeL.sRel;
AnyFloat ILptC8CINodeR_pos = Main.HumanModel.BodyModel.Trunk.SegmentsLumbar.PelvisSeg.ILptC8CINodeR.sRel;
AnyFloat ILptC8CINodeL_pos = Main.HumanModel.BodyModel.Trunk.SegmentsLumbar.PelvisSeg.ILptC8CINodeL.sRel;
AnyFloat ILptC9CINodeR_pos = Main.HumanModel.BodyModel.Trunk.SegmentsLumbar.PelvisSeg.ILptC9CINodeR.sRel;
AnyFloat ILptC9CINodeL_pos = Main.HumanModel.BodyModel.Trunk.SegmentsLumbar.PelvisSeg.ILptC9CINodeL.sRel;
AnyFloat ILptC10CINodeR_pos = Main.HumanModel.BodyModel.Trunk.SegmentsLumbar.PelvisSeg.ILptC10CINodeR.sRel;
AnyFloat ILptC10CINodeL_pos = Main.HumanModel.BodyModel.Trunk.SegmentsLumbar.PelvisSeg.ILptC10CINodeL.sRel;
AnyFloat ILptC11CINodeR_pos = Main.HumanModel.BodyModel.Trunk.SegmentsLumbar.PelvisSeg.ILptC11CINodeR.sRel;
AnyFloat ILptC11CINodeL_pos = Main.HumanModel.BodyModel.Trunk.SegmentsLumbar.PelvisSeg.ILptC11CINodeL.sRel;
AnyFloat ILptC12CINodeR_pos = Main.HumanModel.BodyModel.Trunk.SegmentsLumbar.PelvisSeg.ILptC12CINodeR.sRel;
AnyFloat ILptC12CINodeL_pos = Main.HumanModel.BodyModel.Trunk.SegmentsLumbar.PelvisSeg.ILptC12CINodeL.sRel;
AnyFloat LTptT6S1NodeR_pos = Main.HumanModel.BodyModel.Trunk.SegmentsLumbar.PelvisSeg.LTptT6S1NodeR.sRel;
AnyFloat LTptT6S1NodeL_pos = Main.HumanModel.BodyModel.Trunk.SegmentsLumbar.PelvisSeg.LTptT6S1NodeL.sRel;
AnyFloat LTptT7S2NodeR_pos = Main.HumanModel.BodyModel.Trunk.SegmentsLumbar.PelvisSeg.LTptT7S2NodeR.sRel;
AnyFloat LTptT7S2NodeL_pos = Main.HumanModel.BodyModel.Trunk.SegmentsLumbar.PelvisSeg.LTptT7S2NodeL.sRel;
AnyFloat LTptT8S3NodeR_pos = Main.HumanModel.BodyModel.Trunk.SegmentsLumbar.PelvisSeg.LTptT8S3NodeR.sRel;
AnyFloat LTptT8S3NodeL_pos = Main.HumanModel.BodyModel.Trunk.SegmentsLumbar.PelvisSeg.LTptT8S3NodeL.sRel;
AnyFloat LTptT9S4NodeR_pos = Main.HumanModel.BodyModel.Trunk.SegmentsLumbar.PelvisSeg.LTptT9S4NodeR.sRel;
AnyFloat LTptT9S4NodeL_pos = Main.HumanModel.BodyModel.Trunk.SegmentsLumbar.PelvisSeg.LTptT9S4NodeL.sRel;
AnyFloat LTptT10SacrumNodeR_pos = Main.HumanModel.BodyModel.Trunk.SegmentsLumbar.PelvisSeg.LTptT10SacrumNodeR.sRel;
AnyFloat LTptT10SacrumNodeL_pos = Main.HumanModel.BodyModel.Trunk.SegmentsLumbar.PelvisSeg.LTptT10SacrumNodeL.sRel;
AnyFloat LTptT11SacrumNodeR_pos = Main.HumanModel.BodyModel.Trunk.SegmentsLumbar.PelvisSeg.LTptT11SacrumNodeR.sRel;
AnyFloat LTptT11SacrumNodeL_pos = Main.HumanModel.BodyModel.Trunk.SegmentsLumbar.PelvisSeg.LTptT11SacrumNodeL.sRel;
AnyFloat LTptT12SacrumNodeR_pos = Main.HumanModel.BodyModel.Trunk.SegmentsLumbar.PelvisSeg.LTptT12SacrumNodeR.sRel;
AnyFloat LTptT12SacrumNodeL_pos = Main.HumanModel.BodyModel.Trunk.SegmentsLumbar.PelvisSeg.LTptT12SacrumNodeL.sRel;
AnyFloat IliopubicEminenceViaNodeR_pos = Main.HumanModel.BodyModel.Trunk.SegmentsLumbar.PelvisSeg.IliopubicEminenceViaNodeR.sRel;
AnyFloat IliopubicEminenceViaNodeL_pos = Main.HumanModel.BodyModel.Trunk.SegmentsLumbar.PelvisSeg.IliopubicEminenceViaNodeL.sRel;
AnyFloat PMT12I_TMVia5NodeR_pos = Main.HumanModel.BodyModel.Trunk.SegmentsLumbar.PelvisSeg.PMT12I_TMVia5NodeR.sRel;
AnyFloat PMT12I_TMVia5NodeL_pos = Main.HumanModel.BodyModel.Trunk.SegmentsLumbar.PelvisSeg.PMT12I_TMVia5NodeL.sRel;
AnyFloat PML1I_TMVia4NodeR_pos = Main.HumanModel.BodyModel.Trunk.SegmentsLumbar.PelvisSeg.PML1I_TMVia4NodeR.sRel;
AnyFloat PML1I_TMVia4NodeL_pos = Main.HumanModel.BodyModel.Trunk.SegmentsLumbar.PelvisSeg.PML1I_TMVia4NodeL.sRel;
AnyFloat PML2I_TMVia3NodeR_pos = Main.HumanModel.BodyModel.Trunk.SegmentsLumbar.PelvisSeg.PML2I_TMVia3NodeR.sRel;
AnyFloat PML2I_TMVia3NodeL_pos = Main.HumanModel.BodyModel.Trunk.SegmentsLumbar.PelvisSeg.PML2I_TMVia3NodeL.sRel;
AnyFloat PML3I_TMVia2NodeR_pos = Main.HumanModel.BodyModel.Trunk.SegmentsLumbar.PelvisSeg.PML3I_TMVia2NodeR.sRel;
AnyFloat PML3I_TMVia2NodeL_pos = Main.HumanModel.BodyModel.Trunk.SegmentsLumbar.PelvisSeg.PML3I_TMVia2NodeL.sRel;
AnyFloat PML4I_TMVia1NodeR_pos = Main.HumanModel.BodyModel.Trunk.SegmentsLumbar.PelvisSeg.PML4I_TMVia1NodeR.sRel;
AnyFloat PML4I_TMVia1NodeL_pos = Main.HumanModel.BodyModel.Trunk.SegmentsLumbar.PelvisSeg.PML4I_TMVia1NodeL.sRel;
AnyFloat PML5_TMVia1NodeR_pos = Main.HumanModel.BodyModel.Trunk.SegmentsLumbar.PelvisSeg.PML5_TMVia1NodeR.sRel;
AnyFloat PML5_TMVia1NodeL_pos = Main.HumanModel.BodyModel.Trunk.SegmentsLumbar.PelvisSeg.PML5_TMVia1NodeL.sRel;
AnyFloat PML1T_TMVia5NodeR_pos = Main.HumanModel.BodyModel.Trunk.SegmentsLumbar.PelvisSeg.PML1T_TMVia5NodeR.sRel;
AnyFloat PML1T_TMVia5NodeL_pos = Main.HumanModel.BodyModel.Trunk.SegmentsLumbar.PelvisSeg.PML1T_TMVia5NodeL.sRel;
AnyFloat PML2T_TMVia4NodeR_pos = Main.HumanModel.BodyModel.Trunk.SegmentsLumbar.PelvisSeg.PML2T_TMVia4NodeR.sRel;
AnyFloat PML2T_TMVia4NodeL_pos = Main.HumanModel.BodyModel.Trunk.SegmentsLumbar.PelvisSeg.PML2T_TMVia4NodeL.sRel;
AnyFloat PML3T_TMVia3NodeR_pos = Main.HumanModel.BodyModel.Trunk.SegmentsLumbar.PelvisSeg.PML3T_TMVia3NodeR.sRel;
AnyFloat PML3T_TMVia3NodeL_pos = Main.HumanModel.BodyModel.Trunk.SegmentsLumbar.PelvisSeg.PML3T_TMVia3NodeL.sRel;
AnyFloat PML4T_TMVia2NodeR_pos = Main.HumanModel.BodyModel.Trunk.SegmentsLumbar.PelvisSeg.PML4T_TMVia2NodeR.sRel;
AnyFloat PML4T_TMVia2NodeL_pos = Main.HumanModel.BodyModel.Trunk.SegmentsLumbar.PelvisSeg.PML4T_TMVia2NodeL.sRel;
AnyFloat PML5T_TMVia1NodeR_pos = Main.HumanModel.BodyModel.Trunk.SegmentsLumbar.PelvisSeg.PML5T_TMVia1NodeR.sRel;
AnyFloat PML5T_TMVia1NodeL_pos = Main.HumanModel.BodyModel.Trunk.SegmentsLumbar.PelvisSeg.PML5T_TMVia1NodeL.sRel;
AnyFloat QLNodeR_pos = Main.HumanModel.BodyModel.Trunk.SegmentsLumbar.PelvisSeg.QLNodeR.sRel;
AnyFloat QLNodeL_pos = Main.HumanModel.BodyModel.Trunk.SegmentsLumbar.PelvisSeg.QLNodeL.sRel;
AnyFloat RANodeR_pos = Main.HumanModel.BodyModel.Trunk.SegmentsLumbar.PelvisSeg.RANodeR.sRel;
AnyFloat RANodeL_pos = Main.HumanModel.BodyModel.Trunk.SegmentsLumbar.PelvisSeg.RANodeL.sRel;
AnyFloat RANode_pos = Main.HumanModel.BodyModel.Trunk.SegmentsLumbar.PelvisSeg.RANode.sRel;
AnyFloat OEC11_CINodeR_pos = Main.HumanModel.BodyModel.Trunk.SegmentsLumbar.PelvisSeg.OEC11_CINodeR.sRel;
AnyFloat OEC11_CINodeL_pos = Main.HumanModel.BodyModel.Trunk.SegmentsLumbar.PelvisSeg.OEC11_CINodeL.sRel;
AnyFloat OEC12_CINodeR_pos = Main.HumanModel.BodyModel.Trunk.SegmentsLumbar.PelvisSeg.OEC12_CINodeR.sRel;
AnyFloat OEC12_CINodeL_pos = Main.HumanModel.BodyModel.Trunk.SegmentsLumbar.PelvisSeg.OEC12_CINodeL.sRel;
AnyFloat OICI_C12NodeR_pos = Main.HumanModel.BodyModel.Trunk.SegmentsLumbar.PelvisSeg.OICI_C12NodeR.sRel;
AnyFloat OICI_C12NodeL_pos = Main.HumanModel.BodyModel.Trunk.SegmentsLumbar.PelvisSeg.OICI_C12NodeL.sRel;
AnyFloat OICI_C11NodeR_pos = Main.HumanModel.BodyModel.Trunk.SegmentsLumbar.PelvisSeg.OICI_C11NodeR.sRel;
AnyFloat OICI_C11NodeL_pos = Main.HumanModel.BodyModel.Trunk.SegmentsLumbar.PelvisSeg.OICI_C11NodeL.sRel;
AnyFloat OICI_C10NodeR_pos = Main.HumanModel.BodyModel.Trunk.SegmentsLumbar.PelvisSeg.OICI_C10NodeR.sRel;
AnyFloat OICI_C10NodeL_pos = Main.HumanModel.BodyModel.Trunk.SegmentsLumbar.PelvisSeg.OICI_C10NodeL.sRel;
AnyFloat OICI_RS1NodeR_pos = Main.HumanModel.BodyModel.Trunk.SegmentsLumbar.PelvisSeg.OICI_RS1NodeR.sRel;
AnyFloat OICI_RS1NodeL_pos = Main.HumanModel.BodyModel.Trunk.SegmentsLumbar.PelvisSeg.OICI_RS1NodeL.sRel;
AnyFloat OICI_RS2NodeR_pos = Main.HumanModel.BodyModel.Trunk.SegmentsLumbar.PelvisSeg.OICI_RS2NodeR.sRel;
AnyFloat OICI_RS2NodeL_pos = Main.HumanModel.BodyModel.Trunk.SegmentsLumbar.PelvisSeg.OICI_RS2NodeL.sRel;
AnyFloat OICI_RS3NodeR_pos = Main.HumanModel.BodyModel.Trunk.SegmentsLumbar.PelvisSeg.OICI_RS3NodeR.sRel;
AnyFloat OICI_RS3NodeL_pos = Main.HumanModel.BodyModel.Trunk.SegmentsLumbar.PelvisSeg.OICI_RS3NodeL.sRel;
AnyFloat Tuber_ischiadicumR_pos = Main.HumanModel.BodyModel.Trunk.SegmentsLumbar.PelvisSeg.Tuber_ischiadicumR.sRel;
AnyFloat Tuber_ischiadicumL_pos = Main.HumanModel.BodyModel.Trunk.SegmentsLumbar.PelvisSeg.Tuber_ischiadicumL.sRel;
AnyFloat TuberIschiadicumCenter_pos = Main.HumanModel.BodyModel.Trunk.SegmentsLumbar.PelvisSeg.TuberIschiadicumCenter.sRel;
AnyFloat PosteriorRContactNode_pos = Main.HumanModel.BodyModel.Trunk.SegmentsLumbar.PelvisSeg.PosteriorRContactNode.sRel;
//AnyFloat PosteriorlContactNode_pos = Main.HumanModel.BodyModel.Trunk.SegmentsLumbar.PelvisSeg.PosteriorlContactNode.sRel;
AnyFloat Tuber_ischiadicum1RContactNode_pos = Main.HumanModel.BodyModel.Trunk.SegmentsLumbar.PelvisSeg.Tuber_ischiadicum1RContactNode.sRel;
AnyFloat Tuber_ischiadicum1LContactNode_pos = Main.HumanModel.BodyModel.Trunk.SegmentsLumbar.PelvisSeg.Tuber_ischiadicum1LContactNode.sRel;
AnyFloat Tuber_ischiadicum2RContactNode_pos = Main.HumanModel.BodyModel.Trunk.SegmentsLumbar.PelvisSeg.Tuber_ischiadicum2RContactNode.sRel;
AnyFloat Tuber_ischiadicum2MidContactNode_pos = Main.HumanModel.BodyModel.Trunk.SegmentsLumbar.PelvisSeg.Tuber_ischiadicum2MidContactNode.sRel;
AnyFloat Tuber_ischiadicum2LContactNode_pos = Main.HumanModel.BodyModel.Trunk.SegmentsLumbar.PelvisSeg.Tuber_ischiadicum2LContactNode.sRel;
AnyFloat Tuber_ischiadicum3RContactNode_pos = Main.HumanModel.BodyModel.Trunk.SegmentsLumbar.PelvisSeg.Tuber_ischiadicum3RContactNode.sRel;
AnyFloat Tuber_ischiadicum3LContactNode_pos = Main.HumanModel.BodyModel.Trunk.SegmentsLumbar.PelvisSeg.Tuber_ischiadicum3LContactNode.sRel;
AnyFloat Tuber_ischiadicum4RContactNode_pos = Main.HumanModel.BodyModel.Trunk.SegmentsLumbar.PelvisSeg.Tuber_ischiadicum4RContactNode.sRel;
AnyFloat Tuber_ischiadicum4LContactNode_pos = Main.HumanModel.BodyModel.Trunk.SegmentsLumbar.PelvisSeg.Tuber_ischiadicum4LContactNode.sRel;
AnyFloat PressureNode_pos = Main.HumanModel.BodyModel.Trunk.SegmentsLumbar.PelvisSeg.PressureNode.sRel;
AnyFloat BuckleNodeBottomCenter_pos = Main.HumanModel.BodyModel.Trunk.SegmentsLumbar.PelvisSeg.BuckleNodeBottomCenter.sRel;
AnyFloat BuckleNodeRight_pos = Main.HumanModel.BodyModel.Trunk.SegmentsLumbar.PelvisSeg.BuckleNodeRight.sRel;
AnyFloat BuckleNodeLeft_pos = Main.HumanModel.BodyModel.Trunk.SegmentsLumbar.PelvisSeg.BuckleNodeLeft.sRel;
AnyFloat Right_ScalingNode_pos = Main.HumanModel.BodyModel.Trunk.SegmentsLumbar.PelvisSeg.Right.ScalingNode.sRel;
AnyFloat Right_IliopubicEminenceEndNode_pos = Main.HumanModel.BodyModel.Trunk.SegmentsLumbar.PelvisSeg.Right.IliopubicEminenceEndNode.sRel;
AnyFloat Right_PsoasWrapSurf_pos = Main.HumanModel.BodyModel.Trunk.SegmentsLumbar.PelvisSeg.Right.PsoasWrapSurf.sRel;
AnyFloat Right_O_latissimus_dorsi_5_pos = Main.HumanModel.BodyModel.Trunk.SegmentsLumbar.PelvisSeg.Right.O_latissimus_dorsi_5.sRel;
AnyFloat Right_HipJoint_pos = Main.HumanModel.BodyModel.Trunk.SegmentsLumbar.PelvisSeg.Right.HipJoint.sRel;
AnyFloat Right_Muscles_pos = Main.HumanModel.BodyModel.Trunk.SegmentsLumbar.PelvisSeg.Right.Muscles.sRel;
AnyFloat Right_HipJoint_RotNode_pos = Main.HumanModel.BodyModel.Trunk.SegmentsLumbar.PelvisSeg.Right.HipJoint.RotNode.sRel;
AnyFloat Right_HipJoint_ISBCoor_pos = Main.HumanModel.BodyModel.Trunk.SegmentsLumbar.PelvisSeg.Right.HipJoint.ISBCoor.sRel;
AnyFloat Right_HipJoint_ISBCoor_RotNode_pos = Main.HumanModel.BodyModel.Trunk.SegmentsLumbar.PelvisSeg.Right.HipJoint.ISBCoor.RotNode.sRel;
AnyFloat Right_Muscles_IliacusWrapSurf_pos = Main.HumanModel.BodyModel.Trunk.SegmentsLumbar.PelvisSeg.Right.Muscles.IliacusWrapSurf.sRel;
AnyFloat Right_Muscles_ASIS_pos = Main.HumanModel.BodyModel.Trunk.SegmentsLumbar.PelvisSeg.Right.Muscles.ASIS.sRel;
AnyFloat Right_Muscles_PSIS_pos = Main.HumanModel.BodyModel.Trunk.SegmentsLumbar.PelvisSeg.Right.Muscles.PSIS.sRel;
AnyFloat Right_Muscles_AdductorBrevisProximal1Node_pos = Main.HumanModel.BodyModel.Trunk.SegmentsLumbar.PelvisSeg.Right.Muscles.AdductorBrevisProximal1Node.sRel;
AnyFloat Right_Muscles_AdductorBrevisProximal2Node_pos = Main.HumanModel.BodyModel.Trunk.SegmentsLumbar.PelvisSeg.Right.Muscles.AdductorBrevisProximal2Node.sRel;
AnyFloat Right_Muscles_AdductorBrevisMid1Node_pos = Main.HumanModel.BodyModel.Trunk.SegmentsLumbar.PelvisSeg.Right.Muscles.AdductorBrevisMid1Node.sRel;
AnyFloat Right_Muscles_AdductorBrevisMid2Node_pos = Main.HumanModel.BodyModel.Trunk.SegmentsLumbar.PelvisSeg.Right.Muscles.AdductorBrevisMid2Node.sRel;
AnyFloat Right_Muscles_AdductorBrevisDistal1Node_pos = Main.HumanModel.BodyModel.Trunk.SegmentsLumbar.PelvisSeg.Right.Muscles.AdductorBrevisDistal1Node.sRel;
AnyFloat Right_Muscles_AdductorBrevisDistal2Node_pos = Main.HumanModel.BodyModel.Trunk.SegmentsLumbar.PelvisSeg.Right.Muscles.AdductorBrevisDistal2Node.sRel;
AnyFloat Right_Muscles_AdductorLongus1Node_pos = Main.HumanModel.BodyModel.Trunk.SegmentsLumbar.PelvisSeg.Right.Muscles.AdductorLongus1Node.sRel;
AnyFloat Right_Muscles_AdductorLongus2Node_pos = Main.HumanModel.BodyModel.Trunk.SegmentsLumbar.PelvisSeg.Right.Muscles.AdductorLongus2Node.sRel;
AnyFloat Right_Muscles_AdductorLongus3Node_pos = Main.HumanModel.BodyModel.Trunk.SegmentsLumbar.PelvisSeg.Right.Muscles.AdductorLongus3Node.sRel;
AnyFloat Right_Muscles_AdductorLongus4Node_pos = Main.HumanModel.BodyModel.Trunk.SegmentsLumbar.PelvisSeg.Right.Muscles.AdductorLongus4Node.sRel;
AnyFloat Right_Muscles_AdductorLongus5Node_pos = Main.HumanModel.BodyModel.Trunk.SegmentsLumbar.PelvisSeg.Right.Muscles.AdductorLongus5Node.sRel;
AnyFloat Right_Muscles_AdductorLongus6Node_pos = Main.HumanModel.BodyModel.Trunk.SegmentsLumbar.PelvisSeg.Right.Muscles.AdductorLongus6Node.sRel;
AnyFloat Right_Muscles_AdductorMagnusDistal1Node_pos = Main.HumanModel.BodyModel.Trunk.SegmentsLumbar.PelvisSeg.Right.Muscles.AdductorMagnusDistal1Node.sRel;
AnyFloat Right_Muscles_AdductorMagnusDistal2Node_pos = Main.HumanModel.BodyModel.Trunk.SegmentsLumbar.PelvisSeg.Right.Muscles.AdductorMagnusDistal2Node.sRel;
AnyFloat Right_Muscles_AdductorMagnusDistal3Node_pos = Main.HumanModel.BodyModel.Trunk.SegmentsLumbar.PelvisSeg.Right.Muscles.AdductorMagnusDistal3Node.sRel;
AnyFloat Right_Muscles_AdductorMagnusMid1Node_pos = Main.HumanModel.BodyModel.Trunk.SegmentsLumbar.PelvisSeg.Right.Muscles.AdductorMagnusMid1Node.sRel;
AnyFloat Right_Muscles_AdductorMagnusMid2Node_pos = Main.HumanModel.BodyModel.Trunk.SegmentsLumbar.PelvisSeg.Right.Muscles.AdductorMagnusMid2Node.sRel;
AnyFloat Right_Muscles_AdductorMagnusMid3Node_pos = Main.HumanModel.BodyModel.Trunk.SegmentsLumbar.PelvisSeg.Right.Muscles.AdductorMagnusMid3Node.sRel;
AnyFloat Right_Muscles_AdductorMagnusMid4Node_pos = Main.HumanModel.BodyModel.Trunk.SegmentsLumbar.PelvisSeg.Right.Muscles.AdductorMagnusMid4Node.sRel;
AnyFloat Right_Muscles_AdductorMagnusMid5Node_pos = Main.HumanModel.BodyModel.Trunk.SegmentsLumbar.PelvisSeg.Right.Muscles.AdductorMagnusMid5Node.sRel;
AnyFloat Right_Muscles_AdductorMagnusMid6Node_pos = Main.HumanModel.BodyModel.Trunk.SegmentsLumbar.PelvisSeg.Right.Muscles.AdductorMagnusMid6Node.sRel;
AnyFloat Right_Muscles_AdductorMagnusProximal1Node_pos = Main.HumanModel.BodyModel.Trunk.SegmentsLumbar.PelvisSeg.Right.Muscles.AdductorMagnusProximal1Node.sRel;
AnyFloat Right_Muscles_AdductorMagnusProximal2Node_pos = Main.HumanModel.BodyModel.Trunk.SegmentsLumbar.PelvisSeg.Right.Muscles.AdductorMagnusProximal2Node.sRel;
AnyFloat Right_Muscles_AdductorMagnusProximal3Node_pos = Main.HumanModel.BodyModel.Trunk.SegmentsLumbar.PelvisSeg.Right.Muscles.AdductorMagnusProximal3Node.sRel;
AnyFloat Right_Muscles_AdductorMagnusProximal4Node_pos = Main.HumanModel.BodyModel.Trunk.SegmentsLumbar.PelvisSeg.Right.Muscles.AdductorMagnusProximal4Node.sRel;
AnyFloat Right_Muscles_BicepsFemorisCaputLongum1Node_pos = Main.HumanModel.BodyModel.Trunk.SegmentsLumbar.PelvisSeg.Right.Muscles.BicepsFemorisCaputLongum1Node.sRel;
AnyFloat Right_Muscles_GemellusInferior1Node_pos = Main.HumanModel.BodyModel.Trunk.SegmentsLumbar.PelvisSeg.Right.Muscles.GemellusInferior1Node.sRel;
AnyFloat Right_Muscles_GemellusSuperior1Node_pos = Main.HumanModel.BodyModel.Trunk.SegmentsLumbar.PelvisSeg.Right.Muscles.GemellusSuperior1Node.sRel;
AnyFloat Right_Muscles_GluteusMaximusSuperior1Node_pos = Main.HumanModel.BodyModel.Trunk.SegmentsLumbar.PelvisSeg.Right.Muscles.GluteusMaximusSuperior1Node.sRel;
AnyFloat Right_Muscles_GluteusMaximusSuperior2Node_pos = Main.HumanModel.BodyModel.Trunk.SegmentsLumbar.PelvisSeg.Right.Muscles.GluteusMaximusSuperior2Node.sRel;
AnyFloat Right_Muscles_GluteusMaximusSuperior3Node_pos = Main.HumanModel.BodyModel.Trunk.SegmentsLumbar.PelvisSeg.Right.Muscles.GluteusMaximusSuperior3Node.sRel;
AnyFloat Right_Muscles_GluteusMaximusSuperior4Node_pos = Main.HumanModel.BodyModel.Trunk.SegmentsLumbar.PelvisSeg.Right.Muscles.GluteusMaximusSuperior4Node.sRel;
AnyFloat Right_Muscles_GluteusMaximusSuperior5Node_pos = Main.HumanModel.BodyModel.Trunk.SegmentsLumbar.PelvisSeg.Right.Muscles.GluteusMaximusSuperior5Node.sRel;
AnyFloat Right_Muscles_GluteusMaximusSuperior6Node_pos = Main.HumanModel.BodyModel.Trunk.SegmentsLumbar.PelvisSeg.Right.Muscles.GluteusMaximusSuperior6Node.sRel;
AnyFloat Right_Muscles_GluteusMaximusInferior1Node_pos = Main.HumanModel.BodyModel.Trunk.SegmentsLumbar.PelvisSeg.Right.Muscles.GluteusMaximusInferior1Node.sRel;
AnyFloat Right_Muscles_GluteusMaximusInferior2Node_pos = Main.HumanModel.BodyModel.Trunk.SegmentsLumbar.PelvisSeg.Right.Muscles.GluteusMaximusInferior2Node.sRel;
AnyFloat Right_Muscles_GluteusMaximusInferior3Node_pos = Main.HumanModel.BodyModel.Trunk.SegmentsLumbar.PelvisSeg.Right.Muscles.GluteusMaximusInferior3Node.sRel;
AnyFloat Right_Muscles_GluteusMaximusInferior4Node_pos = Main.HumanModel.BodyModel.Trunk.SegmentsLumbar.PelvisSeg.Right.Muscles.GluteusMaximusInferior4Node.sRel;
AnyFloat Right_Muscles_GluteusMaximusInferior5Node_pos = Main.HumanModel.BodyModel.Trunk.SegmentsLumbar.PelvisSeg.Right.Muscles.GluteusMaximusInferior5Node.sRel;
AnyFloat Right_Muscles_GluteusMaximusInferior6Node_pos = Main.HumanModel.BodyModel.Trunk.SegmentsLumbar.PelvisSeg.Right.Muscles.GluteusMaximusInferior6Node.sRel;
AnyFloat Right_Muscles_GluteusMediusAnterior1Node_pos = Main.HumanModel.BodyModel.Trunk.SegmentsLumbar.PelvisSeg.Right.Muscles.GluteusMediusAnterior1Node.sRel;
AnyFloat Right_Muscles_GluteusMediusAnterior2Node_pos = Main.HumanModel.BodyModel.Trunk.SegmentsLumbar.PelvisSeg.Right.Muscles.GluteusMediusAnterior2Node.sRel;
AnyFloat Right_Muscles_GluteusMediusAnterior3Node_pos = Main.HumanModel.BodyModel.Trunk.SegmentsLumbar.PelvisSeg.Right.Muscles.GluteusMediusAnterior3Node.sRel;
AnyFloat Right_Muscles_GluteusMediusAnterior4Node_pos = Main.HumanModel.BodyModel.Trunk.SegmentsLumbar.PelvisSeg.Right.Muscles.GluteusMediusAnterior4Node.sRel;
AnyFloat Right_Muscles_GluteusMediusAnterior5Node_pos = Main.HumanModel.BodyModel.Trunk.SegmentsLumbar.PelvisSeg.Right.Muscles.GluteusMediusAnterior5Node.sRel;
AnyFloat Right_Muscles_GluteusMediusAnterior6Node_pos = Main.HumanModel.BodyModel.Trunk.SegmentsLumbar.PelvisSeg.Right.Muscles.GluteusMediusAnterior6Node.sRel;
AnyFloat Right_Muscles_GluteusMediusPosterior1Node_pos = Main.HumanModel.BodyModel.Trunk.SegmentsLumbar.PelvisSeg.Right.Muscles.GluteusMediusPosterior1Node.sRel;
AnyFloat Right_Muscles_GluteusMediusPosterior2Node_pos = Main.HumanModel.BodyModel.Trunk.SegmentsLumbar.PelvisSeg.Right.Muscles.GluteusMediusPosterior2Node.sRel;
AnyFloat Right_Muscles_GluteusMediusPosterior3Node_pos = Main.HumanModel.BodyModel.Trunk.SegmentsLumbar.PelvisSeg.Right.Muscles.GluteusMediusPosterior3Node.sRel;
AnyFloat Right_Muscles_GluteusMediusPosterior4Node_pos = Main.HumanModel.BodyModel.Trunk.SegmentsLumbar.PelvisSeg.Right.Muscles.GluteusMediusPosterior4Node.sRel;
AnyFloat Right_Muscles_GluteusMediusPosterior5Node_pos = Main.HumanModel.BodyModel.Trunk.SegmentsLumbar.PelvisSeg.Right.Muscles.GluteusMediusPosterior5Node.sRel;
AnyFloat Right_Muscles_GluteusMediusPosterior6Node_pos = Main.HumanModel.BodyModel.Trunk.SegmentsLumbar.PelvisSeg.Right.Muscles.GluteusMediusPosterior6Node.sRel;
AnyFloat Right_Muscles_GluteusMinimusAnterior1Node_pos = Main.HumanModel.BodyModel.Trunk.SegmentsLumbar.PelvisSeg.Right.Muscles.GluteusMinimusAnterior1Node.sRel;
AnyFloat Right_Muscles_GluteusMinimusMid1Node_pos = Main.HumanModel.BodyModel.Trunk.SegmentsLumbar.PelvisSeg.Right.Muscles.GluteusMinimusMid1Node.sRel;
AnyFloat Right_Muscles_GluteusMinimusPosterior1Node_pos = Main.HumanModel.BodyModel.Trunk.SegmentsLumbar.PelvisSeg.Right.Muscles.GluteusMinimusPosterior1Node.sRel;
AnyFloat Right_Muscles_Gracilis1Node_pos = Main.HumanModel.BodyModel.Trunk.SegmentsLumbar.PelvisSeg.Right.Muscles.Gracilis1Node.sRel;
AnyFloat Right_Muscles_Gracilis2Node_pos = Main.HumanModel.BodyModel.Trunk.SegmentsLumbar.PelvisSeg.Right.Muscles.Gracilis2Node.sRel;
AnyFloat Right_Muscles_IliacusLateralis1Node_pos = Main.HumanModel.BodyModel.Trunk.SegmentsLumbar.PelvisSeg.Right.Muscles.IliacusLateralis1Node.sRel;
AnyFloat Right_Muscles_IliacusLateralis2Node_pos = Main.HumanModel.BodyModel.Trunk.SegmentsLumbar.PelvisSeg.Right.Muscles.IliacusLateralis2Node.sRel;
AnyFloat Right_Muscles_IliacusLateralis3Node_pos = Main.HumanModel.BodyModel.Trunk.SegmentsLumbar.PelvisSeg.Right.Muscles.IliacusLateralis3Node.sRel;
AnyFloat Right_Muscles_IliacusLateralisViaNode1_pos = Main.HumanModel.BodyModel.Trunk.SegmentsLumbar.PelvisSeg.Right.Muscles.IliacusLateralisViaNode1.sRel;
AnyFloat Right_Muscles_IliacusMid1Node_pos = Main.HumanModel.BodyModel.Trunk.SegmentsLumbar.PelvisSeg.Right.Muscles.IliacusMid1Node.sRel;
AnyFloat Right_Muscles_IliacusMid2Node_pos = Main.HumanModel.BodyModel.Trunk.SegmentsLumbar.PelvisSeg.Right.Muscles.IliacusMid2Node.sRel;
AnyFloat Right_Muscles_IliacusMid3Node_pos = Main.HumanModel.BodyModel.Trunk.SegmentsLumbar.PelvisSeg.Right.Muscles.IliacusMid3Node.sRel;
AnyFloat Right_Muscles_IliacusMidViaNode1_pos = Main.HumanModel.BodyModel.Trunk.SegmentsLumbar.PelvisSeg.Right.Muscles.IliacusMidViaNode1.sRel;
AnyFloat Right_Muscles_IliacusMedialis1Node_pos = Main.HumanModel.BodyModel.Trunk.SegmentsLumbar.PelvisSeg.Right.Muscles.IliacusMedialis1Node.sRel;
AnyFloat Right_Muscles_IliacusMedialis2Node_pos = Main.HumanModel.BodyModel.Trunk.SegmentsLumbar.PelvisSeg.Right.Muscles.IliacusMedialis2Node.sRel;
AnyFloat Right_Muscles_IliacusMedialis3Node_pos = Main.HumanModel.BodyModel.Trunk.SegmentsLumbar.PelvisSeg.Right.Muscles.IliacusMedialis3Node.sRel;
AnyFloat Right_Muscles_IliacusMedialisViaNode1_pos = Main.HumanModel.BodyModel.Trunk.SegmentsLumbar.PelvisSeg.Right.Muscles.IliacusMedialisViaNode1.sRel;
AnyFloat Right_Muscles_ObturatorExternusInferior1Node_pos = Main.HumanModel.BodyModel.Trunk.SegmentsLumbar.PelvisSeg.Right.Muscles.ObturatorExternusInferior1Node.sRel;
AnyFloat Right_Muscles_ObturatorExternusInferior2Node_pos = Main.HumanModel.BodyModel.Trunk.SegmentsLumbar.PelvisSeg.Right.Muscles.ObturatorExternusInferior2Node.sRel;
AnyFloat Right_Muscles_ObturatorExternusSuperior1Node_pos = Main.HumanModel.BodyModel.Trunk.SegmentsLumbar.PelvisSeg.Right.Muscles.ObturatorExternusSuperior1Node.sRel;
AnyFloat Right_Muscles_ObturatorExternusSuperior2Node_pos = Main.HumanModel.BodyModel.Trunk.SegmentsLumbar.PelvisSeg.Right.Muscles.ObturatorExternusSuperior2Node.sRel;
AnyFloat Right_Muscles_ObturatorExternusSuperior3Node_pos = Main.HumanModel.BodyModel.Trunk.SegmentsLumbar.PelvisSeg.Right.Muscles.ObturatorExternusSuperior3Node.sRel;
AnyFloat Right_Muscles_ObturatorExternusSuperiorViaNode1_pos = Main.HumanModel.BodyModel.Trunk.SegmentsLumbar.PelvisSeg.Right.Muscles.ObturatorExternusSuperiorViaNode1.sRel;
AnyFloat Right_Muscles_ObturatorInternus1Node_pos = Main.HumanModel.BodyModel.Trunk.SegmentsLumbar.PelvisSeg.Right.Muscles.ObturatorInternus1Node.sRel;
AnyFloat Right_Muscles_ObturatorInternus2Node_pos = Main.HumanModel.BodyModel.Trunk.SegmentsLumbar.PelvisSeg.Right.Muscles.ObturatorInternus2Node.sRel;
AnyFloat Right_Muscles_ObturatorInternus3Node_pos = Main.HumanModel.BodyModel.Trunk.SegmentsLumbar.PelvisSeg.Right.Muscles.ObturatorInternus3Node.sRel;
AnyFloat Right_Muscles_ObturatorInternusViaNode1_pos = Main.HumanModel.BodyModel.Trunk.SegmentsLumbar.PelvisSeg.Right.Muscles.ObturatorInternusViaNode1.sRel;
AnyFloat Right_Muscles_Pectineus1Node_pos = Main.HumanModel.BodyModel.Trunk.SegmentsLumbar.PelvisSeg.Right.Muscles.Pectineus1Node.sRel;
AnyFloat Right_Muscles_Pectineus2Node_pos = Main.HumanModel.BodyModel.Trunk.SegmentsLumbar.PelvisSeg.Right.Muscles.Pectineus2Node.sRel;
AnyFloat Right_Muscles_Pectineus3Node_pos = Main.HumanModel.BodyModel.Trunk.SegmentsLumbar.PelvisSeg.Right.Muscles.Pectineus3Node.sRel;
AnyFloat Right_Muscles_Pectineus4Node_pos = Main.HumanModel.BodyModel.Trunk.SegmentsLumbar.PelvisSeg.Right.Muscles.Pectineus4Node.sRel;
AnyFloat Right_Muscles_Piriformis1Node_pos = Main.HumanModel.BodyModel.Trunk.SegmentsLumbar.PelvisSeg.Right.Muscles.Piriformis1Node.sRel;
AnyFloat Right_Muscles_PsoasMinor1Node_pos = Main.HumanModel.BodyModel.Trunk.SegmentsLumbar.PelvisSeg.Right.Muscles.PsoasMinor1Node.sRel;
AnyFloat Right_Muscles_PsoasMinorViaNode1_pos = Main.HumanModel.BodyModel.Trunk.SegmentsLumbar.PelvisSeg.Right.Muscles.PsoasMinorViaNode1.sRel;
AnyFloat Right_Muscles_PsoasMajor1Node_pos = Main.HumanModel.BodyModel.Trunk.SegmentsLumbar.PelvisSeg.Right.Muscles.PsoasMajor1Node.sRel;
AnyFloat Right_Muscles_PsoasMajor2Node_pos = Main.HumanModel.BodyModel.Trunk.SegmentsLumbar.PelvisSeg.Right.Muscles.PsoasMajor2Node.sRel;
AnyFloat Right_Muscles_PsoasMajor3Node_pos = Main.HumanModel.BodyModel.Trunk.SegmentsLumbar.PelvisSeg.Right.Muscles.PsoasMajor3Node.sRel;
AnyFloat Right_Muscles_PsoasMajorViaNode1_pos = Main.HumanModel.BodyModel.Trunk.SegmentsLumbar.PelvisSeg.Right.Muscles.PsoasMajorViaNode1.sRel;
AnyFloat Right_Muscles_QuadratusFemoris1Node_pos = Main.HumanModel.BodyModel.Trunk.SegmentsLumbar.PelvisSeg.Right.Muscles.QuadratusFemoris1Node.sRel;
AnyFloat Right_Muscles_QuadratusFemoris2Node_pos = Main.HumanModel.BodyModel.Trunk.SegmentsLumbar.PelvisSeg.Right.Muscles.QuadratusFemoris2Node.sRel;
AnyFloat Right_Muscles_QuadratusFemoris3Node_pos = Main.HumanModel.BodyModel.Trunk.SegmentsLumbar.PelvisSeg.Right.Muscles.QuadratusFemoris3Node.sRel;
AnyFloat Right_Muscles_QuadratusFemoris4Node_pos = Main.HumanModel.BodyModel.Trunk.SegmentsLumbar.PelvisSeg.Right.Muscles.QuadratusFemoris4Node.sRel;
AnyFloat Right_Muscles_RectusFemoris1Node_pos = Main.HumanModel.BodyModel.Trunk.SegmentsLumbar.PelvisSeg.Right.Muscles.RectusFemoris1Node.sRel;
AnyFloat Right_Muscles_RectusFemoris2Node_pos = Main.HumanModel.BodyModel.Trunk.SegmentsLumbar.PelvisSeg.Right.Muscles.RectusFemoris2Node.sRel;
AnyFloat Right_Muscles_SartoriusProximal1Node_pos = Main.HumanModel.BodyModel.Trunk.SegmentsLumbar.PelvisSeg.Right.Muscles.SartoriusProximal1Node.sRel;
AnyFloat Right_Muscles_SartoriusDistal1Node_pos = Main.HumanModel.BodyModel.Trunk.SegmentsLumbar.PelvisSeg.Right.Muscles.SartoriusDistal1Node.sRel;
AnyFloat Right_Muscles_Semimembranosus1Node_pos = Main.HumanModel.BodyModel.Trunk.SegmentsLumbar.PelvisSeg.Right.Muscles.Semimembranosus1Node.sRel;
AnyFloat Right_Muscles_Semitendinosus1Node_pos = Main.HumanModel.BodyModel.Trunk.SegmentsLumbar.PelvisSeg.Right.Muscles.Semitendinosus1Node.sRel;
AnyFloat Right_Muscles_TensorFasciaeLatae1Node_pos = Main.HumanModel.BodyModel.Trunk.SegmentsLumbar.PelvisSeg.Right.Muscles.TensorFasciaeLatae1Node.sRel;
AnyFloat Right_Muscles_TensorFasciaeLatae2Node_pos = Main.HumanModel.BodyModel.Trunk.SegmentsLumbar.PelvisSeg.Right.Muscles.TensorFasciaeLatae2Node.sRel;
AnyFloat Right_Muscles_IlioFemAntOrig_pos = Main.HumanModel.BodyModel.Trunk.SegmentsLumbar.PelvisSeg.Right.Muscles.IlioFemAntOrig.sRel;
AnyFloat Right_Muscles_IlioFemLatOrig_pos = Main.HumanModel.BodyModel.Trunk.SegmentsLumbar.PelvisSeg.Right.Muscles.IlioFemLatOrig.sRel;
AnyFloat Right_Muscles_PuboFemOrig_pos = Main.HumanModel.BodyModel.Trunk.SegmentsLumbar.PelvisSeg.Right.Muscles.PuboFemOrig.sRel;
AnyFloat Right_Muscles_IschioFemOrig_pos = Main.HumanModel.BodyModel.Trunk.SegmentsLumbar.PelvisSeg.Right.Muscles.IschioFemOrig.sRel;
AnyFloat Left_ScalingNode_pos = Main.HumanModel.BodyModel.Trunk.SegmentsLumbar.PelvisSeg.Left.ScalingNode.sRel;
AnyFloat Left_IliopubicEminenceEndNode_pos = Main.HumanModel.BodyModel.Trunk.SegmentsLumbar.PelvisSeg.Left.IliopubicEminenceEndNode.sRel;
AnyFloat Left_PsoasWrapSurf_pos = Main.HumanModel.BodyModel.Trunk.SegmentsLumbar.PelvisSeg.Left.PsoasWrapSurf.sRel;
AnyFloat Left_O_latissimus_dorsi_5_pos = Main.HumanModel.BodyModel.Trunk.SegmentsLumbar.PelvisSeg.Left.O_latissimus_dorsi_5.sRel;
AnyFloat Left_HipJoint_pos = Main.HumanModel.BodyModel.Trunk.SegmentsLumbar.PelvisSeg.Left.HipJoint.sRel;
AnyFloat Left_Muscles_pos = Main.HumanModel.BodyModel.Trunk.SegmentsLumbar.PelvisSeg.Left.Muscles.sRel;
AnyFloat Left_HipJoint_RotNode_pos = Main.HumanModel.BodyModel.Trunk.SegmentsLumbar.PelvisSeg.Left.HipJoint.RotNode.sRel;
AnyFloat Left_HipJoint_ISBCoor_pos = Main.HumanModel.BodyModel.Trunk.SegmentsLumbar.PelvisSeg.Left.HipJoint.ISBCoor.sRel;
AnyFloat Left_HipJoint_ISBCoor_RotNode_pos = Main.HumanModel.BodyModel.Trunk.SegmentsLumbar.PelvisSeg.Left.HipJoint.ISBCoor.RotNode.sRel;
AnyFloat Left_Muscles_IliacusWrapSurf_pos = Main.HumanModel.BodyModel.Trunk.SegmentsLumbar.PelvisSeg.Left.Muscles.IliacusWrapSurf.sRel;
AnyFloat Left_Muscles_ASIS_pos = Main.HumanModel.BodyModel.Trunk.SegmentsLumbar.PelvisSeg.Left.Muscles.ASIS.sRel;
AnyFloat Left_Muscles_PSIS_pos = Main.HumanModel.BodyModel.Trunk.SegmentsLumbar.PelvisSeg.Left.Muscles.PSIS.sRel;
AnyFloat Left_Muscles_AdductorBrevisProximal1Node_pos = Main.HumanModel.BodyModel.Trunk.SegmentsLumbar.PelvisSeg.Left.Muscles.AdductorBrevisProximal1Node.sRel;
AnyFloat Left_Muscles_AdductorBrevisProximal2Node_pos = Main.HumanModel.BodyModel.Trunk.SegmentsLumbar.PelvisSeg.Left.Muscles.AdductorBrevisProximal2Node.sRel;
AnyFloat Left_Muscles_AdductorBrevisMid1Node_pos = Main.HumanModel.BodyModel.Trunk.SegmentsLumbar.PelvisSeg.Left.Muscles.AdductorBrevisMid1Node.sRel;
AnyFloat Left_Muscles_AdductorBrevisMid2Node_pos = Main.HumanModel.BodyModel.Trunk.SegmentsLumbar.PelvisSeg.Left.Muscles.AdductorBrevisMid2Node.sRel;
AnyFloat Left_Muscles_AdductorBrevisDistal1Node_pos = Main.HumanModel.BodyModel.Trunk.SegmentsLumbar.PelvisSeg.Left.Muscles.AdductorBrevisDistal1Node.sRel;
AnyFloat Left_Muscles_AdductorBrevisDistal2Node_pos = Main.HumanModel.BodyModel.Trunk.SegmentsLumbar.PelvisSeg.Left.Muscles.AdductorBrevisDistal2Node.sRel;
AnyFloat Left_Muscles_AdductorLongus1Node_pos = Main.HumanModel.BodyModel.Trunk.SegmentsLumbar.PelvisSeg.Left.Muscles.AdductorLongus1Node.sRel;
AnyFloat Left_Muscles_AdductorLongus2Node_pos = Main.HumanModel.BodyModel.Trunk.SegmentsLumbar.PelvisSeg.Left.Muscles.AdductorLongus2Node.sRel;
AnyFloat Left_Muscles_AdductorLongus3Node_pos = Main.HumanModel.BodyModel.Trunk.SegmentsLumbar.PelvisSeg.Left.Muscles.AdductorLongus3Node.sRel;
AnyFloat Left_Muscles_AdductorLongus4Node_pos = Main.HumanModel.BodyModel.Trunk.SegmentsLumbar.PelvisSeg.Left.Muscles.AdductorLongus4Node.sRel;
AnyFloat Left_Muscles_AdductorLongus5Node_pos = Main.HumanModel.BodyModel.Trunk.SegmentsLumbar.PelvisSeg.Left.Muscles.AdductorLongus5Node.sRel;
AnyFloat Left_Muscles_AdductorLongus6Node_pos = Main.HumanModel.BodyModel.Trunk.SegmentsLumbar.PelvisSeg.Left.Muscles.AdductorLongus6Node.sRel;
AnyFloat Left_Muscles_AdductorMagnusDistal1Node_pos = Main.HumanModel.BodyModel.Trunk.SegmentsLumbar.PelvisSeg.Left.Muscles.AdductorMagnusDistal1Node.sRel;
AnyFloat Left_Muscles_AdductorMagnusDistal2Node_pos = Main.HumanModel.BodyModel.Trunk.SegmentsLumbar.PelvisSeg.Left.Muscles.AdductorMagnusDistal2Node.sRel;
AnyFloat Left_Muscles_AdductorMagnusDistal3Node_pos = Main.HumanModel.BodyModel.Trunk.SegmentsLumbar.PelvisSeg.Left.Muscles.AdductorMagnusDistal3Node.sRel;
AnyFloat Left_Muscles_AdductorMagnusMid1Node_pos = Main.HumanModel.BodyModel.Trunk.SegmentsLumbar.PelvisSeg.Left.Muscles.AdductorMagnusMid1Node.sRel;
AnyFloat Left_Muscles_AdductorMagnusMid2Node_pos = Main.HumanModel.BodyModel.Trunk.SegmentsLumbar.PelvisSeg.Left.Muscles.AdductorMagnusMid2Node.sRel;
AnyFloat Left_Muscles_AdductorMagnusMid3Node_pos = Main.HumanModel.BodyModel.Trunk.SegmentsLumbar.PelvisSeg.Left.Muscles.AdductorMagnusMid3Node.sRel;
AnyFloat Left_Muscles_AdductorMagnusMid4Node_pos = Main.HumanModel.BodyModel.Trunk.SegmentsLumbar.PelvisSeg.Left.Muscles.AdductorMagnusMid4Node.sRel;
AnyFloat Left_Muscles_AdductorMagnusMid5Node_pos = Main.HumanModel.BodyModel.Trunk.SegmentsLumbar.PelvisSeg.Left.Muscles.AdductorMagnusMid5Node.sRel;
AnyFloat Left_Muscles_AdductorMagnusMid6Node_pos = Main.HumanModel.BodyModel.Trunk.SegmentsLumbar.PelvisSeg.Left.Muscles.AdductorMagnusMid6Node.sRel;
AnyFloat Left_Muscles_AdductorMagnusProximal1Node_pos = Main.HumanModel.BodyModel.Trunk.SegmentsLumbar.PelvisSeg.Left.Muscles.AdductorMagnusProximal1Node.sRel;
AnyFloat Left_Muscles_AdductorMagnusProximal2Node_pos = Main.HumanModel.BodyModel.Trunk.SegmentsLumbar.PelvisSeg.Left.Muscles.AdductorMagnusProximal2Node.sRel;
AnyFloat Left_Muscles_AdductorMagnusProximal3Node_pos = Main.HumanModel.BodyModel.Trunk.SegmentsLumbar.PelvisSeg.Left.Muscles.AdductorMagnusProximal3Node.sRel;
AnyFloat Left_Muscles_AdductorMagnusProximal4Node_pos = Main.HumanModel.BodyModel.Trunk.SegmentsLumbar.PelvisSeg.Left.Muscles.AdductorMagnusProximal4Node.sRel;
AnyFloat Left_Muscles_BicepsFemorisCaputLongum1Node_pos = Main.HumanModel.BodyModel.Trunk.SegmentsLumbar.PelvisSeg.Left.Muscles.BicepsFemorisCaputLongum1Node.sRel;
AnyFloat Left_Muscles_GemellusInferior1Node_pos = Main.HumanModel.BodyModel.Trunk.SegmentsLumbar.PelvisSeg.Left.Muscles.GemellusInferior1Node.sRel;
AnyFloat Left_Muscles_GemellusSuperior1Node_pos = Main.HumanModel.BodyModel.Trunk.SegmentsLumbar.PelvisSeg.Left.Muscles.GemellusSuperior1Node.sRel;
AnyFloat Left_Muscles_GluteusMaximusSuperior1Node_pos = Main.HumanModel.BodyModel.Trunk.SegmentsLumbar.PelvisSeg.Left.Muscles.GluteusMaximusSuperior1Node.sRel;
AnyFloat Left_Muscles_GluteusMaximusSuperior2Node_pos = Main.HumanModel.BodyModel.Trunk.SegmentsLumbar.PelvisSeg.Left.Muscles.GluteusMaximusSuperior2Node.sRel;
AnyFloat Left_Muscles_GluteusMaximusSuperior3Node_pos = Main.HumanModel.BodyModel.Trunk.SegmentsLumbar.PelvisSeg.Left.Muscles.GluteusMaximusSuperior3Node.sRel;
AnyFloat Left_Muscles_GluteusMaximusSuperior4Node_pos = Main.HumanModel.BodyModel.Trunk.SegmentsLumbar.PelvisSeg.Left.Muscles.GluteusMaximusSuperior4Node.sRel;
AnyFloat Left_Muscles_GluteusMaximusSuperior5Node_pos = Main.HumanModel.BodyModel.Trunk.SegmentsLumbar.PelvisSeg.Left.Muscles.GluteusMaximusSuperior5Node.sRel;
AnyFloat Left_Muscles_GluteusMaximusSuperior6Node_pos = Main.HumanModel.BodyModel.Trunk.SegmentsLumbar.PelvisSeg.Left.Muscles.GluteusMaximusSuperior6Node.sRel;
AnyFloat Left_Muscles_GluteusMaximusInferior1Node_pos = Main.HumanModel.BodyModel.Trunk.SegmentsLumbar.PelvisSeg.Left.Muscles.GluteusMaximusInferior1Node.sRel;
AnyFloat Left_Muscles_GluteusMaximusInferior2Node_pos = Main.HumanModel.BodyModel.Trunk.SegmentsLumbar.PelvisSeg.Left.Muscles.GluteusMaximusInferior2Node.sRel;
AnyFloat Left_Muscles_GluteusMaximusInferior3Node_pos = Main.HumanModel.BodyModel.Trunk.SegmentsLumbar.PelvisSeg.Left.Muscles.GluteusMaximusInferior3Node.sRel;
AnyFloat Left_Muscles_GluteusMaximusInferior4Node_pos = Main.HumanModel.BodyModel.Trunk.SegmentsLumbar.PelvisSeg.Left.Muscles.GluteusMaximusInferior4Node.sRel;
AnyFloat Left_Muscles_GluteusMaximusInferior5Node_pos = Main.HumanModel.BodyModel.Trunk.SegmentsLumbar.PelvisSeg.Left.Muscles.GluteusMaximusInferior5Node.sRel;
AnyFloat Left_Muscles_GluteusMaximusInferior6Node_pos = Main.HumanModel.BodyModel.Trunk.SegmentsLumbar.PelvisSeg.Left.Muscles.GluteusMaximusInferior6Node.sRel;
AnyFloat Left_Muscles_GluteusMediusAnterior1Node_pos = Main.HumanModel.BodyModel.Trunk.SegmentsLumbar.PelvisSeg.Left.Muscles.GluteusMediusAnterior1Node.sRel;
AnyFloat Left_Muscles_GluteusMediusAnterior2Node_pos = Main.HumanModel.BodyModel.Trunk.SegmentsLumbar.PelvisSeg.Left.Muscles.GluteusMediusAnterior2Node.sRel;
AnyFloat Left_Muscles_GluteusMediusAnterior3Node_pos = Main.HumanModel.BodyModel.Trunk.SegmentsLumbar.PelvisSeg.Left.Muscles.GluteusMediusAnterior3Node.sRel;
AnyFloat Left_Muscles_GluteusMediusAnterior4Node_pos = Main.HumanModel.BodyModel.Trunk.SegmentsLumbar.PelvisSeg.Left.Muscles.GluteusMediusAnterior4Node.sRel;
AnyFloat Left_Muscles_GluteusMediusAnterior5Node_pos = Main.HumanModel.BodyModel.Trunk.SegmentsLumbar.PelvisSeg.Left.Muscles.GluteusMediusAnterior5Node.sRel;
AnyFloat Left_Muscles_GluteusMediusAnterior6Node_pos = Main.HumanModel.BodyModel.Trunk.SegmentsLumbar.PelvisSeg.Left.Muscles.GluteusMediusAnterior6Node.sRel;
AnyFloat Left_Muscles_GluteusMediusPosterior1Node_pos = Main.HumanModel.BodyModel.Trunk.SegmentsLumbar.PelvisSeg.Left.Muscles.GluteusMediusPosterior1Node.sRel;
AnyFloat Left_Muscles_GluteusMediusPosterior2Node_pos = Main.HumanModel.BodyModel.Trunk.SegmentsLumbar.PelvisSeg.Left.Muscles.GluteusMediusPosterior2Node.sRel;
AnyFloat Left_Muscles_GluteusMediusPosterior3Node_pos = Main.HumanModel.BodyModel.Trunk.SegmentsLumbar.PelvisSeg.Left.Muscles.GluteusMediusPosterior3Node.sRel;
AnyFloat Left_Muscles_GluteusMediusPosterior4Node_pos = Main.HumanModel.BodyModel.Trunk.SegmentsLumbar.PelvisSeg.Left.Muscles.GluteusMediusPosterior4Node.sRel;
AnyFloat Left_Muscles_GluteusMediusPosterior5Node_pos = Main.HumanModel.BodyModel.Trunk.SegmentsLumbar.PelvisSeg.Left.Muscles.GluteusMediusPosterior5Node.sRel;
AnyFloat Left_Muscles_GluteusMediusPosterior6Node_pos = Main.HumanModel.BodyModel.Trunk.SegmentsLumbar.PelvisSeg.Left.Muscles.GluteusMediusPosterior6Node.sRel;
AnyFloat Left_Muscles_GluteusMinimusAnterior1Node_pos = Main.HumanModel.BodyModel.Trunk.SegmentsLumbar.PelvisSeg.Left.Muscles.GluteusMinimusAnterior1Node.sRel;
AnyFloat Left_Muscles_GluteusMinimusMid1Node_pos = Main.HumanModel.BodyModel.Trunk.SegmentsLumbar.PelvisSeg.Left.Muscles.GluteusMinimusMid1Node.sRel;
AnyFloat Left_Muscles_GluteusMinimusPosterior1Node_pos = Main.HumanModel.BodyModel.Trunk.SegmentsLumbar.PelvisSeg.Left.Muscles.GluteusMinimusPosterior1Node.sRel;
AnyFloat Left_Muscles_Gracilis1Node_pos = Main.HumanModel.BodyModel.Trunk.SegmentsLumbar.PelvisSeg.Left.Muscles.Gracilis1Node.sRel;
AnyFloat Left_Muscles_Gracilis2Node_pos = Main.HumanModel.BodyModel.Trunk.SegmentsLumbar.PelvisSeg.Left.Muscles.Gracilis2Node.sRel;
AnyFloat Left_Muscles_IliacusLateralis1Node_pos = Main.HumanModel.BodyModel.Trunk.SegmentsLumbar.PelvisSeg.Left.Muscles.IliacusLateralis1Node.sRel;
AnyFloat Left_Muscles_IliacusLateralis2Node_pos = Main.HumanModel.BodyModel.Trunk.SegmentsLumbar.PelvisSeg.Left.Muscles.IliacusLateralis2Node.sRel;
AnyFloat Left_Muscles_IliacusLateralis3Node_pos = Main.HumanModel.BodyModel.Trunk.SegmentsLumbar.PelvisSeg.Left.Muscles.IliacusLateralis3Node.sRel;
AnyFloat Left_Muscles_IliacusLateralisViaNode1_pos = Main.HumanModel.BodyModel.Trunk.SegmentsLumbar.PelvisSeg.Left.Muscles.IliacusLateralisViaNode1.sRel;
AnyFloat Left_Muscles_IliacusMid1Node_pos = Main.HumanModel.BodyModel.Trunk.SegmentsLumbar.PelvisSeg.Left.Muscles.IliacusMid1Node.sRel;
AnyFloat Left_Muscles_IliacusMid2Node_pos = Main.HumanModel.BodyModel.Trunk.SegmentsLumbar.PelvisSeg.Left.Muscles.IliacusMid2Node.sRel;
AnyFloat Left_Muscles_IliacusMid3Node_pos = Main.HumanModel.BodyModel.Trunk.SegmentsLumbar.PelvisSeg.Left.Muscles.IliacusMid3Node.sRel;
AnyFloat Left_Muscles_IliacusMidViaNode1_pos = Main.HumanModel.BodyModel.Trunk.SegmentsLumbar.PelvisSeg.Left.Muscles.IliacusMidViaNode1.sRel;
AnyFloat Left_Muscles_IliacusMedialis1Node_pos = Main.HumanModel.BodyModel.Trunk.SegmentsLumbar.PelvisSeg.Left.Muscles.IliacusMedialis1Node.sRel;
AnyFloat Left_Muscles_IliacusMedialis2Node_pos = Main.HumanModel.BodyModel.Trunk.SegmentsLumbar.PelvisSeg.Left.Muscles.IliacusMedialis2Node.sRel;
AnyFloat Left_Muscles_IliacusMedialis3Node_pos = Main.HumanModel.BodyModel.Trunk.SegmentsLumbar.PelvisSeg.Left.Muscles.IliacusMedialis3Node.sRel;
AnyFloat Left_Muscles_IliacusMedialisViaNode1_pos = Main.HumanModel.BodyModel.Trunk.SegmentsLumbar.PelvisSeg.Left.Muscles.IliacusMedialisViaNode1.sRel;
AnyFloat Left_Muscles_ObturatorExternusInferior1Node_pos = Main.HumanModel.BodyModel.Trunk.SegmentsLumbar.PelvisSeg.Left.Muscles.ObturatorExternusInferior1Node.sRel;
AnyFloat Left_Muscles_ObturatorExternusInferior2Node_pos = Main.HumanModel.BodyModel.Trunk.SegmentsLumbar.PelvisSeg.Left.Muscles.ObturatorExternusInferior2Node.sRel;
AnyFloat Left_Muscles_ObturatorExternusSuperior1Node_pos = Main.HumanModel.BodyModel.Trunk.SegmentsLumbar.PelvisSeg.Left.Muscles.ObturatorExternusSuperior1Node.sRel;
AnyFloat Left_Muscles_ObturatorExternusSuperior2Node_pos = Main.HumanModel.BodyModel.Trunk.SegmentsLumbar.PelvisSeg.Left.Muscles.ObturatorExternusSuperior2Node.sRel;
AnyFloat Left_Muscles_ObturatorExternusSuperior3Node_pos = Main.HumanModel.BodyModel.Trunk.SegmentsLumbar.PelvisSeg.Left.Muscles.ObturatorExternusSuperior3Node.sRel;
AnyFloat Left_Muscles_ObturatorExternusSuperiorViaNode1_pos = Main.HumanModel.BodyModel.Trunk.SegmentsLumbar.PelvisSeg.Left.Muscles.ObturatorExternusSuperiorViaNode1.sRel;
AnyFloat Left_Muscles_ObturatorInternus1Node_pos = Main.HumanModel.BodyModel.Trunk.SegmentsLumbar.PelvisSeg.Left.Muscles.ObturatorInternus1Node.sRel;
AnyFloat Left_Muscles_ObturatorInternus2Node_pos = Main.HumanModel.BodyModel.Trunk.SegmentsLumbar.PelvisSeg.Left.Muscles.ObturatorInternus2Node.sRel;
AnyFloat Left_Muscles_ObturatorInternus3Node_pos = Main.HumanModel.BodyModel.Trunk.SegmentsLumbar.PelvisSeg.Left.Muscles.ObturatorInternus3Node.sRel;
AnyFloat Left_Muscles_ObturatorInternusViaNode1_pos = Main.HumanModel.BodyModel.Trunk.SegmentsLumbar.PelvisSeg.Left.Muscles.ObturatorInternusViaNode1.sRel;
AnyFloat Left_Muscles_Pectineus1Node_pos = Main.HumanModel.BodyModel.Trunk.SegmentsLumbar.PelvisSeg.Left.Muscles.Pectineus1Node.sRel;
AnyFloat Left_Muscles_Pectineus2Node_pos = Main.HumanModel.BodyModel.Trunk.SegmentsLumbar.PelvisSeg.Left.Muscles.Pectineus2Node.sRel;
AnyFloat Left_Muscles_Pectineus3Node_pos = Main.HumanModel.BodyModel.Trunk.SegmentsLumbar.PelvisSeg.Left.Muscles.Pectineus3Node.sRel;
AnyFloat Left_Muscles_Pectineus4Node_pos = Main.HumanModel.BodyModel.Trunk.SegmentsLumbar.PelvisSeg.Left.Muscles.Pectineus4Node.sRel;
AnyFloat Left_Muscles_Piriformis1Node_pos = Main.HumanModel.BodyModel.Trunk.SegmentsLumbar.PelvisSeg.Left.Muscles.Piriformis1Node.sRel;
AnyFloat Left_Muscles_PsoasMinor1Node_pos = Main.HumanModel.BodyModel.Trunk.SegmentsLumbar.PelvisSeg.Left.Muscles.PsoasMinor1Node.sRel;
AnyFloat Left_Muscles_PsoasMinorViaNode1_pos = Main.HumanModel.BodyModel.Trunk.SegmentsLumbar.PelvisSeg.Left.Muscles.PsoasMinorViaNode1.sRel;
AnyFloat Left_Muscles_PsoasMajor1Node_pos = Main.HumanModel.BodyModel.Trunk.SegmentsLumbar.PelvisSeg.Left.Muscles.PsoasMajor1Node.sRel;
AnyFloat Left_Muscles_PsoasMajor2Node_pos = Main.HumanModel.BodyModel.Trunk.SegmentsLumbar.PelvisSeg.Left.Muscles.PsoasMajor2Node.sRel;
AnyFloat Left_Muscles_PsoasMajor3Node_pos = Main.HumanModel.BodyModel.Trunk.SegmentsLumbar.PelvisSeg.Left.Muscles.PsoasMajor3Node.sRel;
AnyFloat Left_Muscles_PsoasMajorViaNode1_pos = Main.HumanModel.BodyModel.Trunk.SegmentsLumbar.PelvisSeg.Left.Muscles.PsoasMajorViaNode1.sRel;
AnyFloat Left_Muscles_QuadratusFemoris1Node_pos = Main.HumanModel.BodyModel.Trunk.SegmentsLumbar.PelvisSeg.Left.Muscles.QuadratusFemoris1Node.sRel;
AnyFloat Left_Muscles_QuadratusFemoris2Node_pos = Main.HumanModel.BodyModel.Trunk.SegmentsLumbar.PelvisSeg.Left.Muscles.QuadratusFemoris2Node.sRel;
AnyFloat Left_Muscles_QuadratusFemoris3Node_pos = Main.HumanModel.BodyModel.Trunk.SegmentsLumbar.PelvisSeg.Left.Muscles.QuadratusFemoris3Node.sRel;
AnyFloat Left_Muscles_QuadratusFemoris4Node_pos = Main.HumanModel.BodyModel.Trunk.SegmentsLumbar.PelvisSeg.Left.Muscles.QuadratusFemoris4Node.sRel;
AnyFloat Left_Muscles_RectusFemoris1Node_pos = Main.HumanModel.BodyModel.Trunk.SegmentsLumbar.PelvisSeg.Left.Muscles.RectusFemoris1Node.sRel;
AnyFloat Left_Muscles_RectusFemoris2Node_pos = Main.HumanModel.BodyModel.Trunk.SegmentsLumbar.PelvisSeg.Left.Muscles.RectusFemoris2Node.sRel;
AnyFloat Left_Muscles_SartoriusProximal1Node_pos = Main.HumanModel.BodyModel.Trunk.SegmentsLumbar.PelvisSeg.Left.Muscles.SartoriusProximal1Node.sRel;
AnyFloat Left_Muscles_SartoriusDistal1Node_pos = Main.HumanModel.BodyModel.Trunk.SegmentsLumbar.PelvisSeg.Left.Muscles.SartoriusDistal1Node.sRel;
AnyFloat Left_Muscles_Semimembranosus1Node_pos = Main.HumanModel.BodyModel.Trunk.SegmentsLumbar.PelvisSeg.Left.Muscles.Semimembranosus1Node.sRel;
AnyFloat Left_Muscles_Semitendinosus1Node_pos = Main.HumanModel.BodyModel.Trunk.SegmentsLumbar.PelvisSeg.Left.Muscles.Semitendinosus1Node.sRel;
AnyFloat Left_Muscles_TensorFasciaeLatae1Node_pos = Main.HumanModel.BodyModel.Trunk.SegmentsLumbar.PelvisSeg.Left.Muscles.TensorFasciaeLatae1Node.sRel;
AnyFloat Left_Muscles_TensorFasciaeLatae2Node_pos = Main.HumanModel.BodyModel.Trunk.SegmentsLumbar.PelvisSeg.Left.Muscles.TensorFasciaeLatae2Node.sRel;
AnyFloat Left_Muscles_IlioFemAntOrig_pos = Main.HumanModel.BodyModel.Trunk.SegmentsLumbar.PelvisSeg.Left.Muscles.IlioFemAntOrig.sRel;
AnyFloat Left_Muscles_IlioFemLatOrig_pos = Main.HumanModel.BodyModel.Trunk.SegmentsLumbar.PelvisSeg.Left.Muscles.IlioFemLatOrig.sRel;
AnyFloat Left_Muscles_PuboFemOrig_pos = Main.HumanModel.BodyModel.Trunk.SegmentsLumbar.PelvisSeg.Left.Muscles.PuboFemOrig.sRel;
AnyFloat Left_Muscles_IschioFemOrig_pos = Main.HumanModel.BodyModel.Trunk.SegmentsLumbar.PelvisSeg.Left.Muscles.IschioFemOrig.sRel;
};


AnyFolder SacrumSeg = {
AnyFloat ScalingNode_pos        =Main.HumanModel.BodyModel.Trunk.SegmentsLumbar.SacrumSeg.ScalingNode.sRel;
AnyFloat SacrumL5JntNode_pos    =Main.HumanModel.BodyModel.Trunk.SegmentsLumbar.SacrumSeg.SacrumL5JntNode.sRel;
AnyFloat SacrumPelvisJntNode_pos=Main.HumanModel.BodyModel.Trunk.SegmentsLumbar.SacrumSeg.SacrumPelvisJntNode.sRel;
AnyFloat SacrumContactNode_pos  =Main.HumanModel.BodyModel.Trunk.SegmentsLumbar.SacrumSeg.SacrumContactNode.sRel;
AnyFloat SacrumRContactNode_pos = Main.HumanModel.BodyModel.Trunk.SegmentsLumbar.SacrumSeg.SacrumRContactNode.sRel;
AnyFloat SacrumLContactNode_pos = Main.HumanModel.BodyModel.Trunk.SegmentsLumbar.SacrumSeg.SacrumLContactNode.sRel;
};

AnyFolder L5Seg = {
AnyFloat ScalingNode_pos = Main.HumanModel.BodyModel.Trunk.SegmentsLumbar.L5Seg.ScalingNode.sRel;
AnyFloat L5SacrumJntNode_pos = Main.HumanModel.BodyModel.Trunk.SegmentsLumbar.L5Seg.L5SacrumJntNode.sRel;
AnyFloat L4L5JntNode_pos = Main.HumanModel.BodyModel.Trunk.SegmentsLumbar.L5Seg.L4L5JntNode.sRel;
AnyFloat Right_pos = Main.HumanModel.BodyModel.Trunk.SegmentsLumbar.L5Seg.Right.sRel;
AnyFloat Left_pos = Main.HumanModel.BodyModel.Trunk.SegmentsLumbar.L5Seg.Left.sRel;
AnyFloat LINodeSuperior_pos = Main.HumanModel.BodyModel.Trunk.SegmentsLumbar.L5Seg.LINodeSuperior.sRel;
AnyFloat MFdL3L5NodeR_pos = Main.HumanModel.BodyModel.Trunk.SegmentsLumbar.L5Seg.MFdL3L5NodeR.sRel;
AnyFloat MFdL3L5NodeL_pos = Main.HumanModel.BodyModel.Trunk.SegmentsLumbar.L5Seg.MFdL3L5NodeL.sRel;
AnyFloat MFdL5S1NodeR_pos = Main.HumanModel.BodyModel.Trunk.SegmentsLumbar.L5Seg.MFdL5S1NodeR.sRel;
AnyFloat MFdL5S1NodeL_pos = Main.HumanModel.BodyModel.Trunk.SegmentsLumbar.L5Seg.MFdL5S1NodeL.sRel;
AnyFloat MFmL2L5NodeR_pos = Main.HumanModel.BodyModel.Trunk.SegmentsLumbar.L5Seg.MFmL2L5NodeR.sRel;
AnyFloat MFmL2L5NodeL_pos = Main.HumanModel.BodyModel.Trunk.SegmentsLumbar.L5Seg.MFmL2L5NodeL.sRel;
AnyFloat MFmL5SacrumNodeR_pos = Main.HumanModel.BodyModel.Trunk.SegmentsLumbar.L5Seg.MFmL5SacrumNodeR.sRel;
AnyFloat MFmL5SacrumNodeL_pos = Main.HumanModel.BodyModel.Trunk.SegmentsLumbar.L5Seg.MFmL5SacrumNodeL.sRel;
AnyFloat MFtsL1L5NodeR_pos = Main.HumanModel.BodyModel.Trunk.SegmentsLumbar.L5Seg.MFtsL1L5NodeR.sRel;
AnyFloat MFtsL1L5NodeL_pos = Main.HumanModel.BodyModel.Trunk.SegmentsLumbar.L5Seg.MFtsL1L5NodeL.sRel;
AnyFloat MFtsL2L5NodeR_pos = Main.HumanModel.BodyModel.Trunk.SegmentsLumbar.L5Seg.MFtsL2L5NodeR.sRel;
AnyFloat MFtsL2L5NodeL_pos = Main.HumanModel.BodyModel.Trunk.SegmentsLumbar.L5Seg.MFtsL2L5NodeL.sRel;
AnyFloat MFtsL5SacrumNodeR_pos = Main.HumanModel.BodyModel.Trunk.SegmentsLumbar.L5Seg.MFtsL5SacrumNodeR.sRel;
AnyFloat MFtsL5SacrumNodeL_pos = Main.HumanModel.BodyModel.Trunk.SegmentsLumbar.L5Seg.MFtsL5SacrumNodeL.sRel;
AnyFloat LTplL5IliumNodeR_pos = Main.HumanModel.BodyModel.Trunk.SegmentsLumbar.L5Seg.LTplL5IliumNodeR.sRel;
AnyFloat LTplL5IliumNodeL_pos = Main.HumanModel.BodyModel.Trunk.SegmentsLumbar.L5Seg.LTplL5IliumNodeL.sRel;
AnyFloat LTptT5L5NodeR_pos = Main.HumanModel.BodyModel.Trunk.SegmentsLumbar.L5Seg.LTptT5L5NodeR.sRel;
AnyFloat LTptT5L5NodeL_pos = Main.HumanModel.BodyModel.Trunk.SegmentsLumbar.L5Seg.LTptT5L5NodeL.sRel;
AnyFloat LTptT6S1Via11NodeR_pos = Main.HumanModel.BodyModel.Trunk.SegmentsLumbar.L5Seg.LTptT6S1Via11NodeR.sRel;
AnyFloat LTptT6S1Via11NodeL_pos = Main.HumanModel.BodyModel.Trunk.SegmentsLumbar.L5Seg.LTptT6S1Via11NodeL.sRel;
AnyFloat LTptT7S2Via10NodeR_pos = Main.HumanModel.BodyModel.Trunk.SegmentsLumbar.L5Seg.LTptT7S2Via10NodeR.sRel;
AnyFloat LTptT7S2Via10NodeL_pos = Main.HumanModel.BodyModel.Trunk.SegmentsLumbar.L5Seg.LTptT7S2Via10NodeL.sRel;
AnyFloat LTptT8S3Via9NodeR_pos = Main.HumanModel.BodyModel.Trunk.SegmentsLumbar.L5Seg.LTptT8S3Via9NodeR.sRel;
AnyFloat LTptT8S3Via9NodeL_pos = Main.HumanModel.BodyModel.Trunk.SegmentsLumbar.L5Seg.LTptT8S3Via9NodeL.sRel;
AnyFloat LTptT9S4Via8NodeR_pos = Main.HumanModel.BodyModel.Trunk.SegmentsLumbar.L5Seg.LTptT9S4Via8NodeR.sRel;
AnyFloat LTptT9S4Via8NodeL_pos = Main.HumanModel.BodyModel.Trunk.SegmentsLumbar.L5Seg.LTptT9S4Via8NodeL.sRel;
AnyFloat LTptT10SacrumVia7NodeR_pos = Main.HumanModel.BodyModel.Trunk.SegmentsLumbar.L5Seg.LTptT10SacrumVia7NodeR.sRel;
AnyFloat LTptT10SacrumVia7NodeL_pos = Main.HumanModel.BodyModel.Trunk.SegmentsLumbar.L5Seg.LTptT10SacrumVia7NodeL.sRel;
AnyFloat LTptT11SacrumVia6NodeR_pos = Main.HumanModel.BodyModel.Trunk.SegmentsLumbar.L5Seg.LTptT11SacrumVia6NodeR.sRel;
AnyFloat LTptT11SacrumVia6NodeL_pos = Main.HumanModel.BodyModel.Trunk.SegmentsLumbar.L5Seg.LTptT11SacrumVia6NodeL.sRel;
AnyFloat LTptT12SacrumVia5NodeR_pos = Main.HumanModel.BodyModel.Trunk.SegmentsLumbar.L5Seg.LTptT12SacrumVia5NodeR.sRel;
AnyFloat LTptT12SacrumVia5NodeL_pos = Main.HumanModel.BodyModel.Trunk.SegmentsLumbar.L5Seg.LTptT12SacrumVia5NodeL.sRel;
AnyFloat PML5_TMNodeR_pos = Main.HumanModel.BodyModel.Trunk.SegmentsLumbar.L5Seg.PML5_TMNodeR.sRel;
AnyFloat PML5_TMNodeL_pos = Main.HumanModel.BodyModel.Trunk.SegmentsLumbar.L5Seg.PML5_TMNodeL.sRel;
AnyFloat PML5T_TMNodeR_pos = Main.HumanModel.BodyModel.Trunk.SegmentsLumbar.L5Seg.PML5T_TMNodeR.sRel;
AnyFloat PML5T_TMNodeL_pos = Main.HumanModel.BodyModel.Trunk.SegmentsLumbar.L5Seg.PML5T_TMNodeL.sRel;
AnyFloat PMT12I_TMVia4NodeR_pos = Main.HumanModel.BodyModel.Trunk.SegmentsLumbar.L5Seg.PMT12I_TMVia4NodeR.sRel;
AnyFloat PMT12I_TMVia4NodeL_pos = Main.HumanModel.BodyModel.Trunk.SegmentsLumbar.L5Seg.PMT12I_TMVia4NodeL.sRel;
AnyFloat PML1I_TMVia3NodeR_pos = Main.HumanModel.BodyModel.Trunk.SegmentsLumbar.L5Seg.PML1I_TMVia3NodeR.sRel;
AnyFloat PML1I_TMVia3NodeL_pos = Main.HumanModel.BodyModel.Trunk.SegmentsLumbar.L5Seg.PML1I_TMVia3NodeL.sRel;
AnyFloat PML2I_TMVia2NodeR_pos = Main.HumanModel.BodyModel.Trunk.SegmentsLumbar.L5Seg.PML2I_TMVia2NodeR.sRel;
AnyFloat PML2I_TMVia2NodeL_pos = Main.HumanModel.BodyModel.Trunk.SegmentsLumbar.L5Seg.PML2I_TMVia2NodeL.sRel;
AnyFloat PML3I_TMVia1NodeR_pos = Main.HumanModel.BodyModel.Trunk.SegmentsLumbar.L5Seg.PML3I_TMVia1NodeR.sRel;
AnyFloat PML3I_TMVia1NodeL_pos = Main.HumanModel.BodyModel.Trunk.SegmentsLumbar.L5Seg.PML3I_TMVia1NodeL.sRel;
AnyFloat PML1T_TMVia4NodeR_pos = Main.HumanModel.BodyModel.Trunk.SegmentsLumbar.L5Seg.PML1T_TMVia4NodeR.sRel;
AnyFloat PML1T_TMVia4NodeL_pos = Main.HumanModel.BodyModel.Trunk.SegmentsLumbar.L5Seg.PML1T_TMVia4NodeL.sRel;
AnyFloat PML2T_TMVia3NodeR_pos = Main.HumanModel.BodyModel.Trunk.SegmentsLumbar.L5Seg.PML2T_TMVia3NodeR.sRel;
AnyFloat PML2T_TMVia3NodeL_pos = Main.HumanModel.BodyModel.Trunk.SegmentsLumbar.L5Seg.PML2T_TMVia3NodeL.sRel;
AnyFloat PML3T_TMVia2NodeR_pos = Main.HumanModel.BodyModel.Trunk.SegmentsLumbar.L5Seg.PML3T_TMVia2NodeR.sRel;
AnyFloat PML3T_TMVia2NodeL_pos = Main.HumanModel.BodyModel.Trunk.SegmentsLumbar.L5Seg.PML3T_TMVia2NodeL.sRel;
AnyFloat PML4T_TMVia1NodeR_pos = Main.HumanModel.BodyModel.Trunk.SegmentsLumbar.L5Seg.PML4T_TMVia1NodeR.sRel;
AnyFloat PML4T_TMVia1NodeL_pos = Main.HumanModel.BodyModel.Trunk.SegmentsLumbar.L5Seg.PML4T_TMVia1NodeL.sRel;
AnyFloat OEC10_RSNodeR_pos = Main.HumanModel.BodyModel.Trunk.SegmentsLumbar.L5Seg.OEC10_RSNodeR.sRel;
AnyFloat OEC10_RSNodeL_pos = Main.HumanModel.BodyModel.Trunk.SegmentsLumbar.L5Seg.OEC10_RSNodeL.sRel;
AnyFloat BuckleContactNode_pos = Main.HumanModel.BodyModel.Trunk.SegmentsLumbar.L5Seg.BuckleContactNode.sRel;
AnyFloat L5RContactNode_pos = Main.HumanModel.BodyModel.Trunk.SegmentsLumbar.L5Seg.L5RContactNode.sRel;
AnyFloat L5LContactNode_pos = Main.HumanModel.BodyModel.Trunk.SegmentsLumbar.L5Seg.L5LContactNode.sRel;
AnyFloat MFL5T12NodeR_pos = Main.HumanModel.BodyModel.Trunk.SegmentsLumbar.L5Seg.MFL5T12NodeR.sRel;
AnyFloat MFL5T12NodeL_pos = Main.HumanModel.BodyModel.Trunk.SegmentsLumbar.L5Seg.MFL5T12NodeL.sRel;
};
AnyFolder L4Seg = {
AnyFloat ScalingNode_pos = Main.HumanModel.BodyModel.Trunk.SegmentsLumbar.L4Seg.ScalingNode.sRel;
AnyFloat L4L5JntNode_pos = Main.HumanModel.BodyModel.Trunk.SegmentsLumbar.L4Seg.L4L5JntNode.sRel;
AnyFloat L3L4JntNode_pos = Main.HumanModel.BodyModel.Trunk.SegmentsLumbar.L4Seg.L3L4JntNode.sRel;
AnyFloat Right_pos = Main.HumanModel.BodyModel.Trunk.SegmentsLumbar.L4Seg.Right.sRel;
AnyFloat Left_pos = Main.HumanModel.BodyModel.Trunk.SegmentsLumbar.L4Seg.Left.sRel;
AnyFloat LSNode_pos = Main.HumanModel.BodyModel.Trunk.SegmentsLumbar.L4Seg.LSNode.sRel;
AnyFloat LINodeInferior_pos = Main.HumanModel.BodyModel.Trunk.SegmentsLumbar.L4Seg.LINodeInferior.sRel;
AnyFloat LINodeSuperior_pos = Main.HumanModel.BodyModel.Trunk.SegmentsLumbar.L4Seg.LINodeSuperior.sRel;
AnyFloat MFdL2L4NodeR_pos = Main.HumanModel.BodyModel.Trunk.SegmentsLumbar.L4Seg.MFdL2L4NodeR.sRel;
AnyFloat MFdL2L4NodeL_pos = Main.HumanModel.BodyModel.Trunk.SegmentsLumbar.L4Seg.MFdL2L4NodeL.sRel;
AnyFloat MFdL4S1NodeR_pos = Main.HumanModel.BodyModel.Trunk.SegmentsLumbar.L4Seg.MFdL4S1NodeR.sRel;
AnyFloat MFdL4S1NodeL_pos = Main.HumanModel.BodyModel.Trunk.SegmentsLumbar.L4Seg.MFdL4S1NodeL.sRel;
AnyFloat MFmL1L4NodeR_pos = Main.HumanModel.BodyModel.Trunk.SegmentsLumbar.L4Seg.MFmL1L4NodeR.sRel;
AnyFloat MFmL1L4NodeL_pos = Main.HumanModel.BodyModel.Trunk.SegmentsLumbar.L4Seg.MFmL1L4NodeL.sRel;
AnyFloat MFmL4SacrumNodeR_pos = Main.HumanModel.BodyModel.Trunk.SegmentsLumbar.L4Seg.MFmL4SacrumNodeR.sRel;
AnyFloat MFmL4SacrumNodeL_pos = Main.HumanModel.BodyModel.Trunk.SegmentsLumbar.L4Seg.MFmL4SacrumNodeL.sRel;
AnyFloat MFtsL4SacrumNodeR_pos = Main.HumanModel.BodyModel.Trunk.SegmentsLumbar.L4Seg.MFtsL4SacrumNodeR.sRel;
AnyFloat MFtsL4SacrumNodeL_pos = Main.HumanModel.BodyModel.Trunk.SegmentsLumbar.L4Seg.MFtsL4SacrumNodeL.sRel;
AnyFloat ILplL4CINodeR_pos = Main.HumanModel.BodyModel.Trunk.SegmentsLumbar.L4Seg.ILplL4CINodeR.sRel;
AnyFloat ILplL4CINodeL_pos = Main.HumanModel.BodyModel.Trunk.SegmentsLumbar.L4Seg.ILplL4CINodeL.sRel;
AnyFloat LTplL4SIPSNodeR_pos = Main.HumanModel.BodyModel.Trunk.SegmentsLumbar.L4Seg.LTplL4SIPSNodeR.sRel;
AnyFloat LTplL4SIPSNodeL_pos = Main.HumanModel.BodyModel.Trunk.SegmentsLumbar.L4Seg.LTplL4SIPSNodeL.sRel;
AnyFloat LTptT4L4NodeR_pos = Main.HumanModel.BodyModel.Trunk.SegmentsLumbar.L4Seg.LTptT4L4NodeR.sRel;
AnyFloat LTptT4L4NodeL_pos = Main.HumanModel.BodyModel.Trunk.SegmentsLumbar.L4Seg.LTptT4L4NodeL.sRel;
AnyFloat ILplL1CIViaNodeR_pos = Main.HumanModel.BodyModel.Trunk.SegmentsLumbar.L4Seg.ILplL1CIViaNodeR.sRel;
AnyFloat ILplL1CIViaNodeL_pos = Main.HumanModel.BodyModel.Trunk.SegmentsLumbar.L4Seg.ILplL1CIViaNodeL.sRel;
AnyFloat ILplL2CIViaNodeR_pos = Main.HumanModel.BodyModel.Trunk.SegmentsLumbar.L4Seg.ILplL2CIViaNodeR.sRel;
AnyFloat ILplL2CIViaNodeL_pos = Main.HumanModel.BodyModel.Trunk.SegmentsLumbar.L4Seg.ILplL2CIViaNodeL.sRel;
AnyFloat LTptT5L5Via11NodeR_pos = Main.HumanModel.BodyModel.Trunk.SegmentsLumbar.L4Seg.LTptT5L5Via11NodeR.sRel;
AnyFloat LTptT5L5Via11NodeL_pos = Main.HumanModel.BodyModel.Trunk.SegmentsLumbar.L4Seg.LTptT5L5Via11NodeL.sRel;
AnyFloat LTptT6S1Via10NodeR_pos = Main.HumanModel.BodyModel.Trunk.SegmentsLumbar.L4Seg.LTptT6S1Via10NodeR.sRel;
AnyFloat LTptT6S1Via10NodeL_pos = Main.HumanModel.BodyModel.Trunk.SegmentsLumbar.L4Seg.LTptT6S1Via10NodeL.sRel;
AnyFloat LTptT7S2Via9NodeR_pos = Main.HumanModel.BodyModel.Trunk.SegmentsLumbar.L4Seg.LTptT7S2Via9NodeR.sRel;
AnyFloat LTptT7S2Via9NodeL_pos = Main.HumanModel.BodyModel.Trunk.SegmentsLumbar.L4Seg.LTptT7S2Via9NodeL.sRel;
AnyFloat LTptT8S3Via8NodeR_pos = Main.HumanModel.BodyModel.Trunk.SegmentsLumbar.L4Seg.LTptT8S3Via8NodeR.sRel;
AnyFloat LTptT8S3Via8NodeL_pos = Main.HumanModel.BodyModel.Trunk.SegmentsLumbar.L4Seg.LTptT8S3Via8NodeL.sRel;
AnyFloat LTptT9S4Via7NodeR_pos = Main.HumanModel.BodyModel.Trunk.SegmentsLumbar.L4Seg.LTptT9S4Via7NodeR.sRel;
AnyFloat LTptT9S4Via7NodeL_pos = Main.HumanModel.BodyModel.Trunk.SegmentsLumbar.L4Seg.LTptT9S4Via7NodeL.sRel;
AnyFloat LTptT10SacrumVia6NodeR_pos = Main.HumanModel.BodyModel.Trunk.SegmentsLumbar.L4Seg.LTptT10SacrumVia6NodeR.sRel;
AnyFloat LTptT10SacrumVia6NodeL_pos = Main.HumanModel.BodyModel.Trunk.SegmentsLumbar.L4Seg.LTptT10SacrumVia6NodeL.sRel;
AnyFloat LTptT11SacrumVia5NodeR_pos = Main.HumanModel.BodyModel.Trunk.SegmentsLumbar.L4Seg.LTptT11SacrumVia5NodeR.sRel;
AnyFloat LTptT11SacrumVia5NodeL_pos = Main.HumanModel.BodyModel.Trunk.SegmentsLumbar.L4Seg.LTptT11SacrumVia5NodeL.sRel;
AnyFloat LTptT12SacrumVia4NodeR_pos = Main.HumanModel.BodyModel.Trunk.SegmentsLumbar.L4Seg.LTptT12SacrumVia4NodeR.sRel;
AnyFloat LTptT12SacrumVia4NodeL_pos = Main.HumanModel.BodyModel.Trunk.SegmentsLumbar.L4Seg.LTptT12SacrumVia4NodeL.sRel;
AnyFloat PML4I_TMNodeR_pos = Main.HumanModel.BodyModel.Trunk.SegmentsLumbar.L4Seg.PML4I_TMNodeR.sRel;
AnyFloat PML4I_TMNodeL_pos = Main.HumanModel.BodyModel.Trunk.SegmentsLumbar.L4Seg.PML4I_TMNodeL.sRel;
AnyFloat PML4T_TMNodeR_pos = Main.HumanModel.BodyModel.Trunk.SegmentsLumbar.L4Seg.PML4T_TMNodeR.sRel;
AnyFloat PML4T_TMNodeL_pos = Main.HumanModel.BodyModel.Trunk.SegmentsLumbar.L4Seg.PML4T_TMNodeL.sRel;
AnyFloat PMT12I_TMVia3NodeR_pos = Main.HumanModel.BodyModel.Trunk.SegmentsLumbar.L4Seg.PMT12I_TMVia3NodeR.sRel;
AnyFloat PMT12I_TMVia3NodeL_pos = Main.HumanModel.BodyModel.Trunk.SegmentsLumbar.L4Seg.PMT12I_TMVia3NodeL.sRel;
AnyFloat PML1I_TMVia2NodeR_pos = Main.HumanModel.BodyModel.Trunk.SegmentsLumbar.L4Seg.PML1I_TMVia2NodeR.sRel;
AnyFloat PML1I_TMVia2NodeL_pos = Main.HumanModel.BodyModel.Trunk.SegmentsLumbar.L4Seg.PML1I_TMVia2NodeL.sRel;
AnyFloat PML2I_TMVia1NodeR_pos = Main.HumanModel.BodyModel.Trunk.SegmentsLumbar.L4Seg.PML2I_TMVia1NodeR.sRel;
AnyFloat PML2I_TMVia1NodeL_pos = Main.HumanModel.BodyModel.Trunk.SegmentsLumbar.L4Seg.PML2I_TMVia1NodeL.sRel;
AnyFloat PML1T_TMVia3NodeR_pos = Main.HumanModel.BodyModel.Trunk.SegmentsLumbar.L4Seg.PML1T_TMVia3NodeR.sRel;
AnyFloat PML1T_TMVia3NodeL_pos = Main.HumanModel.BodyModel.Trunk.SegmentsLumbar.L4Seg.PML1T_TMVia3NodeL.sRel;
AnyFloat PML2T_TMVia2NodeR_pos = Main.HumanModel.BodyModel.Trunk.SegmentsLumbar.L4Seg.PML2T_TMVia2NodeR.sRel;
AnyFloat PML2T_TMVia2NodeL_pos = Main.HumanModel.BodyModel.Trunk.SegmentsLumbar.L4Seg.PML2T_TMVia2NodeL.sRel;
AnyFloat PML3T_TMVia1NodeR_pos = Main.HumanModel.BodyModel.Trunk.SegmentsLumbar.L4Seg.PML3T_TMVia1NodeR.sRel;
AnyFloat PML3T_TMVia1NodeL_pos = Main.HumanModel.BodyModel.Trunk.SegmentsLumbar.L4Seg.PML3T_TMVia1NodeL.sRel;
AnyFloat QLL4_CINodeR_pos = Main.HumanModel.BodyModel.Trunk.SegmentsLumbar.L4Seg.QLL4_CINodeR.sRel;
AnyFloat QLL4_CINodeL_pos = Main.HumanModel.BodyModel.Trunk.SegmentsLumbar.L4Seg.QLL4_CINodeL.sRel;
AnyFloat OEC9_RSNodeR_pos = Main.HumanModel.BodyModel.Trunk.SegmentsLumbar.L4Seg.OEC9_RSNodeR.sRel;
AnyFloat OEC9_RSNodeL_pos = Main.HumanModel.BodyModel.Trunk.SegmentsLumbar.L4Seg.OEC9_RSNodeL.sRel;
AnyFloat OICI_RS3NodeR_pos = Main.HumanModel.BodyModel.Trunk.SegmentsLumbar.L4Seg.OICI_RS3NodeR.sRel;
AnyFloat OICI_RS3NodeL_pos = Main.HumanModel.BodyModel.Trunk.SegmentsLumbar.L4Seg.OICI_RS3NodeL.sRel;
AnyFloat MidPoint_pos = Main.HumanModel.BodyModel.Trunk.SegmentsLumbar.L4Seg.MidPoint.sRel;
AnyFloat SupportNode_pos = Main.HumanModel.BodyModel.Trunk.SegmentsLumbar.L4Seg.SupportNode.sRel;
AnyFloat BuckleContactNode_pos = Main.HumanModel.BodyModel.Trunk.SegmentsLumbar.L4Seg.BuckleContactNode.sRel;
AnyFloat L4RContactNode_pos = Main.HumanModel.BodyModel.Trunk.SegmentsLumbar.L4Seg.L4RContactNode.sRel;
AnyFloat L4LContactNode_pos = Main.HumanModel.BodyModel.Trunk.SegmentsLumbar.L4Seg.L4LContactNode.sRel;
AnyFloat MFL4T11NodeR_pos = Main.HumanModel.BodyModel.Trunk.SegmentsLumbar.L4Seg.MFL4T11NodeR.sRel;
AnyFloat MFL4T11NodeL_pos = Main.HumanModel.BodyModel.Trunk.SegmentsLumbar.L4Seg.MFL4T11NodeL.sRel;
AnyFloat MFL4T12NodeR_pos = Main.HumanModel.BodyModel.Trunk.SegmentsLumbar.L4Seg.MFL4T12NodeR.sRel;
AnyFloat MFL4T12NodeL_pos = Main.HumanModel.BodyModel.Trunk.SegmentsLumbar.L4Seg.MFL4T12NodeL.sRel;
};
AnyFolder L3Seg = {
AnyFloat ScalingNode_pos = Main.HumanModel.BodyModel.Trunk.SegmentsLumbar.L3Seg.ScalingNode.sRel;
AnyFloat L3L4JntNode_pos = Main.HumanModel.BodyModel.Trunk.SegmentsLumbar.L3Seg.L3L4JntNode.sRel;
AnyFloat L2L3JntNode_pos = Main.HumanModel.BodyModel.Trunk.SegmentsLumbar.L3Seg.L2L3JntNode.sRel;
AnyFloat Right_pos = Main.HumanModel.BodyModel.Trunk.SegmentsLumbar.L3Seg.Right.sRel;
AnyFloat Left_pos = Main.HumanModel.BodyModel.Trunk.SegmentsLumbar.L3Seg.Left.sRel;
AnyFloat LSNode_pos = Main.HumanModel.BodyModel.Trunk.SegmentsLumbar.L3Seg.LSNode.sRel;
AnyFloat LINodeInferior_pos = Main.HumanModel.BodyModel.Trunk.SegmentsLumbar.L3Seg.LINodeInferior.sRel;
AnyFloat LINodeSuperior_pos = Main.HumanModel.BodyModel.Trunk.SegmentsLumbar.L3Seg.LINodeSuperior.sRel;
AnyFloat MFdL1L3NodeR_pos = Main.HumanModel.BodyModel.Trunk.SegmentsLumbar.L3Seg.MFdL1L3NodeR.sRel;
AnyFloat MFdL1L3NodeL_pos = Main.HumanModel.BodyModel.Trunk.SegmentsLumbar.L3Seg.MFdL1L3NodeL.sRel;
AnyFloat MFdL3L5NodeR_pos = Main.HumanModel.BodyModel.Trunk.SegmentsLumbar.L3Seg.MFdL3L5NodeR.sRel;
AnyFloat MFdL3L5NodeL_pos = Main.HumanModel.BodyModel.Trunk.SegmentsLumbar.L3Seg.MFdL3L5NodeL.sRel;
AnyFloat MFmL3S1NodeR_pos = Main.HumanModel.BodyModel.Trunk.SegmentsLumbar.L3Seg.MFmL3S1NodeR.sRel;
AnyFloat MFmL3S1NodeL_pos = Main.HumanModel.BodyModel.Trunk.SegmentsLumbar.L3Seg.MFmL3S1NodeL.sRel;
AnyFloat MFtsL3LigamentNodeR_pos = Main.HumanModel.BodyModel.Trunk.SegmentsLumbar.L3Seg.MFtsL3LigamentNodeR.sRel;
AnyFloat MFtsL3LigamentNodeL_pos = Main.HumanModel.BodyModel.Trunk.SegmentsLumbar.L3Seg.MFtsL3LigamentNodeL.sRel;
AnyFloat ILplL3CINodeR_pos = Main.HumanModel.BodyModel.Trunk.SegmentsLumbar.L3Seg.ILplL3CINodeR.sRel;
AnyFloat ILplL3CINodeL_pos = Main.HumanModel.BodyModel.Trunk.SegmentsLumbar.L3Seg.ILplL3CINodeL.sRel;
AnyFloat LTplL3SIPSNodeR_pos = Main.HumanModel.BodyModel.Trunk.SegmentsLumbar.L3Seg.LTplL3SIPSNodeR.sRel;
AnyFloat LTplL3SIPSNodeL_pos = Main.HumanModel.BodyModel.Trunk.SegmentsLumbar.L3Seg.LTplL3SIPSNodeL.sRel;
AnyFloat LTptT3L3NodeR_pos = Main.HumanModel.BodyModel.Trunk.SegmentsLumbar.L3Seg.LTptT3L3NodeR.sRel;
AnyFloat LTptT3L3NodeL_pos = Main.HumanModel.BodyModel.Trunk.SegmentsLumbar.L3Seg.LTptT3L3NodeL.sRel;
AnyFloat ILplL1CIViaNodeR_pos = Main.HumanModel.BodyModel.Trunk.SegmentsLumbar.L3Seg.ILplL1CIViaNodeR.sRel;
AnyFloat ILplL1CIViaNodeL_pos = Main.HumanModel.BodyModel.Trunk.SegmentsLumbar.L3Seg.ILplL1CIViaNodeL.sRel;
AnyFloat ILplL2CIViaNodeR_pos = Main.HumanModel.BodyModel.Trunk.SegmentsLumbar.L3Seg.ILplL2CIViaNodeR.sRel;
AnyFloat ILplL2CIViaNodeL_pos = Main.HumanModel.BodyModel.Trunk.SegmentsLumbar.L3Seg.ILplL2CIViaNodeL.sRel;
AnyFloat LTplL1SIPSViaNodeR_pos = Main.HumanModel.BodyModel.Trunk.SegmentsLumbar.L3Seg.LTplL1SIPSViaNodeR.sRel;
AnyFloat LTplL1SIPSViaNodeL_pos = Main.HumanModel.BodyModel.Trunk.SegmentsLumbar.L3Seg.LTplL1SIPSViaNodeL.sRel;
AnyFloat LTplL2SIPSViaNodeR_pos = Main.HumanModel.BodyModel.Trunk.SegmentsLumbar.L3Seg.LTplL2SIPSViaNodeR.sRel;
AnyFloat LTplL2SIPSViaNodeL_pos = Main.HumanModel.BodyModel.Trunk.SegmentsLumbar.L3Seg.LTplL2SIPSViaNodeL.sRel;
AnyFloat ILptC5SIPSVia9NodeR_pos = Main.HumanModel.BodyModel.Trunk.SegmentsLumbar.L3Seg.ILptC5SIPSVia9NodeR.sRel;
AnyFloat ILptC5SIPSVia9NodeL_pos = Main.HumanModel.BodyModel.Trunk.SegmentsLumbar.L3Seg.ILptC5SIPSVia9NodeL.sRel;
AnyFloat ILptC6SIPSVia8NodeR_pos = Main.HumanModel.BodyModel.Trunk.SegmentsLumbar.L3Seg.ILptC6SIPSVia8NodeR.sRel;
AnyFloat ILptC6SIPSVia8NodeL_pos = Main.HumanModel.BodyModel.Trunk.SegmentsLumbar.L3Seg.ILptC6SIPSVia8NodeL.sRel;
AnyFloat ILptC7CIVia7NodeR_pos = Main.HumanModel.BodyModel.Trunk.SegmentsLumbar.L3Seg.ILptC7CIVia7NodeR.sRel;
AnyFloat ILptC7CIVia7NodeL_pos = Main.HumanModel.BodyModel.Trunk.SegmentsLumbar.L3Seg.ILptC7CIVia7NodeL.sRel;
AnyFloat ILptC8CIVia6NodeR_pos = Main.HumanModel.BodyModel.Trunk.SegmentsLumbar.L3Seg.ILptC8CIVia6NodeR.sRel;
AnyFloat ILptC8CIVia6NodeL_pos = Main.HumanModel.BodyModel.Trunk.SegmentsLumbar.L3Seg.ILptC8CIVia6NodeL.sRel;
AnyFloat ILptC9CIVia5NodeR_pos = Main.HumanModel.BodyModel.Trunk.SegmentsLumbar.L3Seg.ILptC9CIVia5NodeR.sRel;
AnyFloat ILptC9CIVia5NodeL_pos = Main.HumanModel.BodyModel.Trunk.SegmentsLumbar.L3Seg.ILptC9CIVia5NodeL.sRel;
AnyFloat ILptC10CIVia4NodeR_pos = Main.HumanModel.BodyModel.Trunk.SegmentsLumbar.L3Seg.ILptC10CIVia4NodeR.sRel;
AnyFloat ILptC10CIVia4NodeL_pos = Main.HumanModel.BodyModel.Trunk.SegmentsLumbar.L3Seg.ILptC10CIVia4NodeL.sRel;
AnyFloat ILptC11CIVia3NodeR_pos = Main.HumanModel.BodyModel.Trunk.SegmentsLumbar.L3Seg.ILptC11CIVia3NodeR.sRel;
AnyFloat ILptC11CIVia3NodeL_pos = Main.HumanModel.BodyModel.Trunk.SegmentsLumbar.L3Seg.ILptC11CIVia3NodeL.sRel;
AnyFloat ILptC12CIVia3NodeR_pos = Main.HumanModel.BodyModel.Trunk.SegmentsLumbar.L3Seg.ILptC12CIVia3NodeR.sRel;
AnyFloat ILptC12CIVia3NodeL_pos = Main.HumanModel.BodyModel.Trunk.SegmentsLumbar.L3Seg.ILptC12CIVia3NodeL.sRel;
AnyFloat LTptT4L4Via11NodeR_pos = Main.HumanModel.BodyModel.Trunk.SegmentsLumbar.L3Seg.LTptT4L4Via11NodeR.sRel;
AnyFloat LTptT4L4Via11NodeL_pos = Main.HumanModel.BodyModel.Trunk.SegmentsLumbar.L3Seg.LTptT4L4Via11NodeL.sRel;
AnyFloat LTptT5L5Via10NodeR_pos = Main.HumanModel.BodyModel.Trunk.SegmentsLumbar.L3Seg.LTptT5L5Via10NodeR.sRel;
AnyFloat LTptT5L5Via10NodeL_pos = Main.HumanModel.BodyModel.Trunk.SegmentsLumbar.L3Seg.LTptT5L5Via10NodeL.sRel;
AnyFloat LTptT6S1Via9NodeR_pos = Main.HumanModel.BodyModel.Trunk.SegmentsLumbar.L3Seg.LTptT6S1Via9NodeR.sRel;
AnyFloat LTptT6S1Via9NodeL_pos = Main.HumanModel.BodyModel.Trunk.SegmentsLumbar.L3Seg.LTptT6S1Via9NodeL.sRel;
AnyFloat LTptT7S2Via8NodeR_pos = Main.HumanModel.BodyModel.Trunk.SegmentsLumbar.L3Seg.LTptT7S2Via8NodeR.sRel;
AnyFloat LTptT7S2Via8NodeL_pos = Main.HumanModel.BodyModel.Trunk.SegmentsLumbar.L3Seg.LTptT7S2Via8NodeL.sRel;
AnyFloat LTptT8S3Via7NodeR_pos = Main.HumanModel.BodyModel.Trunk.SegmentsLumbar.L3Seg.LTptT8S3Via7NodeR.sRel;
AnyFloat LTptT8S3Via7NodeL_pos = Main.HumanModel.BodyModel.Trunk.SegmentsLumbar.L3Seg.LTptT8S3Via7NodeL.sRel;
AnyFloat LTptT9S4Via6NodeR_pos = Main.HumanModel.BodyModel.Trunk.SegmentsLumbar.L3Seg.LTptT9S4Via6NodeR.sRel;
AnyFloat LTptT9S4Via6NodeL_pos = Main.HumanModel.BodyModel.Trunk.SegmentsLumbar.L3Seg.LTptT9S4Via6NodeL.sRel;
AnyFloat LTptT10SacrumVia5NodeR_pos = Main.HumanModel.BodyModel.Trunk.SegmentsLumbar.L3Seg.LTptT10SacrumVia5NodeR.sRel;
AnyFloat LTptT10SacrumVia5NodeL_pos = Main.HumanModel.BodyModel.Trunk.SegmentsLumbar.L3Seg.LTptT10SacrumVia5NodeL.sRel;
AnyFloat LTptT11SacrumVia4NodeR_pos = Main.HumanModel.BodyModel.Trunk.SegmentsLumbar.L3Seg.LTptT11SacrumVia4NodeR.sRel;
AnyFloat LTptT11SacrumVia4NodeL_pos = Main.HumanModel.BodyModel.Trunk.SegmentsLumbar.L3Seg.LTptT11SacrumVia4NodeL.sRel;
AnyFloat LTptT12SacrumVia3NodeR_pos = Main.HumanModel.BodyModel.Trunk.SegmentsLumbar.L3Seg.LTptT12SacrumVia3NodeR.sRel;
AnyFloat LTptT12SacrumVia3NodeL_pos = Main.HumanModel.BodyModel.Trunk.SegmentsLumbar.L3Seg.LTptT12SacrumVia3NodeL.sRel;
AnyFloat PML3I_TMNodeR_pos = Main.HumanModel.BodyModel.Trunk.SegmentsLumbar.L3Seg.PML3I_TMNodeR.sRel;
AnyFloat PML3I_TMNodeL_pos = Main.HumanModel.BodyModel.Trunk.SegmentsLumbar.L3Seg.PML3I_TMNodeL.sRel;
AnyFloat PML3T_TMNodeR_pos = Main.HumanModel.BodyModel.Trunk.SegmentsLumbar.L3Seg.PML3T_TMNodeR.sRel;
AnyFloat PML3T_TMNodeL_pos = Main.HumanModel.BodyModel.Trunk.SegmentsLumbar.L3Seg.PML3T_TMNodeL.sRel;
AnyFloat PMT12I_TMVia2NodeR_pos = Main.HumanModel.BodyModel.Trunk.SegmentsLumbar.L3Seg.PMT12I_TMVia2NodeR.sRel;
AnyFloat PMT12I_TMVia2NodeL_pos = Main.HumanModel.BodyModel.Trunk.SegmentsLumbar.L3Seg.PMT12I_TMVia2NodeL.sRel;
AnyFloat PML1I_TMVia1NodeR_pos = Main.HumanModel.BodyModel.Trunk.SegmentsLumbar.L3Seg.PML1I_TMVia1NodeR.sRel;
AnyFloat PML1I_TMVia1NodeL_pos = Main.HumanModel.BodyModel.Trunk.SegmentsLumbar.L3Seg.PML1I_TMVia1NodeL.sRel;
AnyFloat PML1T_TMVia2NodeR_pos = Main.HumanModel.BodyModel.Trunk.SegmentsLumbar.L3Seg.PML1T_TMVia2NodeR.sRel;
AnyFloat PML1T_TMVia2NodeL_pos = Main.HumanModel.BodyModel.Trunk.SegmentsLumbar.L3Seg.PML1T_TMVia2NodeL.sRel;
AnyFloat PML2T_TMVia1NodeR_pos = Main.HumanModel.BodyModel.Trunk.SegmentsLumbar.L3Seg.PML2T_TMVia1NodeR.sRel;
AnyFloat PML2T_TMVia1NodeL_pos = Main.HumanModel.BodyModel.Trunk.SegmentsLumbar.L3Seg.PML2T_TMVia1NodeL.sRel;
AnyFloat QLL3_CINodeR_pos = Main.HumanModel.BodyModel.Trunk.SegmentsLumbar.L3Seg.QLL3_CINodeR.sRel;
AnyFloat QLL3_CINodeL_pos = Main.HumanModel.BodyModel.Trunk.SegmentsLumbar.L3Seg.QLL3_CINodeL.sRel;
AnyFloat OEC8_RSNodeR_pos = Main.HumanModel.BodyModel.Trunk.SegmentsLumbar.L3Seg.OEC8_RSNodeR.sRel;
AnyFloat OEC8_RSNodeL_pos = Main.HumanModel.BodyModel.Trunk.SegmentsLumbar.L3Seg.OEC8_RSNodeL.sRel;
AnyFloat OICI_RS2NodeR_pos = Main.HumanModel.BodyModel.Trunk.SegmentsLumbar.L3Seg.OICI_RS2NodeR.sRel;
AnyFloat OICI_RS2NodeL_pos = Main.HumanModel.BodyModel.Trunk.SegmentsLumbar.L3Seg.OICI_RS2NodeL.sRel;
AnyFloat MidPoint_pos = Main.HumanModel.BodyModel.Trunk.SegmentsLumbar.L3Seg.MidPoint.sRel;
AnyFloat SupportNode_pos = Main.HumanModel.BodyModel.Trunk.SegmentsLumbar.L3Seg.SupportNode.sRel;
AnyFloat BuckleContactNode_pos = Main.HumanModel.BodyModel.Trunk.SegmentsLumbar.L3Seg.BuckleContactNode.sRel;
AnyFloat L3RContactNode_pos = Main.HumanModel.BodyModel.Trunk.SegmentsLumbar.L3Seg.L3RContactNode.sRel;
AnyFloat L3LContactNode_pos = Main.HumanModel.BodyModel.Trunk.SegmentsLumbar.L3Seg.L3LContactNode.sRel;
AnyFloat MFL3T10NodeR_pos = Main.HumanModel.BodyModel.Trunk.SegmentsLumbar.L3Seg.MFL3T10NodeR.sRel;
AnyFloat MFL3T10NodeL_pos = Main.HumanModel.BodyModel.Trunk.SegmentsLumbar.L3Seg.MFL3T10NodeL.sRel;
AnyFloat MFL3T11NodeR_pos = Main.HumanModel.BodyModel.Trunk.SegmentsLumbar.L3Seg.MFL3T11NodeR.sRel;
AnyFloat MFL3T11NodeL_pos = Main.HumanModel.BodyModel.Trunk.SegmentsLumbar.L3Seg.MFL3T11NodeL.sRel;
AnyFloat MFL3T12NodeR_pos = Main.HumanModel.BodyModel.Trunk.SegmentsLumbar.L3Seg.MFL3T12NodeR.sRel;
AnyFloat MFL3T12NodeL_pos = Main.HumanModel.BodyModel.Trunk.SegmentsLumbar.L3Seg.MFL3T12NodeL.sRel;
AnyFloat SEL3T11NodeR_pos = Main.HumanModel.BodyModel.Trunk.SegmentsLumbar.L3Seg.SEL3T11NodeR.sRel;
AnyFloat SEL3T11NodeL_pos = Main.HumanModel.BodyModel.Trunk.SegmentsLumbar.L3Seg.SEL3T11NodeL.sRel;
AnyFloat SEL3T12NodeR_pos = Main.HumanModel.BodyModel.Trunk.SegmentsLumbar.L3Seg.SEL3T12NodeR.sRel;
AnyFloat SEL3T12NodeL_pos = Main.HumanModel.BodyModel.Trunk.SegmentsLumbar.L3Seg.SEL3T12NodeL.sRel;
AnyFloat Right_O_latissimus_dorsi_4_pos = Main.HumanModel.BodyModel.Trunk.SegmentsLumbar.L3Seg.Right.O_latissimus_dorsi_4.sRel;
AnyFloat Left_O_latissimus_dorsi_4_pos = Main.HumanModel.BodyModel.Trunk.SegmentsLumbar.L3Seg.Left.O_latissimus_dorsi_4.sRel;
};
AnyFolder L2Seg = {
AnyFloat ScalingNode_pos = Main.HumanModel.BodyModel.Trunk.SegmentsLumbar.L2Seg.ScalingNode.sRel;
AnyFloat L2L3JntNode_pos = Main.HumanModel.BodyModel.Trunk.SegmentsLumbar.L2Seg.L2L3JntNode.sRel;
AnyFloat L1L2JntNode_pos = Main.HumanModel.BodyModel.Trunk.SegmentsLumbar.L2Seg.L1L2JntNode.sRel;
AnyFloat Right_pos = Main.HumanModel.BodyModel.Trunk.SegmentsLumbar.L2Seg.Right.sRel;
AnyFloat Left_pos = Main.HumanModel.BodyModel.Trunk.SegmentsLumbar.L2Seg.Left.sRel;
AnyFloat LSNode_pos = Main.HumanModel.BodyModel.Trunk.SegmentsLumbar.L2Seg.LSNode.sRel;
AnyFloat LSNode2_pos = Main.HumanModel.BodyModel.Trunk.SegmentsLumbar.L2Seg.LSNode2.sRel;
AnyFloat LINodeInferior_pos = Main.HumanModel.BodyModel.Trunk.SegmentsLumbar.L2Seg.LINodeInferior.sRel;
AnyFloat LINodeSuperior_pos = Main.HumanModel.BodyModel.Trunk.SegmentsLumbar.L2Seg.LINodeSuperior.sRel;
AnyFloat MFdL2L4NodeR_pos = Main.HumanModel.BodyModel.Trunk.SegmentsLumbar.L2Seg.MFdL2L4NodeR.sRel;
AnyFloat MFdL2L4NodeL_pos = Main.HumanModel.BodyModel.Trunk.SegmentsLumbar.L2Seg.MFdL2L4NodeL.sRel;
AnyFloat MFmL2L5NodeR_pos = Main.HumanModel.BodyModel.Trunk.SegmentsLumbar.L2Seg.MFmL2L5NodeR.sRel;
AnyFloat MFmL2L5NodeL_pos = Main.HumanModel.BodyModel.Trunk.SegmentsLumbar.L2Seg.MFmL2L5NodeL.sRel;
AnyFloat MFtsL2L5NodeR_pos = Main.HumanModel.BodyModel.Trunk.SegmentsLumbar.L2Seg.MFtsL2L5NodeR.sRel;
AnyFloat MFtsL2L5NodeL_pos = Main.HumanModel.BodyModel.Trunk.SegmentsLumbar.L2Seg.MFtsL2L5NodeL.sRel;
AnyFloat MFtsL2S1NodeR_pos = Main.HumanModel.BodyModel.Trunk.SegmentsLumbar.L2Seg.MFtsL2S1NodeR.sRel;
AnyFloat MFtsL2S1NodeL_pos = Main.HumanModel.BodyModel.Trunk.SegmentsLumbar.L2Seg.MFtsL2S1NodeL.sRel;
AnyFloat MFtstL2SIPSNodeR_pos = Main.HumanModel.BodyModel.Trunk.SegmentsLumbar.L2Seg.MFtstL2SIPSNodeR.sRel;
AnyFloat MFtstL2SIPSNodeL_pos = Main.HumanModel.BodyModel.Trunk.SegmentsLumbar.L2Seg.MFtstL2SIPSNodeL.sRel;
AnyFloat ILplL2CINodeR_pos = Main.HumanModel.BodyModel.Trunk.SegmentsLumbar.L2Seg.ILplL2CINodeR.sRel;
AnyFloat ILplL2CINodeL_pos = Main.HumanModel.BodyModel.Trunk.SegmentsLumbar.L2Seg.ILplL2CINodeL.sRel;
AnyFloat LTplL2SIPSNodeR_pos = Main.HumanModel.BodyModel.Trunk.SegmentsLumbar.L2Seg.LTplL2SIPSNodeR.sRel;
AnyFloat LTplL2SIPSNodeL_pos = Main.HumanModel.BodyModel.Trunk.SegmentsLumbar.L2Seg.LTplL2SIPSNodeL.sRel;
AnyFloat LTptT2L2NodeR_pos = Main.HumanModel.BodyModel.Trunk.SegmentsLumbar.L2Seg.LTptT2L2NodeR.sRel;
AnyFloat LTptT2L2NodeL_pos = Main.HumanModel.BodyModel.Trunk.SegmentsLumbar.L2Seg.LTptT2L2NodeL.sRel;
AnyFloat ILplL1CIViaNodeR_pos = Main.HumanModel.BodyModel.Trunk.SegmentsLumbar.L2Seg.ILplL1CIViaNodeR.sRel;
AnyFloat ILplL1CIViaNodeL_pos = Main.HumanModel.BodyModel.Trunk.SegmentsLumbar.L2Seg.ILplL1CIViaNodeL.sRel;
AnyFloat LTplL1SIPSViaNodeR_pos = Main.HumanModel.BodyModel.Trunk.SegmentsLumbar.L2Seg.LTplL1SIPSViaNodeR.sRel;
AnyFloat LTplL1SIPSViaNodeL_pos = Main.HumanModel.BodyModel.Trunk.SegmentsLumbar.L2Seg.LTplL1SIPSViaNodeL.sRel;
AnyFloat ILptC5SIPSVia8NodeR_pos = Main.HumanModel.BodyModel.Trunk.SegmentsLumbar.L2Seg.ILptC5SIPSVia8NodeR.sRel;
AnyFloat ILptC5SIPSVia8NodeL_pos = Main.HumanModel.BodyModel.Trunk.SegmentsLumbar.L2Seg.ILptC5SIPSVia8NodeL.sRel;
AnyFloat ILptC6SIPSVia7NodeR_pos = Main.HumanModel.BodyModel.Trunk.SegmentsLumbar.L2Seg.ILptC6SIPSVia7NodeR.sRel;
AnyFloat ILptC6SIPSVia7NodeL_pos = Main.HumanModel.BodyModel.Trunk.SegmentsLumbar.L2Seg.ILptC6SIPSVia7NodeL.sRel;
AnyFloat ILptC7CIVia6NodeR_pos = Main.HumanModel.BodyModel.Trunk.SegmentsLumbar.L2Seg.ILptC7CIVia6NodeR.sRel;
AnyFloat ILptC7CIVia6NodeL_pos = Main.HumanModel.BodyModel.Trunk.SegmentsLumbar.L2Seg.ILptC7CIVia6NodeL.sRel;
AnyFloat ILptC8CIVia5NodeR_pos = Main.HumanModel.BodyModel.Trunk.SegmentsLumbar.L2Seg.ILptC8CIVia5NodeR.sRel;
AnyFloat ILptC8CIVia5NodeL_pos = Main.HumanModel.BodyModel.Trunk.SegmentsLumbar.L2Seg.ILptC8CIVia5NodeL.sRel;
AnyFloat ILptC9CIVia4NodeR_pos = Main.HumanModel.BodyModel.Trunk.SegmentsLumbar.L2Seg.ILptC9CIVia4NodeR.sRel;
AnyFloat ILptC9CIVia4NodeL_pos = Main.HumanModel.BodyModel.Trunk.SegmentsLumbar.L2Seg.ILptC9CIVia4NodeL.sRel;
AnyFloat ILptC10CIVia3NodeR_pos = Main.HumanModel.BodyModel.Trunk.SegmentsLumbar.L2Seg.ILptC10CIVia3NodeR.sRel;
AnyFloat ILptC10CIVia3NodeL_pos = Main.HumanModel.BodyModel.Trunk.SegmentsLumbar.L2Seg.ILptC10CIVia3NodeL.sRel;
AnyFloat ILptC11CIVia2NodeR_pos = Main.HumanModel.BodyModel.Trunk.SegmentsLumbar.L2Seg.ILptC11CIVia2NodeR.sRel;
AnyFloat ILptC11CIVia2NodeL_pos = Main.HumanModel.BodyModel.Trunk.SegmentsLumbar.L2Seg.ILptC11CIVia2NodeL.sRel;
AnyFloat ILptC12CIVia2NodeR_pos = Main.HumanModel.BodyModel.Trunk.SegmentsLumbar.L2Seg.ILptC12CIVia2NodeR.sRel;
AnyFloat ILptC12CIVia2NodeL_pos = Main.HumanModel.BodyModel.Trunk.SegmentsLumbar.L2Seg.ILptC12CIVia2NodeL.sRel;
AnyFloat LTptT3L3Via11NodeR_pos = Main.HumanModel.BodyModel.Trunk.SegmentsLumbar.L2Seg.LTptT3L3Via11NodeR.sRel;
AnyFloat LTptT3L3Via11NodeL_pos = Main.HumanModel.BodyModel.Trunk.SegmentsLumbar.L2Seg.LTptT3L3Via11NodeL.sRel;
AnyFloat LTptT4L4Via10NodeR_pos = Main.HumanModel.BodyModel.Trunk.SegmentsLumbar.L2Seg.LTptT4L4Via10NodeR.sRel;
AnyFloat LTptT4L4Via10NodeL_pos = Main.HumanModel.BodyModel.Trunk.SegmentsLumbar.L2Seg.LTptT4L4Via10NodeL.sRel;
AnyFloat LTptT5L5Via9NodeR_pos = Main.HumanModel.BodyModel.Trunk.SegmentsLumbar.L2Seg.LTptT5L5Via9NodeR.sRel;
AnyFloat LTptT5L5Via9NodeL_pos = Main.HumanModel.BodyModel.Trunk.SegmentsLumbar.L2Seg.LTptT5L5Via9NodeL.sRel;
AnyFloat LTptT6S1Via8NodeR_pos = Main.HumanModel.BodyModel.Trunk.SegmentsLumbar.L2Seg.LTptT6S1Via8NodeR.sRel;
AnyFloat LTptT6S1Via8NodeL_pos = Main.HumanModel.BodyModel.Trunk.SegmentsLumbar.L2Seg.LTptT6S1Via8NodeL.sRel;
AnyFloat LTptT7S2Via7NodeR_pos = Main.HumanModel.BodyModel.Trunk.SegmentsLumbar.L2Seg.LTptT7S2Via7NodeR.sRel;
AnyFloat LTptT7S2Via7NodeL_pos = Main.HumanModel.BodyModel.Trunk.SegmentsLumbar.L2Seg.LTptT7S2Via7NodeL.sRel;
AnyFloat LTptT8S3Via6NodeR_pos = Main.HumanModel.BodyModel.Trunk.SegmentsLumbar.L2Seg.LTptT8S3Via6NodeR.sRel;
AnyFloat LTptT8S3Via6NodeL_pos = Main.HumanModel.BodyModel.Trunk.SegmentsLumbar.L2Seg.LTptT8S3Via6NodeL.sRel;
AnyFloat LTptT9S4Via5NodeR_pos = Main.HumanModel.BodyModel.Trunk.SegmentsLumbar.L2Seg.LTptT9S4Via5NodeR.sRel;
AnyFloat LTptT9S4Via5NodeL_pos = Main.HumanModel.BodyModel.Trunk.SegmentsLumbar.L2Seg.LTptT9S4Via5NodeL.sRel;
AnyFloat LTptT10SacrumVia4NodeR_pos = Main.HumanModel.BodyModel.Trunk.SegmentsLumbar.L2Seg.LTptT10SacrumVia4NodeR.sRel;
AnyFloat LTptT10SacrumVia4NodeL_pos = Main.HumanModel.BodyModel.Trunk.SegmentsLumbar.L2Seg.LTptT10SacrumVia4NodeL.sRel;
AnyFloat LTptT11SacrumVia3NodeR_pos = Main.HumanModel.BodyModel.Trunk.SegmentsLumbar.L2Seg.LTptT11SacrumVia3NodeR.sRel;
AnyFloat LTptT11SacrumVia3NodeL_pos = Main.HumanModel.BodyModel.Trunk.SegmentsLumbar.L2Seg.LTptT11SacrumVia3NodeL.sRel;
AnyFloat LTptT12SacrumVia2NodeR_pos = Main.HumanModel.BodyModel.Trunk.SegmentsLumbar.L2Seg.LTptT12SacrumVia2NodeR.sRel;
AnyFloat LTptT12SacrumVia2NodeL_pos = Main.HumanModel.BodyModel.Trunk.SegmentsLumbar.L2Seg.LTptT12SacrumVia2NodeL.sRel;
AnyFloat PML2I_TMNodeR_pos = Main.HumanModel.BodyModel.Trunk.SegmentsLumbar.L2Seg.PML2I_TMNodeR.sRel;
AnyFloat PML2I_TMNodeL_pos = Main.HumanModel.BodyModel.Trunk.SegmentsLumbar.L2Seg.PML2I_TMNodeL.sRel;
AnyFloat PML2T_TMNodeR_pos = Main.HumanModel.BodyModel.Trunk.SegmentsLumbar.L2Seg.PML2T_TMNodeR.sRel;
AnyFloat PML2T_TMNodeL_pos = Main.HumanModel.BodyModel.Trunk.SegmentsLumbar.L2Seg.PML2T_TMNodeL.sRel;
AnyFloat PMT12I_TMVia1NodeR_pos = Main.HumanModel.BodyModel.Trunk.SegmentsLumbar.L2Seg.PMT12I_TMVia1NodeR.sRel;
AnyFloat PMT12I_TMVia1NodeL_pos = Main.HumanModel.BodyModel.Trunk.SegmentsLumbar.L2Seg.PMT12I_TMVia1NodeL.sRel;
AnyFloat PML1T_TMVia1NodeR_pos = Main.HumanModel.BodyModel.Trunk.SegmentsLumbar.L2Seg.PML1T_TMVia1NodeR.sRel;
AnyFloat PML1T_TMVia1NodeL_pos = Main.HumanModel.BodyModel.Trunk.SegmentsLumbar.L2Seg.PML1T_TMVia1NodeL.sRel;
AnyFloat QLL2_CINodeR_pos = Main.HumanModel.BodyModel.Trunk.SegmentsLumbar.L2Seg.QLL2_CINodeR.sRel;
AnyFloat QLL2_CINodeL_pos = Main.HumanModel.BodyModel.Trunk.SegmentsLumbar.L2Seg.QLL2_CINodeL.sRel;
AnyFloat OEC7_RSNodeR_pos = Main.HumanModel.BodyModel.Trunk.SegmentsLumbar.L2Seg.OEC7_RSNodeR.sRel;
AnyFloat OEC7_RSNodeL_pos = Main.HumanModel.BodyModel.Trunk.SegmentsLumbar.L2Seg.OEC7_RSNodeL.sRel;
AnyFloat OICI_RS1NodeR_pos = Main.HumanModel.BodyModel.Trunk.SegmentsLumbar.L2Seg.OICI_RS1NodeR.sRel;
AnyFloat OICI_RS1NodeL_pos = Main.HumanModel.BodyModel.Trunk.SegmentsLumbar.L2Seg.OICI_RS1NodeL.sRel;
AnyFloat MidPoint_pos = Main.HumanModel.BodyModel.Trunk.SegmentsLumbar.L2Seg.MidPoint.sRel;
AnyFloat SupportNode_pos = Main.HumanModel.BodyModel.Trunk.SegmentsLumbar.L2Seg.SupportNode.sRel;
AnyFloat BuckleContactNode_pos = Main.HumanModel.BodyModel.Trunk.SegmentsLumbar.L2Seg.BuckleContactNode.sRel;
AnyFloat L2RContactNode_pos = Main.HumanModel.BodyModel.Trunk.SegmentsLumbar.L2Seg.L2RContactNode.sRel;
AnyFloat L2LContactNode_pos = Main.HumanModel.BodyModel.Trunk.SegmentsLumbar.L2Seg.L2LContactNode.sRel;
AnyFloat MFL2T9NodeR_pos = Main.HumanModel.BodyModel.Trunk.SegmentsLumbar.L2Seg.MFL2T9NodeR.sRel;
AnyFloat MFL2T9NodeL_pos = Main.HumanModel.BodyModel.Trunk.SegmentsLumbar.L2Seg.MFL2T9NodeL.sRel;
AnyFloat MFL2T10NodeR_pos = Main.HumanModel.BodyModel.Trunk.SegmentsLumbar.L2Seg.MFL2T10NodeR.sRel;
AnyFloat MFL2T10NodeL_pos = Main.HumanModel.BodyModel.Trunk.SegmentsLumbar.L2Seg.MFL2T10NodeL.sRel;
AnyFloat MFL2T11NodeR_pos = Main.HumanModel.BodyModel.Trunk.SegmentsLumbar.L2Seg.MFL2T11NodeR.sRel;
AnyFloat MFL2T11NodeL_pos = Main.HumanModel.BodyModel.Trunk.SegmentsLumbar.L2Seg.MFL2T11NodeL.sRel;
AnyFloat SEL2T9NodeR_pos = Main.HumanModel.BodyModel.Trunk.SegmentsLumbar.L2Seg.SEL2T9NodeR.sRel;
AnyFloat SEL2T9NodeL_pos = Main.HumanModel.BodyModel.Trunk.SegmentsLumbar.L2Seg.SEL2T9NodeL.sRel;
AnyFloat SEL2T10NodeR_pos = Main.HumanModel.BodyModel.Trunk.SegmentsLumbar.L2Seg.SEL2T10NodeR.sRel;
AnyFloat SEL2T10NodeL_pos = Main.HumanModel.BodyModel.Trunk.SegmentsLumbar.L2Seg.SEL2T10NodeL.sRel;
AnyFloat SEL2T11NodeR_pos = Main.HumanModel.BodyModel.Trunk.SegmentsLumbar.L2Seg.SEL2T11NodeR.sRel;
AnyFloat SEL2T11NodeL_pos = Main.HumanModel.BodyModel.Trunk.SegmentsLumbar.L2Seg.SEL2T11NodeL.sRel;
AnyFloat SEL2T12NodeR_pos = Main.HumanModel.BodyModel.Trunk.SegmentsLumbar.L2Seg.SEL2T12NodeR.sRel;
AnyFloat SEL2T12NodeL_pos = Main.HumanModel.BodyModel.Trunk.SegmentsLumbar.L2Seg.SEL2T12NodeL.sRel;
};
AnyFolder L1Seg = {
AnyFloat ScalingNode_pos = Main.HumanModel.BodyModel.Trunk.SegmentsLumbar.L1Seg.ScalingNode.sRel;
AnyFloat L1L2JntNode_pos = Main.HumanModel.BodyModel.Trunk.SegmentsLumbar.L1Seg.L1L2JntNode.sRel;
AnyFloat T12L1JntNode_pos = Main.HumanModel.BodyModel.Trunk.SegmentsLumbar.L1Seg.T12L1JntNode.sRel;
AnyFloat Right_pos = Main.HumanModel.BodyModel.Trunk.SegmentsLumbar.L1Seg.Right.sRel;
AnyFloat Left_pos = Main.HumanModel.BodyModel.Trunk.SegmentsLumbar.L1Seg.Left.sRel;
AnyFloat LSNode_pos = Main.HumanModel.BodyModel.Trunk.SegmentsLumbar.L1Seg.LSNode.sRel;
AnyFloat LINodeInferior_pos = Main.HumanModel.BodyModel.Trunk.SegmentsLumbar.L1Seg.LINodeInferior.sRel;
AnyFloat LINodeSuperior_pos = Main.HumanModel.BodyModel.Trunk.SegmentsLumbar.L1Seg.LINodeSuperior.sRel;
AnyFloat MFdL1L3NodeR_pos = Main.HumanModel.BodyModel.Trunk.SegmentsLumbar.L1Seg.MFdL1L3NodeR.sRel;
AnyFloat MFdL1L3NodeL_pos = Main.HumanModel.BodyModel.Trunk.SegmentsLumbar.L1Seg.MFdL1L3NodeL.sRel;
AnyFloat MFmL1L4NodeR_pos = Main.HumanModel.BodyModel.Trunk.SegmentsLumbar.L1Seg.MFmL1L4NodeR.sRel;
AnyFloat MFmL1L4NodeL_pos = Main.HumanModel.BodyModel.Trunk.SegmentsLumbar.L1Seg.MFmL1L4NodeL.sRel;
AnyFloat MFtsL1L5NodeR_pos = Main.HumanModel.BodyModel.Trunk.SegmentsLumbar.L1Seg.MFtsL1L5NodeR.sRel;
AnyFloat MFtsL1L5NodeL_pos = Main.HumanModel.BodyModel.Trunk.SegmentsLumbar.L1Seg.MFtsL1L5NodeL.sRel;
AnyFloat MFtsL1S1NodeR_pos = Main.HumanModel.BodyModel.Trunk.SegmentsLumbar.L1Seg.MFtsL1S1NodeR.sRel;
AnyFloat MFtsL1S1NodeL_pos = Main.HumanModel.BodyModel.Trunk.SegmentsLumbar.L1Seg.MFtsL1S1NodeL.sRel;
AnyFloat MFtstL1SIPSNodeR_pos = Main.HumanModel.BodyModel.Trunk.SegmentsLumbar.L1Seg.MFtstL1SIPSNodeR.sRel;
AnyFloat MFtstL1SIPSNodeL_pos = Main.HumanModel.BodyModel.Trunk.SegmentsLumbar.L1Seg.MFtstL1SIPSNodeL.sRel;
AnyFloat ILplL1CINodeR_pos = Main.HumanModel.BodyModel.Trunk.SegmentsLumbar.L1Seg.ILplL1CINodeR.sRel;
AnyFloat ILplL1CINodeL_pos = Main.HumanModel.BodyModel.Trunk.SegmentsLumbar.L1Seg.ILplL1CINodeL.sRel;
AnyFloat LTplL1SIPSNodeR_pos = Main.HumanModel.BodyModel.Trunk.SegmentsLumbar.L1Seg.LTplL1SIPSNodeR.sRel;
AnyFloat LTplL1SIPSNodeL_pos = Main.HumanModel.BodyModel.Trunk.SegmentsLumbar.L1Seg.LTplL1SIPSNodeL.sRel;
AnyFloat LTptT1L1NodeR_pos = Main.HumanModel.BodyModel.Trunk.SegmentsLumbar.L1Seg.LTptT1L1NodeR.sRel;
AnyFloat LTptT1L1NodeL_pos = Main.HumanModel.BodyModel.Trunk.SegmentsLumbar.L1Seg.LTptT1L1NodeL.sRel;
AnyFloat ILptC5SIPSVia7NodeR_pos = Main.HumanModel.BodyModel.Trunk.SegmentsLumbar.L1Seg.ILptC5SIPSVia7NodeR.sRel;
AnyFloat ILptC5SIPSVia7NodeL_pos = Main.HumanModel.BodyModel.Trunk.SegmentsLumbar.L1Seg.ILptC5SIPSVia7NodeL.sRel;
AnyFloat ILptC6SIPSVia6NodeR_pos = Main.HumanModel.BodyModel.Trunk.SegmentsLumbar.L1Seg.ILptC6SIPSVia6NodeR.sRel;
AnyFloat ILptC6SIPSVia6NodeL_pos = Main.HumanModel.BodyModel.Trunk.SegmentsLumbar.L1Seg.ILptC6SIPSVia6NodeL.sRel;
AnyFloat ILptC7CIVia5NodeR_pos = Main.HumanModel.BodyModel.Trunk.SegmentsLumbar.L1Seg.ILptC7CIVia5NodeR.sRel;
AnyFloat ILptC7CIVia5NodeL_pos = Main.HumanModel.BodyModel.Trunk.SegmentsLumbar.L1Seg.ILptC7CIVia5NodeL.sRel;
AnyFloat ILptC8CIVia4NodeR_pos = Main.HumanModel.BodyModel.Trunk.SegmentsLumbar.L1Seg.ILptC8CIVia4NodeR.sRel;
AnyFloat ILptC8CIVia4NodeL_pos = Main.HumanModel.BodyModel.Trunk.SegmentsLumbar.L1Seg.ILptC8CIVia4NodeL.sRel;
AnyFloat ILptC9CIVia3NodeR_pos = Main.HumanModel.BodyModel.Trunk.SegmentsLumbar.L1Seg.ILptC9CIVia3NodeR.sRel;
AnyFloat ILptC9CIVia3NodeL_pos = Main.HumanModel.BodyModel.Trunk.SegmentsLumbar.L1Seg.ILptC9CIVia3NodeL.sRel;
AnyFloat ILptC10CIVia2NodeR_pos = Main.HumanModel.BodyModel.Trunk.SegmentsLumbar.L1Seg.ILptC10CIVia2NodeR.sRel;
AnyFloat ILptC10CIVia2NodeL_pos = Main.HumanModel.BodyModel.Trunk.SegmentsLumbar.L1Seg.ILptC10CIVia2NodeL.sRel;
AnyFloat ILptC11CIVia1NodeR_pos = Main.HumanModel.BodyModel.Trunk.SegmentsLumbar.L1Seg.ILptC11CIVia1NodeR.sRel;
AnyFloat ILptC11CIVia1NodeL_pos = Main.HumanModel.BodyModel.Trunk.SegmentsLumbar.L1Seg.ILptC11CIVia1NodeL.sRel;
AnyFloat ILptC12CIVia1NodeR_pos = Main.HumanModel.BodyModel.Trunk.SegmentsLumbar.L1Seg.ILptC12CIVia1NodeR.sRel;
AnyFloat ILptC12CIVia1NodeL_pos = Main.HumanModel.BodyModel.Trunk.SegmentsLumbar.L1Seg.ILptC12CIVia1NodeL.sRel;
AnyFloat LTptT2L2Via11NodeR_pos = Main.HumanModel.BodyModel.Trunk.SegmentsLumbar.L1Seg.LTptT2L2Via11NodeR.sRel;
AnyFloat LTptT2L2Via11NodeL_pos = Main.HumanModel.BodyModel.Trunk.SegmentsLumbar.L1Seg.LTptT2L2Via11NodeL.sRel;
AnyFloat LTptT3L3Via10NodeR_pos = Main.HumanModel.BodyModel.Trunk.SegmentsLumbar.L1Seg.LTptT3L3Via10NodeR.sRel;
AnyFloat LTptT3L3Via10NodeL_pos = Main.HumanModel.BodyModel.Trunk.SegmentsLumbar.L1Seg.LTptT3L3Via10NodeL.sRel;
AnyFloat LTptT4L4Via9NodeR_pos = Main.HumanModel.BodyModel.Trunk.SegmentsLumbar.L1Seg.LTptT4L4Via9NodeR.sRel;
AnyFloat LTptT4L4Via9NodeL_pos = Main.HumanModel.BodyModel.Trunk.SegmentsLumbar.L1Seg.LTptT4L4Via9NodeL.sRel;
AnyFloat LTptT5L5Via8NodeR_pos = Main.HumanModel.BodyModel.Trunk.SegmentsLumbar.L1Seg.LTptT5L5Via8NodeR.sRel;
AnyFloat LTptT5L5Via8NodeL_pos = Main.HumanModel.BodyModel.Trunk.SegmentsLumbar.L1Seg.LTptT5L5Via8NodeL.sRel;
AnyFloat LTptT6S1Via7NodeR_pos = Main.HumanModel.BodyModel.Trunk.SegmentsLumbar.L1Seg.LTptT6S1Via7NodeR.sRel;
AnyFloat LTptT6S1Via7NodeL_pos = Main.HumanModel.BodyModel.Trunk.SegmentsLumbar.L1Seg.LTptT6S1Via7NodeL.sRel;
AnyFloat LTptT7S2Via6NodeR_pos = Main.HumanModel.BodyModel.Trunk.SegmentsLumbar.L1Seg.LTptT7S2Via6NodeR.sRel;
AnyFloat LTptT7S2Via6NodeL_pos = Main.HumanModel.BodyModel.Trunk.SegmentsLumbar.L1Seg.LTptT7S2Via6NodeL.sRel;
AnyFloat LTptT8S3Via5NodeR_pos = Main.HumanModel.BodyModel.Trunk.SegmentsLumbar.L1Seg.LTptT8S3Via5NodeR.sRel;
AnyFloat LTptT8S3Via5NodeL_pos = Main.HumanModel.BodyModel.Trunk.SegmentsLumbar.L1Seg.LTptT8S3Via5NodeL.sRel;
AnyFloat LTptT9S4Via4NodeR_pos = Main.HumanModel.BodyModel.Trunk.SegmentsLumbar.L1Seg.LTptT9S4Via4NodeR.sRel;
AnyFloat LTptT9S4Via4NodeL_pos = Main.HumanModel.BodyModel.Trunk.SegmentsLumbar.L1Seg.LTptT9S4Via4NodeL.sRel;
AnyFloat LTptT10SacrumVia3NodeR_pos = Main.HumanModel.BodyModel.Trunk.SegmentsLumbar.L1Seg.LTptT10SacrumVia3NodeR.sRel;
AnyFloat LTptT10SacrumVia3NodeL_pos = Main.HumanModel.BodyModel.Trunk.SegmentsLumbar.L1Seg.LTptT10SacrumVia3NodeL.sRel;
AnyFloat LTptT11SacrumVia2NodeR_pos = Main.HumanModel.BodyModel.Trunk.SegmentsLumbar.L1Seg.LTptT11SacrumVia2NodeR.sRel;
AnyFloat LTptT11SacrumVia2NodeL_pos = Main.HumanModel.BodyModel.Trunk.SegmentsLumbar.L1Seg.LTptT11SacrumVia2NodeL.sRel;
AnyFloat LTptT12SacrumVia1NodeR_pos = Main.HumanModel.BodyModel.Trunk.SegmentsLumbar.L1Seg.LTptT12SacrumVia1NodeR.sRel;
AnyFloat LTptT12SacrumVia1NodeL_pos = Main.HumanModel.BodyModel.Trunk.SegmentsLumbar.L1Seg.LTptT12SacrumVia1NodeL.sRel;
AnyFloat PML1I_TMNodeR_pos = Main.HumanModel.BodyModel.Trunk.SegmentsLumbar.L1Seg.PML1I_TMNodeR.sRel;
AnyFloat PML1I_TMNodeL_pos = Main.HumanModel.BodyModel.Trunk.SegmentsLumbar.L1Seg.PML1I_TMNodeL.sRel;
AnyFloat PML1T_TMNodeR_pos = Main.HumanModel.BodyModel.Trunk.SegmentsLumbar.L1Seg.PML1T_TMNodeR.sRel;
AnyFloat PML1T_TMNodeL_pos = Main.HumanModel.BodyModel.Trunk.SegmentsLumbar.L1Seg.PML1T_TMNodeL.sRel;
AnyFloat QLL1_CINodeR_pos = Main.HumanModel.BodyModel.Trunk.SegmentsLumbar.L1Seg.QLL1_CINodeR.sRel;
AnyFloat QLL1_CINodeL_pos = Main.HumanModel.BodyModel.Trunk.SegmentsLumbar.L1Seg.QLL1_CINodeL.sRel;
AnyFloat MidPoint_pos = Main.HumanModel.BodyModel.Trunk.SegmentsLumbar.L1Seg.MidPoint.sRel;
AnyFloat SupportNode_pos = Main.HumanModel.BodyModel.Trunk.SegmentsLumbar.L1Seg.SupportNode.sRel;
AnyFloat BuckleContactNode_pos = Main.HumanModel.BodyModel.Trunk.SegmentsLumbar.L1Seg.BuckleContactNode.sRel;
AnyFloat L1RContactNode_pos = Main.HumanModel.BodyModel.Trunk.SegmentsLumbar.L1Seg.L1RContactNode.sRel;
AnyFloat L1LContactNode_pos = Main.HumanModel.BodyModel.Trunk.SegmentsLumbar.L1Seg.L1LContactNode.sRel;
AnyFloat MFL1T8NodeR_pos = Main.HumanModel.BodyModel.Trunk.SegmentsLumbar.L1Seg.MFL1T8NodeR.sRel;
AnyFloat MFL1T8NodeL_pos = Main.HumanModel.BodyModel.Trunk.SegmentsLumbar.L1Seg.MFL1T8NodeL.sRel;
AnyFloat MFL1T9NodeR_pos = Main.HumanModel.BodyModel.Trunk.SegmentsLumbar.L1Seg.MFL1T9NodeR.sRel;
AnyFloat MFL1T9NodeL_pos = Main.HumanModel.BodyModel.Trunk.SegmentsLumbar.L1Seg.MFL1T9NodeL.sRel;
AnyFloat MFL1T10NodeR_pos = Main.HumanModel.BodyModel.Trunk.SegmentsLumbar.L1Seg.MFL1T10NodeR.sRel;
AnyFloat MFL1T10NodeL_pos = Main.HumanModel.BodyModel.Trunk.SegmentsLumbar.L1Seg.MFL1T10NodeL.sRel;
AnyFloat SPL1T3Node_pos = Main.HumanModel.BodyModel.Trunk.SegmentsLumbar.L1Seg.SPL1T3Node.sRel;
AnyFloat SPL1T4Node_pos = Main.HumanModel.BodyModel.Trunk.SegmentsLumbar.L1Seg.SPL1T4Node.sRel;
AnyFloat SPL1T5Node_pos = Main.HumanModel.BodyModel.Trunk.SegmentsLumbar.L1Seg.SPL1T5Node.sRel;
AnyFloat SEL1T8NodeR_pos = Main.HumanModel.BodyModel.Trunk.SegmentsLumbar.L1Seg.SEL1T8NodeR.sRel;
AnyFloat SEL1T8NodeL_pos = Main.HumanModel.BodyModel.Trunk.SegmentsLumbar.L1Seg.SEL1T8NodeL.sRel;
AnyFloat SEL1T10NodeR_pos = Main.HumanModel.BodyModel.Trunk.SegmentsLumbar.L1Seg.SEL1T10NodeR.sRel;
AnyFloat SEL1T10NodeL_pos = Main.HumanModel.BodyModel.Trunk.SegmentsLumbar.L1Seg.SEL1T10NodeL.sRel;
AnyFloat SEL1T11NodeR_pos = Main.HumanModel.BodyModel.Trunk.SegmentsLumbar.L1Seg.SEL1T11NodeR.sRel;
AnyFloat SEL1T11NodeL_pos = Main.HumanModel.BodyModel.Trunk.SegmentsLumbar.L1Seg.SEL1T11NodeL.sRel;
AnyFloat Right_O_latissimus_dorsi_3_pos = Main.HumanModel.BodyModel.Trunk.SegmentsLumbar.L1Seg.Right.O_latissimus_dorsi_3.sRel;
AnyFloat Left_O_latissimus_dorsi_3_pos = Main.HumanModel.BodyModel.Trunk.SegmentsLumbar.L1Seg.Left.O_latissimus_dorsi_3.sRel;
};
