#path __BM_PLUGIN_FILE__ "BodyModelConfiguration.any"
#define BM_CONFIG_PLUGIN __BM_PLUGIN_FILE__

// -----------------------------------------------------------------------------------
// The BodyModel configuration can be modified using BodyModel GUI plugin
// or by manually editing this file.
//
// Please see this this file for more information on the options:
// #path HTML_DOC "<AMMR_PATH_DOC>/bm_config/index.html"
// -----------------------------------------------------------------------------------

#define BM_MANNEQUIN_DRIVER_DEFAULT ON

// Enable the TLEM2 lower extremity model
#define BM_LEG_MODEL _LEG_MODEL_TLEM2_


#define BM_ARM_MUSCLES_RIGHT _MUSCLES_3E_HILL_
#define BM_ARM_MUSCLES_LEFT _MUSCLES_3E_HILL_
#define BM_LEG_LEFT ON
#define BM_LEG_RIGHT ON
#define BM_ARM_LEFT OFF
#define BM_FOOT_MODEL _FOOT_MODEL_DEFAULT_
#define BM_LEG_TRUNK_INTERFACE _MORPH_LEG_TO_TRUNK_
#define BM_LEG_MUSCLES_RIGHT OFF
#define BM_LEG_MUSCLES_LEFT OFF

#define BM_CONFIG_VALUES ON
#define BM_CONFIG_MESSAGES ON
#define BM_CALIBRATION_TYPE _CALIBRATION_TYPE_2PAR_
#define BM_SCALING _SCALING_UNIFORM_

#define EVALUATE_MOMENT_ARMS 1
#define EVALUATE_MOMENT_ARMS_NSTEP 10
